<?xml version="1.0" ?>
<Node name="root" dt="0.01" showBoundingTree="0" gravity="0 0 0">
	<RequiredPlugin pluginName="Optimus"/>
	<RequiredPlugin pluginName="SofaPardisoSolver"/>
	<RequiredPlugin pluginName="ImageMeshAux"/>
	<VisualStyle displayFlags="showBehaviorModels showForceFields showCollisionModels" />

        <Node name="toolEmu">
            <MechanicalObject name="MO" position="0.16 0.06 0.01  0.16 0.06 0.025  0.16 0.06 0.040  0.16 0.06 0.055   0.16 0.06 0.070   0.175 0.06 0.01  0.175 0.06 0.025  0.175 0.06 0.040  0.175 0.06 0.055   0.175 0.06 0.070"/>
            <LinearMotionStateController indices="0 1 2 3 4 5 6 7 8 9" keyDisplacements="0 0 0    0.05 0.05 0" keyTimes="0 2"/>
            <Sphere radius="0.002"/>
        </Node>

        <Node name="defObject">
            <OptimParams name="springStiffness" template="Vector" optimize="0" numParams="15" initValue="1e4" printLog="1" />
<!--                          prescribedParamKeys="0.0 10000 2000 8000  5.0 10000 2000 8000" exportParamFile=""/> -->
<!--             <EulerImplicit name="odeSolver" printLog="false" rayleighStiffness="0.1"/> -->
            <StaticSolver applyIncrementFactor="0"/>
            <SparsePARDISOSolver/>

            <MeshVTKLoader filename="../../Data/beamA1_1635.vtk" name="loader" />
            <MechanicalObject src="@loader" name="Volume" />

            <BoxROI name="allDOFs" box="-1 -1 -1 1 1 1"/>
            <!-- <Monitor name="../observations/beam1635_A" indices="@allDOFs.indices" ExportPositions="1" ExportVelocities="1" ExportForces="1"/> -->

            <include href="Objects/TetrahedronSetTopology.xml" src="@loader" />
            <UniformMass totalMass="0.2513"/>

            <BoxROI name="fixedBox1" box="-0.001 -0.001 -0.001   0.02 0.001 0.08"/>
            <ExtendedRestShapeSpringForceField name="toolSpring" points="@fixedBox1.indices" angularStiffness="0" stiffness="@springStiffness.value" drawSpring="1" listening="1" forceDir="springForces"/>
<!--             <FixedConstraint indices="@fixedBox1.indices" /> -->

    <!-- 	<BoxROI name="fixedBox2" box="-0.05 -0.05 0.176   0.05 0.05 0.180"/> -->
    <!-- 	<FixedConstraint indices="@fixedBox2.indices" /> -->
<!--             <Indices2ValuesMapper name="youngMapper" inputValues="@loader.dataset" indices="1 2 3" values="@paramE.value"/> -->
            <TetrahedronFEMForceField name="FEM" listening="true" updateStiffness="1"  youngModulus="1e5" poissonRatio="0.45" method="large"  computeVonMisesStress="0" drawHeterogeneousTetra="1"/>
    <!-- 	<TetrahedronFEMForceField name="FEM" listening="true" updateStiffness="1"  youngModulus="@paramE.value" poissonRatio="0.45" method="large"  computeVonMisesStress="0" drawHeterogeneousTetra="1"/> -->
    <!-- 	<VTKExporter filename="cylinder.vtk" XMLformat="true" listening="true" edges="0" triangles="0" quads="0" tetras="1" exportAtEnd="true"/> -->

    <!-- 	<Node name="obsNode" activated="1"> -->
    <!-- 		<MechanicalObject position="@../Volume.position"/> -->
    <!-- 		<MechanicalObject position="0.0 0.0 0.02  0.0 0.0 0.04   0.0 0.0 0.08   0.0 0.0 0.09   0.0 0.0 0.12   0.0 0.0 0.13   0.0 0.0 0.14  0.0 0.0 0.17  0.0 0.0 0.19  0.0 0.0 0.22"/>  -->
                            <!--0.0 0.01 0.02  0.0 0.01 0.04   0.0 0.01 0.08   0.0 0.01 0.09   0.0 0.01 0.12  0.0 0.01 0.13   0.0 0.01 0.14  0.0 0.01 0.17  0.0 0.01 0.19  0.0 0.01 0.22
                            0.0 -0.01 0.02  0.0 -0.01 0.04   0.0 -0.01 0.08   0.0 -0.01 0.09   0.0 -0.01 0.12  0.0 -0.01 0.13   0.0 -0.01 0.14  0.0 -0.01 0.17  0.0 -0.01 0.19  0.0 -0.01 0.22
                            0.01 0.01 0.02  0.01 0.01 0.04   0.01 0.01 0.08   0.01 0.01 0.09   0.01 0.01 0.12  0.01 0.01 0.13   0.01 0.01 0.14  0.01 0.01 0.17  0.01 0.01 0.19  0.01 0.01 0.22
                            -0.01 -0.01 0.02  -0.01 -0.01 0.04   -0.01 -0.01 0.08   -0.01 -0.01 0.09   -0.01 -0.01 0.12  -0.01 -0.01 0.13   -0.01 -0.01 0.14  -0.01 -0.01 0.17  -0.01 -0.01 0.19  -0.01 -0.01 0.22"/>-->
    <!-- 		<Sphere radius="0.002" color="1 0 0"/> -->
    <!-- 		<BarycentricMapping/> -->
    <!-- 		<IdentityMapping/> -->
    <!-- 		<MappedPointsObservationManager name="MOBS" observationStdev="2e-3" noiseStdev="0" listening="1"/> -->
    <!-- 		<SofaLinearObservationManager name="LinObs"/> -->
    <!-- 		<SimulatedStateObservationSource name="ObsSource" monitorPrefix="cylinder4245_YMStat"/> -->
    <!-- 	</Node> -->
            <Node name="visualization" activated="1">
                    <MeshSTLLoader filename="../../Data/beamA1_1635.stl" name="loader" />
                    <include href="Objects/TriangleSetTopology.xml" src="@loader" />
                    <MechanicalObject src="@loader" name="Surface"/>
                    <Line color="0 0 0 1"/>
                    <Triangle color="1 0 0 1"/>
                    <BarycentricMapping/>
                    <!-- <VTKExporter filename="vtkExp/beam" XMLformat="true" listening="true" edges="0" triangles="1" quads="0" tetras="0" exportAtEnd="0" exportEveryNumberOfSteps="1"/> -->
            </Node>

            <Mapped3DoFForceField mappedFEM="mappedTool/toolSpring" mappedMechObject="mappedTool/MO" mapping="mappedTool/baryMapping" printLog="1"/>
            <Node name="mappedTool">
                <MechanicalObject name="MO" position="0.16 0.06 0.01  0.16 0.06 0.025  0.16 0.06 0.040  0.16 0.06 0.055   0.16 0.06 0.070   0.175 0.06 0.01  0.175 0.06 0.025  0.175 0.06 0.040  0.175 0.06 0.055   0.175 0.06 0.070"/>
                <ExtendedRestShapeSpringForceField name="toolSpring" angularStiffness="0" stiffness="1e5" external_rest_shape="../../toolEmu/MO" startTimeSpringOn="0" numStepsSpringOn="10000" drawSpring="1" listening="1" updateStiffness="1" springColor="0 1 0 1" />
                <Sphere radius="0.002" color="0 0 1 1"/>
                <BarycentricMapping name="baryMapping"/>
            </Node>
        </Node>
</Node>
