<?xml version="1.0" ?>
<Node name="root" dt="0.01" showBoundingTree="0" gravity="0 -9.81 0">
	<RequiredPlugin pluginName="Optimus"/>
	<!-- <RequiredPlugin pluginName="SofaPardisoWrapper"/> -->
	<!-- <RequiredPlugin pluginName="BilikimoAux"/> -->
	<RequiredPlugin pluginName="SofaPardisoSolver"/>
	<VisualStyle displayFlags="showBehaviorModels showForceFields showCollisionModels" />

	<VerdandiAnimationLoop name="verdAnimLoop"  verbose="0"/>
	<SofaReducedOrderUKF name="sofaROUKF" sigmaPointType="simplex" paramFileName="" paramVarFileName=""/>
	<Node>
		<StaticSolver applyIncrementFactor="1"/>
		<!-- 	<EulerImplicit name="odeSolver" printLog="false" rayleighStiffness="0.1"/> -->
		<SparsePARDISOSolver/>

		<OptimParams name="paramE" template="Vector" initValue="6000 6000 6000" stdev="2000 2000 2000" transformParams="1" optimize="1"/>
		<!-- 	<OptimParams name="paramE" template="Vector" initValue="10000 5000 7000"/>  -->

		<MeshVTKLoader filename="../../data/cylinder3_770.vtk" name="loader" />
		<!-- 	<MeshVTKLoader filename="data/cylinder3_2150.vtk" name="loader" /> -->
		<MechanicalObject src="@loader" name="Volume" />
		<include href="Objects/TetrahedronSetTopology.xml" src="@loader" />
		<UniformMass totalMass="0.2513" />

		<BoxROI name="fixedBox1" box="-0.05 -0.05 -0.002   0.05 0.05 0.002"/>
		<BoxROI name="fixedBox2" box="-0.05 -0.05  0.238   0.05 0.05 0.242"/>
		<MergeSets name="mergeIndices" in1="@fixedBox1.indices" in2="@fixedBox2.indices"/>
		<FixedConstraint indices="@mergeIndices.out" />

		<Indices2ValuesMapper name="youngMapper" inputValues="@loader.dataset" indices="1 2 3" values="@paramE.value"/>
		<TetrahedronFEMForceField name="FEM" listening="true" updateStiffness="1"  youngModulus="@youngMapper.outputValues" poissonRatio="0.45" method="large" drawHeterogeneousTetra="1"/>

		<Node name="obsNode" activated="1">
  			<MechanicalObject position="0.02 0 0.08    0.02 0 0.16    0.0141 0.0141 0.08    0.0141 -0.0141 0.08    0.0141 0.0141 0.16    0.0141 -0.0141 0.16    0.02 0 0.0533    0.02 0 0.107
  				0.02 0 0.133    0.02 0 0.187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"/>
			<Sphere radius="0.002" color="1 0 0 1"/>
			<BarycentricMapping/>
			<MappedPointsObservationManager name="MOBS" observationStdev="2e-3" noiseStdev="0.0" listening="1"/>
			<SimulatedStateObservationSource name="ObsSource" monitorPrefix="observations/cylinder3_770_YMStat"/>
  		</Node>

<!-- 	<Node>
		<MechanicalObject name="SourceMO" position="@../obsNode/MOBS.mappedObservations"/>
		<Sphere radius="0.002" color="0 0 0.3 1"/>
	</Node> -->

	<!-- <VTKExporter filename="cylinderOld.vtk" XMLformat="true" listening="true" edges="0" triangles="0" quads="0" tetras="1" exportAtEnd="true"/>  -->
</Node>
</Node>
