import Sofa
import math
import os
import sys
import csv
import yaml
import pprint
import time
import numpy as np
sys.path.append(os.getcwd() + '/../../python_src/utils')
from Argv2Options import argv2options

__file = __file__.replace('\\', '/') # windows


def createScene(rootNode):
    rootNode.createObject('RequiredPlugin', name='Python', pluginName='SofaPython')
    rootNode.createObject('RequiredPlugin', name='Optimus', pluginName='Optimus')

    try:
        sys.argv[0]
    except:
        commandLineArguments = []
    else:
        commandLineArguments = sys.argv

    if len(commandLineArguments) > 1:
        configFileName = commandLineArguments[1]
    else:
        print 'ERROR: Must supply a yaml config file as an argument!'
        return

    with open(configFileName, 'r') as stream:
        try:
            options = yaml.safe_load(stream)

        except yaml.YAMLError as exc:
            print(exc)
            return

    if len(commandLineArguments) > 2:
        options = argv2options(commandLineArguments[2:], options)

    if options['model']['int']['lin_type'] == 'Pardiso':
        rootNode.createObject('RequiredPlugin', name='Pardiso', pluginName='SofaPardisoSolver')

    AppStiff_GenObs(rootNode, options)

    return 0;


class AppStiff_GenObs(Sofa.PythonScriptController):

    def __init__(self, rootNode, opt):
        self.opt = opt

        pp = pprint.PrettyPrinter(indent=4)
        pp.pprint(opt)

        ### extract configuration data
        self.saveData = opt['io']['saveObsData']
        self.planeCollision = opt['model']['plane_collision']
        self.volumeMeshFile = opt['model']['mesh_path'] + opt['model']['object'] + '_' + str(opt['model']['num_el']) + '.vtk'
        self.surfaceMeshFile = opt['model']['mesh_path'] + opt['model']['object'] + '_' + str(opt['model']['num_el']) + '.stl'
        print('\n\n*************volume mesh file', self.volumeMeshFile)

        self.excitation = ''
        if 'applied_force' in self.opt['model'].keys():
            self.excitation = 'force'
        elif 'applied_pressure' in self.opt['model'].keys():
            self.excitation = 'press'
        elif 'prescribed_displacement' in self.opt['model'].keys():
            self.excitation = 'displ'

        ### generate output folders
        if self.saveData > 0:
            object = opt['model']['object']
            if self.planeCollision:
                object = object + 'plane_'

            self.mainFolder = object + '_' + str(opt['model']['num_el']) + '_' + self.excitation + '_' + opt['model']['obs_id'] + '_' + opt['model']['fem']['method'] + '_' +  opt['model']['int']['type'] + str(opt['model']['int']['maxit']) + str(opt['io']['suffix'])

            stamp='_'+str(int(time.time()))
            os.system('mkdir -p arch')
            os.system('mv --backup -S '+stamp+' '+self.mainFolder+' arch')
            os.system('mkdir -p '+self.mainFolder)

            self.obsPoints = opt['model']['mesh_path'] + opt['model']['object'] + '_' + opt['model']['obs_id'] + '.vtk'
            self.obsFile = self.mainFolder + '/observations'

        if self.saveData > 1:
            self.errFile = self.mainFolder + '/grid_points'

        if self.saveData > 2:
            self.geoFolder = self.mainFolder + '/observation_vtk'
            os.system('mkdir -p '+self.geoFolder)

        self.createGraph(rootNode)

        return None;


    def createGraph(self, rootNode):
        ### scene global stuff
        self.step = 0
        self.waitStep = 0
        self.incStep = 0
        rootNode.findData('dt').value = self.opt['model']['dt']
        rootNode.findData('gravity').value = self.opt['model']['gravity']

        rootNode.createObject('VisualStyle', displayFlags='showBehaviorModels showForceFields showCollisionModels hideVisual')

        ### collisions handler
        if self.planeCollision == 1:
            rootNode.createObject('FreeMotionAnimationLoop')
            rootNode.createObject('GenericConstraintSolver', maxIterations='1000', tolerance='1e-6', printLog='0', allVerified='0')
            rootNode.createObject('CollisionPipeline', depth="6", verbose="0", draw="0")
            rootNode.createObject('BruteForceDetection', name="N2")
            rootNode.createObject('LocalMinDistance', name="Proximity",  alarmDistance='0.002', contactDistance='0.001',  angleCone='90.0', filterIntersection='0')
            rootNode.createObject('DefaultContactManager', name="Response", response="FrictionContact", responseParams='mu=0')

        ### extenral impact
        if 'prescribed_displacement' in self.opt['model'].keys():
            phant = rootNode.createChild('phant')
            phant.createObject('MeshVTKLoader', name='loader', filename=self.volumeMeshFile)
            phant.createObject('MechanicalObject', name='MO', src='@loader')
            phant.createObject('Mesh', src='@loader')
            phant.createObject('LinearMotionStateController', keyTimes=self.opt['model']['prescribed_displacement']['times'], keyDisplacements=self.opt['model']['prescribed_displacement']['displ'])
            # phant.createObject('ShowSpheres', position='@MO.position', color='0 0 1 1', radius='0.001')
            phant.createObject('Mesh', src='@loader')
            # phant.createObject('VTKExporter', filename=self.geoFolder+'/objectPhant.vtk', XMLformat='0',listening='1',edges="0",triangles="0",quads="0",tetras="1", exportAtBegin="1", exportAtEnd="0", exportEveryNumberOfSteps="1", printLog='0')


        ### general node
        simuNode = rootNode.createChild('simuNode')
        self.simuNode = simuNode
        simuNode.createObject('MeshVTKLoader', name='loader', filename=self.volumeMeshFile)

        ### solvers
        intType = self.opt['model']['int']['type']
        if intType == 'Euler':
            firstOrder = self.opt['model']['int']['first_order']
            rmass = self.opt['model']['int']['rmass']
            rstiff = self.opt['model']['int']['rstiff']
            simuNode.createObject('EulerImplicitSolver', firstOrder = firstOrder, rayleighStiffness=rstiff, rayleighMass=rmass)
        elif intType == 'Newton':
            maxIt = self.opt['model']['int']['maxit']
            simuNode.createObject('StaticSolver', name="NewtonStatic", correction_tolerance_threshold="1e-8", residual_tolerance_threshold="1e-8", should_diverge_when_residual_is_growing="1", newton_iterations=maxIt, printLog=self.opt['model']['int']['verbose'])
        else:
            print 'Unknown solver type!'

        linType = self.opt['model']['int']['lin_type']
        if intType == 'Pardiso':
            simuNode.createObject('SparsePARDISOSolver', name='lsolver', verbose='0', pardisoSchurComplement=self.planeCollision, symmetric=self.opt['model']['linsol']['pardisoSym'], exportDataToFolder=self.opt['model']['linsol']['pardisoFolder'])
        elif linType == 'CG':
            # simuNode.createObject('StepPCGLinearSolver', name='lsolverit', precondOnTimeStep='0', use_precond='1', tolerance='1e-10', iterations='500', verbose='0', update_step='10', listening='1', preconditioners='lsolver')
            # simuNode.createObject('ShewchukPCGLinearSolver', name='lsolverit', iterations='500', use_precond='1', tolerance='1e-10', preconditioners='lsolver')
            simuNode.createObject('CGLinearSolver', name='lsolverit', tolerance='1e-10', threshold='1e-10', iterations='500', verbose='0')
        else:
            print 'Unknown linear solver type!'

        ### mechanical object
        simuNode.createObject('MechanicalObject', src='@loader', name='Volume')
        simuNode.createObject('TetrahedronSetTopologyContainer', name="Container", src="@loader", tags=" ")
        simuNode.createObject('TetrahedronSetTopologyModifier', name="Modifier")
        simuNode.createObject('TetrahedronSetTopologyAlgorithms', name="TopoAlgo")
        simuNode.createObject('TetrahedronSetGeometryAlgorithms', name="GeomAlgo")
        if 'total_mass' in self.opt['model'].keys():
            simuNode.createObject('UniformMass', totalMass=self.opt['model']['total_mass'])

        if 'density' in self.opt['model'].keys():
            simuNode.createObject('MeshMatrixMass', printMass='0', lumping='1', massDensity=self.opt['model']['density'], name='mass')

        ### material and elasticiy properties
        youngModuli=self.opt['model']['fem']['young_modulus']
        poissonRatio = self.opt['model']['fem']['poisson_ratio']
        indices = range(1, len(youngModuli)+1)
        simuNode.createObject('Indices2ValuesMapper', indices=indices, values=youngModuli, name='youngMapper', inputValues='@loader.dataset')

        method = self.opt['model']['fem']['method']
        if  method[0:3] == 'Cor':
            simuNode.createObject('TetrahedronFEMForceField', name='FEM', method=method[3:].lower(), listening='true', drawHeterogeneousTetra='1', poissonRatio=poissonRatio, youngModulus='@youngMapper.outputValues', updateStiffness='1')
        elif method == 'StVenant':
            poissonRatii = poissonRatio * np.ones([1,len(youngModuli)])
            simuNode.createObject('Indices2ValuesTransformer', name='paramMapper', indices=indices, values1=youngModuli, values2=poissonRatii, inputValues='@loader.dataset', transformation='ENu2MuLambda')
            simuNode.createObject('TetrahedralTotalLagrangianForceField', name='FEM', materialName='StVenantKirchhoff', ParameterSet='@paramMapper.outputValues', drawHeterogeneousTetra='1')

        ### boundary conditions
        simuNode.createObject('BoxROI', box=self.opt['model']['bc']['boxes'], name='fixedBox', drawBoxes='1')
        simuNode.createObject('FixedConstraint', indices='@fixedBox.indices')

        ### external impact
        if 'applied_force' in self.opt['model'].keys():
            simuNode.createObject('BoxROI', name='forceBox', box=self.opt['model']['applied_force']['boxes'])
            self.appliedForce = simuNode.createObject('ConstantForceField', force=self.opt['model']['applied_force']['initial_force'], indices='@forceBox.indices')

        if 'applied_pressure' in self.opt['model'].keys():
            surface=simuNode.createChild('pressure')
            surface.createObject('MeshSTLLoader', name='sloader', filename=self.surfaceMeshFile)
            surface.createObject('TriangleSetTopologyContainer', position='@sloader.position', name='TriangleContainer', triangles='@sloader.triangles')
            surface.createObject('TriangleSetTopologyModifier', name='Modifier')
            surface.createObject('MechanicalObject', showIndices='false', name='mstate')
            self.appliedPressure = surface.createObject('TrianglePressureForceField', name='forceField', pressure=self.opt['model']['applied_pressure']['initial_pressure'], normal='0 0 1', showForces='1', dmin=0.199, dmax=0.201)
            surface.createObject('BarycentricMapping', name='bpmapping')

        if 'prescribed_displacement' in self.opt['model'].keys():
            simuNode.createObject('BoxROI', name='prescDispBox', box=self.opt['model']['prescribed_displacement']['boxes'])
            simuNode.createObject('RestShapeSpringForceField', name='toolSpring', stiffness=self.opt['model']['prescribed_displacement']['spring_stiffness'], springColor='0 1 0 1', drawMode='1', printLog='0', listening='1', external_rest_shape='/phant/MO', points='@prescDispBox.indices', external_points='@prescDispBox.indices')

        ### export data
        if self.saveData > 0:
            obsNode = simuNode.createChild('obsNode')
            obsNode.createObject('MeshVTKLoader', name='obsloader', filename=self.obsPoints)
            obsNode.createObject('MechanicalObject', src='@obsloader', name='MO')
            obsNode.createObject('BarycentricMapping')
            obsNode.createObject('BoxROI', name='observationBox', box='-1 -1 -1 1 1 1')
            obsNode.createObject('OptimMonitor', name='ObservationMonitor', indices='@observationBox.indices', fileName=self.obsFile, ExportPositions='1', ExportVelocities='0', ExportForces='0', printLog='0')
            obsNode.createObject('ShowSpheres', radius="0.002", color="1 0 0 1", position='@MO.position')

        if self.saveData > 1:
            obsNode = simuNode.createChild('errorNode')
            obsNode.createObject('RegularGrid', min=self.opt['model']['error_grid']['min'], max=self.opt['model']['error_grid']['max'], n=self.opt['model']['error_grid']['res'])
            obsNode.createObject('MechanicalObject', src='@obsloader', name='MO')
            obsNode.createObject('BarycentricMapping')
            obsNode.createObject('BoxROI', name='observationBox', box='-1 -1 -1 1 1 1')
            obsNode.createObject('OptimMonitor', name='ErrorMonitor', indices='@observationBox.indices', fileName=self.errFile, ExportPositions='1', ExportVelocities='0', ExportForces='0')
            obsNode.createObject('ShowSpheres', radius="0.0008", color="0.3 1 1 1", position='@MO.position')

        if self.saveData > 2:
            expField='youngMapper.outputValues'
            simuNode.createObject('VTKExporter', filename=self.geoFolder+'/object.vtk', XMLformat='0', listening='1', edges="0", triangles="0", quads="0", tetras="1", exportAtBegin="1", exportAtEnd="0", exportEveryNumberOfSteps="1", cellsDataFields=expField, printLog='0')

        ### add collision data
        if self.planeCollision:
            simuNode.createObject('PardisoConstraintCorrection', solverName='lsolver', schurSolverName='lsolver')
            surface=simuNode.createChild('collision')
            surface.createObject('MeshSTLLoader', name='sloader', filename=self.opt['model']['surf_mesh'])
            surface.createObject('TriangleSetTopologyContainer', position='@sloader.position', name='TriangleContainer', triangles='@sloader.triangles')
            surface.createObject('TriangleSetTopologyModifier', name='Modifier')
            surface.createObject('MechanicalObject', showIndices='false', name='mstate')
            surface.createObject('Triangle', color='1 0 0 1', group=0)
            surface.createObject('Line', color='1 0 0 1', group=0)
            surface.createObject('Point', color='1 0 0 1', group=0)
            surface.createObject('BarycentricMapping', name='bpmapping')
            floor = simuNode.createChild('floor')
            floor.createObject('RegularGrid', nx="2", ny="2", nz="2", xmin="-0.1", xmax="0.1",  ymin="-0.059", ymax="-0.061", zmin="0.0", zmax="0.3")
            floor.createObject('MechanicalObject', template="Vec3d")
            floor.createObject('Triangle',simulated="false", bothSide="true", contactFriction="0.00", color="1 0 0 1")
            floor.createObject('Line', simulated="false", bothSide="true", contactFriction="0.0")
            floor.createObject('Point', simulated="false", bothSide="true", contactFriction="0.0")

        return 0;


    def onBeginAnimationStep(self, deltaTime):
        ### modify external impact
        self.step += 1
        if 'applied_force' in self.opt['model'].keys():
            maxTS = self.opt['model']['applied_force']['num_inc_steps']
            delta = np.array(self.opt['model']['applied_force']['delta'])
            if self.step < maxTS:
                fc = np.array(self.appliedForce.findData('force').value)
                fc[0] += delta
                self.appliedForce.findData('force').value = fc.tolist()

        if 'applied_pressure' in self.opt['model'].keys():
            maxTS = self.opt['model']['applied_pressure']['num_inc_steps']
            maxWS = self.opt['model']['applied_pressure']['num_wait_steps']
            delta = np.array(self.opt['model']['applied_pressure']['delta'])
            self.waitStep -= 1
            if self.incStep < maxTS and self.waitStep == -1:
                press = np.array(self.appliedPressure.findData('pressure').value)
                press[0] += delta
                self.appliedPressure.findData('pressure').value = press.tolist()
                self.waitStep = maxWS
                self.incStep += 1

            if self.incStep == maxTS:
                print "Maximum pressure achieved!"
            else:
                print "Current incremental step: ",self.incStep," (", self.waitStep,")"

        return 0


    def initGraph(self, node):
        return 0;

    def storeResetState(self):
        return 0;

    def cleanup(self):
        if self.saveData > 0:
            print 'Data saved to '+self.mainFolder
        return 0;

    def onEndAnimationStep(self, deltaTime):
        return 0;

    def onLoaded(self, node):
        return 0;

    def reset(self):
        return 0;

    def bwdInitGraph(self, node):
        return 0;

    def onScriptEvent(self, senderNode, eventName, data):
        return 0;
