import Sofa
import math
import os
import sys
import csv
import yaml
import pprint
import time
import numpy as np
sys.path.append(os.getcwd() + '/../../python_src/utils')
from Argv2Options import argv2options

__file = __file__.replace('\\', '/') # windows


def createScene(rootNode):
    rootNode.createObject('RequiredPlugin', name='Python', pluginName='SofaPython')
    rootNode.createObject('RequiredPlugin', name='Optimus', pluginName='Optimus')

    try:
        sys.argv[0]
    except:
        commandLineArguments = []
    else:
        commandLineArguments = sys.argv

    if len(commandLineArguments) > 1:
        configFileName = commandLineArguments[1]
    else:
        print 'ERROR: Must supply a yaml config file as an argument!'
        return

    with open(configFileName, 'r') as stream:
        try:
            options = yaml.safe_load(stream)

        except yaml.YAMLError as exc:
            print(exc)
            return

    if len(commandLineArguments) > 2:
        options = argv2options(commandLineArguments[2:], options)

    if options['model']['int']['lin_type'] == 'Pardiso':
        rootNode.createObject('RequiredPlugin', name='Pardiso', pluginName='SofaPardisoSolver')

    AppStiff_SDA(rootNode, options)

    return 0;


class AppStiff_SDA(Sofa.PythonScriptController):

    def __init__(self, rootNode, opt):
        self.opt = opt

        pp = pprint.PrettyPrinter(indent=4)
        pp.pprint(opt)

        ### extract configuration data
        self.planeCollision = opt['model']['plane_collision']
        self.saveData = opt['io']['saveSdaData']
        self.volumeMeshFile = opt['model']['mesh_path'] + opt['model']['object'] + '_' + str(opt['model']['num_el_sda']) + '.vtk'
        self.surfaceMeshFile = opt['model']['mesh_path'] + opt['model']['object'] + '_' + str(opt['model']['num_el_sda']) + '.stl'
        self.obsPoints = opt['model']['mesh_path'] + opt['model']['object'] + '_' + opt['model']['obs_id'] + '.vtk'

        object = opt['model']['object']
        if self.planeCollision:
            object = object + 'plane_'

        self.excitation = ''
        if 'applied_force' in self.opt['model'].keys():
            self.excitation = 'force'
        elif 'applied_pressure' in self.opt['model'].keys():
            self.excitation = 'press'
        elif 'prescribed_displacement' in self.opt['model'].keys():
            self.excitation = 'displ'

        ### generate output folders
        self.mainFolder = object + '_' + str(opt['model']['num_el']) + '_' + self.excitation + '_' + opt['model']['obs_id'] + '_' + opt['model']['fem']['method'] + '_' +  opt['model']['int']['type'] + str(opt['model']['int']['maxit']) + str(opt['io']['suffix'])

        print 'Reading observations from ',self.mainFolder
        self.obsFile = self.mainFolder + '/observations'

        if self.saveData > 0:
            self.sdaFolder = self.mainFolder + '/' + opt['filter']['kind'] + '_' + str(opt['model']['num_el_sda']) + opt['io']['sdaSuffix']

            stamp='_'+str(int(time.time()))
            os.system('mkdir -p '+self.mainFolder+' /arch')
            os.system('mv --backup -S '+stamp+' '+self.sdaFolder+' '+self.mainFolder+'/arch')
            os.system('mkdir -p '+self.sdaFolder)
            self.stateExpFile=self.sdaFolder+'/state.txt'
            self.stateVarFile=self.sdaFolder+'/variance.txt'
            self.stateCovarFile=self.sdaFolder+'/covariance.txt'

            ### create file with parameters and additional information
            self.opt['visual_parameters'] = {}
            self.opt['visual_parameters']['state_file_name'] = self.stateExpFile[self.stateExpFile.rfind('/') + 1:]
            self.opt['visual_parameters']['variance_file_name'] = self.stateVarFile[self.stateVarFile.rfind('/') + 1:]
            self.opt['visual_parameters']['covariance_file_name'] = self.stateCovarFile[self.stateCovarFile.rfind('/') + 1:]
            self.informationFileName = self.sdaFolder + '/daconfig.yml'
            with open(self.informationFileName, 'w') as stream:
                try:
                    yaml.dump(self.opt, stream, default_flow_style=False)
                except yaml.YAMLError as exc:
                    print(exc)

        if self.saveData > 1:
            self.errFile = self.sdaFolder + '/grid_points'

        if self.saveData > 2:
            self.geoFolder = self.sdaFolder + '/VTK'
            os.system('mkdir -p '+self.geoFolder)

        self.createGraph(rootNode)
        if opt['time']['time_profiling']:
            self.createTimeProfiler()

        return


    def createGraph(self, rootNode):
        ### scene global stuff
        self.step = 0
        self.waitStep = 0
        self.incStep = 0
        self.rootNode = rootNode
        self.iterations = 0

        rootNode.findData('dt').value = self.opt['model']['dt']
        rootNode.findData('gravity').value = self.opt['model']['gravity']

        rootNode.createObject('ViewerSetting', cameraMode='Perspective', resolution='1000 700', objectPickingMethod='Ray casting')
        rootNode.createObject('VisualStyle', name='VisualStyle', displayFlags='showBehaviorModels showForceFields showCollisionModels hideVisualModels')

        rootNode.createObject('FilteringAnimationLoop', name="StochAnimLoop", verbose="1", printLog='1')

        ### filter data
        self.filterKind = self.opt['filter']['kind']
        if self.filterKind == 'ROUKF':
            self.filter = rootNode.createObject('ROUKFilter', name="ROUKF", verbose="1", useBlasToMultiply='1', sigmaTopology=self.opt['filter']['sigma_points_topology'])
            estimatePosition = 1
        elif self.filterKind == 'UKFSimCorr':
            self.filter = rootNode.createObject('UKFilterSimCorr', name="UKFSC", verbose="1", sigmaTopology=self.opt['filter']['sigma_points_topology'])
            estimatePosition = 0
        elif self.filterKind == 'UKFClassic':
            self.filter = rootNode.createObject('UKFilterClassic', name="UKFClas", printLog='1', verbose="1", sigmaTopology=self.opt['filter']['sigma_points_topology'], exportPrefix=self.sdaFolder)
            estimatePosition = 1

        ### object loader
        rootNode.createObject('MeshVTKLoader', name='loader', filename=self.volumeMeshFile)
        rootNode.createObject('MeshSTLLoader', name='sloader', filename=self.surfaceMeshFile)

        ### general node
        modelNode = rootNode.createChild('ModelNode')

        ### collision handler
        if self.planeCollision == 1:
            modelNode.createObject('GenericConstraintSolver', maxIterations='1000', tolerance='1e-6', printLog='0', allVerified='0')
            modelNode.createObject('CollisionPipeline', depth="6", verbose="0", draw="0")
            modelNode.createObject('BruteForceDetection', name="N2")
            modelNode.createObject('LocalMinDistance', name="Proximity",  alarmDistance='0.002', contactDistance='0.001',  angleCone='90.0', filterIntersection='0')
            modelNode.createObject('DefaultContactManager', name="Response", response="FrictionContact", responseParams='mu=0')

        ### node to generate external displacement
        if 'prescribed_displacement' in self.opt['model'].keys():
            phant = modelNode.createChild('phant')
            phant.createObject('PreStochasticWrapper')
            phant.createObject('MeshVTKLoader', name='loader', filename=self.volumeMeshFile)
            phant.createObject('MechanicalObject', name='MO', src='@loader')
            phant.createObject('Mesh', src='@loader')
            phant.createObject('LinearMotionStateController', keyTimes=self.opt['model']['prescribed_displacement']['times'], keyDisplacements=self.opt['model']['prescribed_displacement']['displ'])
            phant.createObject('ShowSpheres', position='@MO.position', color='0 0 1 1', radius='0.001')
            # phant.createObject('VTKExporterDA', filename=self.geoFolder+'/objectPhant.vtk', XMLformat='0', listening='1', edges="0", triangles="0", quads="0", tetras="1", exportAtBegin="1", exportAtEnd="0", exportEveryNumberOfSteps="1", printLog='0')

        ### object node
        simuNode=modelNode.createChild('cylinder')

        if self.filterKind == 'UKFClassic':
        	posP0=self.opt['filter']['posP0']
        	posQ=self.opt['filter']['posQ']
        	paramQ=self.opt['filter']['paramQ']
        	simuNode.createObject('StochasticStateWrapper',name="StateWrapper",verbose='1', printLog='1', langrangeMultipliers=self.planeCollision, estimatePosition=estimatePosition, estimateVelocity='0', draw='1', radiusDraw='0.0002', posModelStdev=posQ, paramModelStdev=paramQ, positionStdev=posP0)
        else:
        	simuNode.createObject('StochasticStateWrapper',name="StateWrapper",verbose='1', printLog='1', langrangeMultipliers=self.planeCollision, estimatePosition=estimatePosition, estimateVelocity='0', draw='1', radiusDraw='0.0002')

        ### solvers
        intType = self.opt['model']['int']['type']
        if intType == 'Euler':
            firstOrder = self.opt['model']['int']['first_order']
            rmass = self.opt['model']['int']['rmass']
            rstiff = self.opt['model']['int']['rstiff']
            simuNode.createObject('EulerImplicitSolver', firstOrder=firstOrder, rayleighStiffness=rstiff, rayleighMass=rmass)
        elif intType == 'Newton':
            maxIt = self.opt['model']['int']['maxit']
            simuNode.createObject('StaticSolver', name="NewtonStatic", correction_tolerance_threshold="1e-8", residual_tolerance_threshold="1e-8", should_diverge_when_residual_is_growing="1",  newton_iterations=maxIt, printLog=self.opt['model']['int']['verbose'])
        else:
            print 'Unknown solver type!'

        linType = self.opt['model']['int']['lin_type']
        if linType == 'Pardiso':
            simuNode.createObject('SparsePARDISOSolver', name='lsolver', verbose='0', pardisoSchurComplement=self.planeCollision, symmetric=self.opt['model']['linsol']['pardisoSym'], exportDataToFolder=self.opt['model']['linsol']['pardisoFolder'])
        elif linType == 'CG':
            simuNode.createObject('CGLinearSolver', name='lsolverit', tolerance='1e-10', threshold='1e-10', iterations='500', verbose='0')
            if self.opt['model']['linsol']['usePCG']:
                simuNode.createObject('StepPCGLinearSolver', name='lsolverit', precondOnTimeStep='1', use_precond='1', tolerance='1e-10', iterations='500', verbose='1', listening='1', update_step=self.opt['model']['linsol']['PCGUpdateSteps'], preconditioners='lsolver')
        else:
            print 'Unknown linear solver type!'

        ### mechanical object
        simuNode.createObject('MechanicalObject', src="@/loader", name="Volume")
        simuNode.createObject('TetrahedronSetTopologyContainer', name="Container", src="@/loader", tags=" ")
        simuNode.createObject('TetrahedronSetTopologyModifier', name="Modifier")
        simuNode.createObject('TetrahedronSetTopologyAlgorithms', name="TopoAlgo")
        simuNode.createObject('TetrahedronSetGeometryAlgorithms', name="GeomAlgo")

        if 'total_mass' in self.opt['model'].keys():
            simuNode.createObject('UniformMass', totalMass=self.opt['model']['total_mass'])

        if 'density' in self.opt['model'].keys():
            simuNode.createObject('MeshMatrixMass', printMass='0', lumping='1', massDensity=self.opt['model']['density'], name='mass')

        ### estimate material properties
        simuNode.createObject('OptimParams', name="paramE", optimize="1", template="Vector",
            numParams=self.opt['filter']['nparams'], transformParams=self.opt['filter']['param_transform'],
            initValue=self.opt['filter']['param_init_exval'], stdev=self.opt['filter']['param_init_stdev'],
            minValue=self.opt['filter']['param_min_val'], maxValue=self.opt['filter']['param_max_val'])

        youngModuli=self.opt['model']['fem']['young_modulus']
        poissonRatio = self.opt['model']['fem']['poisson_ratio']
        indices = [1] # range(1, len(youngModuli)+1)
        method = self.opt['model']['fem']['method']
        if  method[0:3] == 'Cor':
            simuNode.createObject('Indices2ValuesMapper', indices=indices, values='@paramE.value', name='youngMapper', inputValues='@loader.dataset')
            simuNode.createObject('TetrahedronFEMForceField', name='FEM', method=method[3:].lower(), listening='true', drawHeterogeneousTetra='1', poissonRatio=poissonRatio, youngModulus='@youngMapper.outputValues', updateStiffness='1')
        elif method == 'StVenant':
            poissonRatii = poissonRatio * np.ones([1,len(youngModuli)])
            simuNode.createObject('Indices2ValuesTransformer', name='paramMapper', indices=indices, values1='@paramE.value', values2=poissonRatii, inputValues='@loader.dataset', transformation='ENu2MuLambda')
            simuNode.createObject('TetrahedralTotalLagrangianForceField', name='FEM', materialName='StVenantKirchhoff', ParameterSet='@paramMapper.outputValues', drawHeterogeneousTetra='1')

        ### boundary conditions
        simuNode.createObject('BoxROI', box=self.opt['model']['bc']['boxes'], name='fixedBox')
        simuNode.createObject('FixedConstraint', indices='@fixedBox.indices')

        ### external impact
        if 'applied_force' in self.opt['model'].keys():
            simuNode.createObject('BoxROI', name='forceBox', box=self.opt['model']['applied_force']['boxes'])
            self.appliedForce = simuNode.createObject('ConstantForceField', force=self.opt['model']['applied_force']['initial_force'], indices='@forceBox.indices')

        if 'applied_pressure' in self.opt['model'].keys():
            surface=simuNode.createChild('pressure')
            surface.createObject('TriangleSetTopologyContainer', position='@/sloader.position', name='TriangleContainer', triangles='@/sloader.triangles')
            surface.createObject('TriangleSetTopologyModifier', name='Modifier')
            surface.createObject('MechanicalObject', showIndices='false', name='mstate', src='@sloader')
            self.appliedPressure = surface.createObject('TrianglePressureForceField', name='forceField', pressure=self.opt['model']['applied_pressure']['initial_pressure'], normal='0 0 1', showForces='1', dmin=0.199, dmax=0.201)
            surface.createObject('BarycentricMapping', name='bpmapping')

        if 'prescribed_displacement' in self.opt['model'].keys():
            simuNode.createObject('BoxROI', name='prescDispBox', box=self.opt['model']['prescribed_displacement']['boxes'])
            simuNode.createObject('RestShapeSpringForceField', name='toolSpring', stiffness=self.opt['model']['prescribed_displacement']['spring_stiffness'], springColor='0 1 0 1', drawMode='1', printLog='0', listening='1', external_rest_shape='../phant/MO', points='@prescDispBox.indices', external_points='@prescDispBox.indices', showIndicesScale=0.0)

        ### node with groundtruth observations
        obsNode = simuNode.createChild('observations')
        obsNode.createObject('MeshVTKLoader', name='obsloader', filename=self.obsPoints)
        obsNode.createObject('MechanicalObject', name='SourceMO', position='@obsloader.position')
        obsNode.createObject('VTKExporter', name='temporaryExporter', filename='tempObs.vtk', XMLformat='0', listening='1', edges="0", triangles="0", quads="0", tetras="0", exportAtBegin="1", exportAtEnd="0", exportEveryNumberOfSteps="0", position='@SourceMO.position')
        obsNode.createObject('BarycentricMapping')
        obsNode.createObject('MappedStateObservationManager', name="MOBS", listening="1", stateWrapper="@../StateWrapper", verbose="1", observationStdev=self.opt['filter']['observ_stdev'], noiseStdev=self.opt['filter']['obs_added_noise_var'], doNotMapObservations='1')
        obsNode.createObject('SimulatedStateObservationSource', name="ObsSource", monitorPrefix=self.obsFile)
        obsNode.createObject('ShowSpheres', radius="0.002", color="1 0 0 1", position='@SourceMO.position')
        obsNode.createObject('ShowSpheres', radius="0.0015", color="1 1 0 1", position='@MOBS.mappedObservations')

        ### export data
        if self.saveData > 1:
            obsNode = simuNode.createChild('errorNode')
            obsNode.createObject('RegularGrid', min=self.opt['model']['error_grid']['min'], max=self.opt['model']['error_grid']['max'], n=self.opt['model']['error_grid']['res'])
            obsNode.createObject('MechanicalObject', src='@obsloader', name='MO')
            obsNode.createObject('BarycentricMapping')
            obsNode.createObject('BoxROI', name='observationBox', box='-1 -1 -1 1 1 1')
            obsNode.createObject('OptimMonitor', name='ObservationMonitor', indices='@observationBox.indices', fileName=self.errFile, ExportPositions='1', ExportVelocities='0', ExportForces='0',  exportOnEvent='2', printLog='0')
            obsNode.createObject('ShowSpheres', radius="0.0008", color="0.3 1 1 1", position='@MO.position')

        if self.saveData > 2:
            simuNode.createObject('VTKExporterDA', filename=self.geoFolder+'/object.vtk', XMLformat='0', listening='1', edges="0", triangles="0", quads="0", tetras="1", exportAtBegin="1", exportAtEnd="0", exportEveryNumberOfSteps="1", printLog='0')

        ### process collision data
        if self.planeCollision == 1:
            # simuNode.createObject('LinearSolverConstraintCorrection')
            simuNode.createObject('PardisoConstraintCorrection', solverName='lsolver', schurSolverName='lsolver')
            surface=simuNode.createChild('collision')
            surface.createObject('TriangleSetTopologyContainer', position='@/sloader.position', name='TriangleContainer', triangles='@/sloader.triangles')
            surface.createObject('TriangleSetTopologyModifier', name='Modifier')
            surface.createObject('MechanicalObject', showIndices='false', name='mstate')
            surface.createObject('Triangle', color='1 0 0 1', group=0)
            surface.createObject('Line', color='1 0 0 1', group=0)
            surface.createObject('Point', color='1 0 0 1', group=0)
            surface.createObject('BarycentricMapping', name='bpmapping')
            floor = modelNode.createChild('floor')
            floor.createObject('RegularGrid', nx="2", ny="2", nz="2", xmin="-0.1", xmax="0.1",  ymin="-0.059", ymax="-0.061", zmin="0.0", zmax="0.3")
            floor.createObject('MechanicalObject', template="Vec3d")
            floor.createObject('Triangle',simulated="false", bothSide="true", contactFriction="0.00", color="1 1 0 1")
            floor.createObject('Line', simulated="false", bothSide="true", contactFriction="0.0", color="1 1 0 1")
            floor.createObject('Point', simulated="false", bothSide="true", contactFriction="0.0", color="1 1 0 1")

        return 0


    def createTimeProfiler(self):
        print 'Time statistics file: ' + self.sdaFolder + '/' + self.opt['time']['time_statistics_file']
        Sofa.timerSetInterval(self.opt['time']['timer_name'], self.opt['time']['iterations_interval'])    ### Set the number of steps neded to compute the timer
        Sofa.timerSetOutputType(self.opt['time']['timer_name'], 'json')    ### Set output file format
        with open(self.sdaFolder + '/' + self.opt['time']['time_statistics_file'], "a") as outputFile:
            outputFile.write('{')
            outputFile.close()

        return 0


    def initGraph(self, node):
        return 0

    def bwdInitGraph(self, node):
    	self.exportStochasticState()
    	return 0

    def onBeginAnimationStep(self, deltaTime):
        self.step += 1
        if 'applied_force' in self.opt['model'].keys():
            maxTS = self.opt['model']['applied_force']['num_inc_steps']
            delta = np.array(self.opt['model']['applied_force']['delta'])
            if self.step < maxTS:
                fc = np.array(self.appliedForce.findData('force').value)
                fc[0] += delta
                self.appliedForce.findData('force').value = fc.tolist()

        if 'applied_pressure' in self.opt['model'].keys():
            maxTS = self.opt['model']['applied_pressure']['num_inc_steps']
            maxWS = self.opt['model']['applied_pressure']['num_wait_steps']
            delta = np.array(self.opt['model']['applied_pressure']['delta'])
            self.waitStep -= 1
            if self.incStep < maxTS and self.waitStep == -1:
                press = np.array(self.appliedPressure.findData('pressure').value)
                press[0] += delta
                self.appliedPressure.findData('pressure').value = press.tolist()
                self.waitStep = maxWS
                self.incStep += 1

            if self.incStep == maxTS:
                print "Maximum pressure achieved!"
            else:
                print "Current incremental step: ",self.incStep," (", self.waitStep,")"

        return 0


    def onEndAnimationStep(self, deltaTime):
        self.iterations = self.iterations + 1
        self.exportStochasticState()
        self.saveTimeStatistics()
        # print self.basePoints.findData('indices_position').value

        return 0


    def saveTimeStatistics(self):
        if self.opt['time']['time_profiling']:
            if self.iterations <= self.opt['time']['iteration_amount']:
                result = Sofa.timerEnd(self.opt['time']['timer_name'], self.rootNode)
                if result != None :
                    with open(self.sdaFolder + '/' + self.opt['time']['time_statistics_file'], "a") as outputFile:
                        outputFile.write(result + ",")
                        outputFile.close()
            ### replace last symbol
            if self.iterations == self.opt['time']['iteration_amount']:
                with open(self.sdaFolder + '/' + self.opt['time']['time_statistics_file'], "a") as outputFile:
                    outputFile.seek(-1, os.SEEK_END)
                    outputFile.truncate()
                    outputFile.write("\n}")
                    outputFile.close()

        return 0


    def exportStochasticState(self):
    	if self.saveData > 0:
            stateName = 'reducedState' if self.filterKind == 'ROUKF' else 'state'
            varName = 'reducedVariance' if self.filterKind == 'ROUKF' else 'variance'
            covarName = 'reducedCovariance' if self.filterKind == 'ROUKF' else 'covariance'

            rs=self.filter.findData(stateName).value
            state = [val for sublist in rs for val in sublist]
            print 'State:', state
            # print reducedState

            f1 = open(self.stateExpFile, "a")
            f1.write(" ".join(map(lambda x: str(x), state)))
            f1.write('\n')
            f1.close()

            rv=self.filter.findData(varName).value
            variance = [val for sublist in rv for val in sublist]
            print 'Stdev: ', np.sqrt(variance)
            # print 'Reduced variance:'
            # print reducedVariance

            f2 = open(self.stateVarFile, "a")
            f2.write(" ".join(map(lambda x: str(x), variance)))
            f2.write('\n')
            f2.close()

            rcv=self.filter.findData(covarName).value
            covariance = [val for sublist in rcv for val in sublist]
            # print 'Covariance:', covariance
            estStd = np.sqrt(variance)
            # print 'Correlation: ',covariance[0]/(np.prod(estStd))

            f3 = open(self.stateCovarFile, "a")
            f3.write(" ".join(map(lambda x: str(x), covariance)))
            f3.write('\n')
            f3.close()

            return

    def cleanup(self):
        if self.saveData > 0:
            print 'Estimations saved to '+self.sdaFolder
        return 0;

    def onScriptEvent(self, senderNode, eventName, data):
        return 0;
