import Sofa
import math
import os
import sys
import csv
import yaml
import pprint
import numpy as np

__file = __file__.replace('\\', '/') # windows

def argv2options(argv, options): # loads values from command line arguments into the options dictionary. syntax: runSofa file.py --argv file.yml key [key...] value key [key...] value ...
                                 # the different values are concatenated and loaded into options[io][suffix]
    i = 0
    suffix = ''
    while i < len(argv):
        suffix = suffix +  '_'
        if argv[i] in options:
            key0 = argv[i]
            if argv[i+1] in options[key0]:
                key1 = argv[i+1]
                if argv[i+2] in options[key0][key1]:
                    key2 = argv[i+2]
                    options[key0][key1][key2] = argv[i+3]
                    suffix = suffix + argv[i+3]
                    i = i + 4
                else:
                    options[key0][key1] = argv[i+2]
                    suffix = suffix + argv[i+2]
                    i = i + 3
            else:
                options[key0] = argv[i+1]
                suffix = suffix + argv[i+1]
                i = i + 2
        else:
            print ('key needed')
            return

    options['io']['suffix'] = suffix
    print('suffix', suffix)
    return options

def createScene(rootNode):
    rootNode.createObject('RequiredPlugin', name='Optimus', pluginName='Optimus')
    rootNode.createObject('RequiredPlugin', name='Pardiso', pluginName='SofaPardisoSolver')
    rootNode.createObject('RequiredPlugin', name='IMAUX', pluginName='ImageMeshAux')
    # rootNode.createObject('RequiredPlugin', name='MJED', pluginName='SofaMJEDFEM')

    try :
        sys.argv[0]
    except :
        commandLineArguments = []
    else :
        commandLineArguments = sys.argv


    if len(commandLineArguments) > 1:
        configFileName = commandLineArguments[1]
    else:
        print 'ERROR: Must supply a yaml config file as an argument!'
        return


    with open(configFileName, 'r') as stream:
        try:
            options = yaml.load(stream)

        except yaml.YAMLError as exc:
            print(exc)
            return

    if len(commandLineArguments) > 4:
        delta = [0.,float(commandLineArguments[2]),float(commandLineArguments[3])]
        options['model']['applied_pressure']['delta'] = delta
        options['model']['applied_pressure']['num_wait_steps'] = int(commandLineArguments[4])
        options['io']['suffix'] = 'p-'+commandLineArguments[2]+'_'+commandLineArguments[3]+'-50-'+commandLineArguments[4]

    AppStiff_SDA(rootNode, options)

    return 0;


class AppStiff_SDA(Sofa.PythonScriptController):

    def __init__(self, rootNode, opt):
        self.opt = opt

        pp = pprint.PrettyPrinter(indent=4)
        pp.pprint(opt)

        self.planeCollision = opt['model']['plane_collision']
        self.saveEst = opt['io']['saveEst']
        self.saveGeo = opt["io"]["saveGeo"]
        self.meshFile = opt['model']['mesh_path'] + opt['model']['object'] + '_' + str(opt['model']['num_el_sda'])
        self.obsPoints = opt['model']['mesh_path'] + opt['model']['object'] + '_' + opt['model']['obs_id'] + '.vtk'

        object = opt['model']['object']
        if self.planeCollision:
            object = object + 'plane_'

        self.excitation = ''
        if 'applied_force' in self.opt['model'].keys():
            self.excitation = 'force'
        elif 'applied_pressure' in self.opt['model'].keys():
            self.excitation = 'press'
        elif 'prescribed_displacement' in self.opt['model'].keys():
            self.excitation = 'displ'


        self.mainFolder = object + '_' + str(opt['model']['num_el']) + '_' + self.excitation + '_' + opt['model']['obs_id'] + '_' + opt['model']['fem']['method'] + '_' +  opt['model']['int']['type'] + str(opt['model']['int']['maxit']) + '_' + str(opt['io']['suffix'])

        print 'Reading observations from ',self.mainFolder
        self.obsFile = self.mainFolder + '/obs'
        self.estFolder = self.mainFolder + '/' + opt['filter']['kind'] + '_' + str(opt['model']['num_el_sda']) + '_' + opt['io']['sdaFolderSuffix']

        if self.saveEst:
            os.system('mv '+self.estFolder+' '+self.estFolder+'_arch')
            os.system('mkdir '+self.estFolder)

            self.stateExpFile=self.estFolder+'/state.txt'
            self.stateVarFile=self.estFolder+'/variance.txt'
            self.stateCovarFile=self.estFolder+'/covariance.txt'
            os.system('rm '+self.stateExpFile)
            os.system('rm '+self.stateVarFile)
            os.system('rm '+self.stateCovarFile)

            # create file with parameters and additional information
            self.opt['visual_parameters'] = {}
            self.opt['visual_parameters']['state_file_name'] = self.stateExpFile[self.stateExpFile.rfind('/') + 1:]
            self.opt['visual_parameters']['variance_file_name'] = self.stateVarFile[self.stateVarFile.rfind('/') + 1:]
            self.opt['visual_parameters']['covariance_file_name'] = self.stateCovarFile[self.stateCovarFile.rfind('/') + 1:]
            self.informationFileName = self.estFolder + '/daconfig.yml'
            with open(self.informationFileName, 'w') as stream:
                try:
                    yaml.dump(self.opt, stream, default_flow_style=False)
                except yaml.YAMLError as exc:
                    print(exc)

        if self.saveGeo:
            self.geoFolder = self.estFolder + '/VTK'
            os.system('mkdir -p '+self.geoFolder)


        self.createGraph(rootNode)
        if opt['time']['time_profiling']:
            self.createTimeProfiler()

        return

    def createGraph(self,rootNode):
        self.step = 0
        self.waitStep = 0
        self.incStep = 0
        self.rootNode=rootNode
        self.iterations = 0

        rootNode.findData('dt').value = self.opt['model']['dt']
        rootNode.findData('gravity').value = self.opt['model']['gravity']

        #rootNode.createObject('ViewerSetting', cameraMode='Perspective', resolution='1000 700', objectPickingMethod='Ray casting')
        rootNode.createObject('VisualStyle', name='VisualStyle', displayFlags='showBehaviorModels showForceFields showCollisionModels hideVisualModels')

        rootNode.createObject('FilteringAnimationLoop', name="StochAnimLoop", verbose="1", printLog='1')

        self.filterKind = self.opt['filter']['kind']
        if self.filterKind == 'ROUKF':
            self.filter = rootNode.createObject('ROUKFilter', name="ROUKF", verbose="1", useBlasToMultiply='1', sigmaTopology=self.opt['filter']['sigma_points_topology'])
            estimatePosition = 1
        elif self.filterKind == 'UKFSimCorr':
            self.filter = rootNode.createObject('UKFilterSimCorr', name="UKFSC", verbose="1", sigmaTopology=self.opt['filter']['sigma_points_topology'])
            estimatePosition = 0
        elif self.filterKind == 'UKFClassic':
            self.filter = rootNode.createObject('UKFilterClassic', name="UKFClas", printLog='1', verbose="1", sigmaTopology=self.opt['filter']['sigma_points_topology'], exportPrefix=self.estFolder)
            estimatePosition = 1

        rootNode.createObject('MeshVTKLoader', name='loader', filename=self.meshFile+'.vtk')
        rootNode.createObject('MeshSTLLoader', name='sloader', filename=self.meshFile+'.stl')

        # /ModelNode
        modelNode=rootNode.createChild('ModelNode')

        if self.planeCollision == 1:
            modelNode.createObject('GenericConstraintSolver', maxIterations='1000', tolerance='1e-6', printLog='0', allVerified='0')
            modelNode.createObject('CollisionPipeline', depth="6", verbose="0", draw="0")
            modelNode.createObject('BruteForceDetection', name="N2")
            modelNode.createObject('LocalMinDistance', name="Proximity",  alarmDistance='0.002', contactDistance='0.001',  angleCone='90.0', filterIntersection='0')
            modelNode.createObject('DefaultContactManager', name="Response", response="FrictionContact", responseParams='mu=0')

        if 'prescribed_displacement' in self.opt['model'].keys():
            phant = modelNode.createChild('phant')
            phant.createObject('PreStochasticWrapper')
            phant.createObject('MeshVTKLoader', name='loader', filename=self.meshFile+'.vtk')
            phant.createObject('MechanicalObject', name='MO', src='@loader')
            phant.createObject('Mesh', src='@loader')
            phant.createObject('LinearMotionStateController', keyTimes=self.opt['model']['prescribed_displacement']['times'], keyDisplacements=self.opt['model']['prescribed_displacement']['displ'])
            phant.createObject('ShowSpheres', position='@MO.position', color='0 0 1 1', radius='0.001')
            # phant.createObject('VTKExporterDA', filename=self.geoFolder+'/objectPhant.vtk', XMLformat='0',listening='1',edges="0",triangles="0",quads="0",tetras="1",
            #     exportAtBegin="1", exportAtEnd="0", exportEveryNumberOfSteps="1", printLog='0')


        # /ModelNode/cylinder
        simuNode=modelNode.createChild('cylinder')

        if self.filterKind == 'UKFClassic':
        	posP0=self.opt['filter']['posP0']
        	posQ=self.opt['filter']['posQ']
        	paramQ=self.opt['filter']['paramQ']
        	simuNode.createObject('StochasticStateWrapper',name="StateWrapper",verbose='1', printLog='1',
        		langrangeMultipliers=self.planeCollision, estimatePosition=estimatePosition, estimateVelocity='0', draw='1', radiusDraw='0.0002',
        		posModelStdev=posQ, paramModelStdev=paramQ, positionStdev=posP0)
        else:
        	simuNode.createObject('StochasticStateWrapper',name="StateWrapper",verbose='1', printLog='1',
        		langrangeMultipliers=self.planeCollision, estimatePosition=estimatePosition, estimateVelocity='0', draw='1', radiusDraw='0.0002', )

        intType = self.opt['model']['int']['type']
        if intType == 'Euler':
            firstOrder = self.opt['model']['int']['first_order']
            rmass = self.opt['model']['int']['rmass']
            rstiff = self.opt['model']['int']['rstiff']
            simuNode.createObject('EulerImplicitSolver', firstOrder=firstOrder, rayleighStiffness=rstiff, rayleighMass=rmass)
        elif intType == 'Newton':
            maxIt = self.opt['model']['int']['maxit']
            simuNode.createObject('NewtonStaticSolver', maxIt=maxIt, correctionTolerance='1e-8', residualTolerance='1e-8', convergeOnResidual='1', printLog=self.opt['model']['int']['verbose'])


        if self.opt['model']['linsol']['usePCG']:
            simuNode.createObject('StepPCGLinearSolver', name='lsolverit', precondOnTimeStep='1', use_precond='1', tolerance='1e-10', iterations='500',
                verbose='1', listening='1', update_step=self.opt['model']['linsol']['PCGUpdateSteps'], preconditioners='lsolver')

        simuNode.createObject('SparsePARDISOSolver', name='lsolver', verbose='0', pardisoSchurComplement=self.planeCollision,
            symmetric=self.opt['model']['linsol']['pardisoSym'], exportDataToFolder=self.opt['model']['linsol']['pardisoFolder'])

        simuNode.createObject('MechanicalObject', src="@/loader", name="Volume")
        simuNode.createObject('BoxROI', box=self.opt['model']['bc']['boxes'], name='fixedBox')
        simuNode.createObject('FixedConstraint', indices='@fixedBox.indices')
        simuNode.createObject('TetrahedronSetTopologyContainer', name="Container", src="@/loader", tags=" ")
        simuNode.createObject('TetrahedronSetTopologyModifier', name="Modifier")
        simuNode.createObject('TetrahedronSetTopologyAlgorithms', name="TopoAlgo")
        simuNode.createObject('TetrahedronSetGeometryAlgorithms', name="GeomAlgo")
        # simuNode.createObject('ShowSpheres', position='@Volume.position', color='0 1 0 1', radius='0.001')

        if 'total_mass' in self.opt['model'].keys():
            simuNode.createObject('UniformMass', totalMass=self.opt['model']['total_mass'])

        if 'density' in self.opt['model'].keys():
            simuNode.createObject('MeshMatrixMass', printMass='0', lumping='1', massDensity=self.opt['model']['density'], name='mass')

        # physics forcefield
        simuNode.createObject('OptimParams', name="paramE", optimize="1", template="Vector",
            numParams=self.opt['filter']['nparams'], transformParams=self.opt['filter']['param_transform'],
            initValue=self.opt['filter']['param_init_exval'], stdev=self.opt['filter']['param_init_stdev'],
            minValue=self.opt['filter']['param_min_val'], maxValue=self.opt['filter']['param_max_val'])

        youngModuli=self.opt['model']['young_modulus']
        poissonRatio = self.opt['model']['poisson_ratio']
        indices = [1] # range(1, len(youngModuli)+1)
        method = self.opt['model']['fem']['method']
        if  method[0:3] == 'Cor':
            simuNode.createObject('Indices2ValuesMapper', indices=indices, values='@paramE.value', name='youngMapper', inputValues='@loader.dataset')
            simuNode.createObject('TetrahedronFEMForceField', name='FEM', method=method[3:].lower(), listening='true', drawHeterogeneousTetra='1',
                poissonRatio=poissonRatio, youngModulus='@youngMapper.outputValues', updateStiffness='1')
        elif method == 'StVenant':
            poissonRatii = poissonRatio * np.ones([1,len(youngModuli)])
            simuNode.createObject('Indices2ValuesTransformer', name='paramMapper', indices=indices,
                values1='@paramE.value', values2=poissonRatii, inputValues='@loader.dataset', transformation='ENu2MuLambda')
            simuNode.createObject('TetrahedralTotalLagrangianForceField', name='FEM', materialName='StVenantKirchhoff', ParameterSet='@paramMapper.outputValues', drawHeterogeneousTetra='1')

        # excitations
        if 'applied_force' in self.opt['model'].keys():
            simuNode.createObject('BoxROI', name='forceBox', box=self.opt['model']['applied_force']['boxes'])
            self.appliedForce = simuNode.createObject('ConstantForceField', force=self.opt['model']['applied_force']['initial_force'], indices='@forceBox.indices')

        if 'applied_pressure' in self.opt['model'].keys():
            surface=simuNode.createChild('pressure')
            surface.createObject('MeshSTLLoader', name='sloader', filename=self.meshFile+'.stl')
            surface.createObject('TriangleSetTopologyContainer', position='@sloader.position', name='TriangleContainer', triangles='@sloader.triangles')
            surface.createObject('TriangleSetTopologyModifier', name='Modifier')
            surface.createObject('MechanicalObject', showIndices='false', name='mstate')
            self.appliedPressure = surface.createObject('TrianglePressureForceField', pressure=self.opt['model']['applied_pressure']['initial_pressure'],
                                                     name='forceField', normal='0 0 1', showForces='1', dmin=0.199, dmax=0.201)
            surface.createObject('BarycentricMapping', name='bpmapping')

        if 'prescribed_displacement' in self.opt['model'].keys():
            simuNode.createObject('BoxROI', name='prescDispBox', box=self.opt['model']['prescribed_displacement']['boxes'])
            simuNode.createObject('ExtendedRestShapeSpringForceField', numStepsSpringOn='10000', stiffness=self.opt['model']['prescribed_displacement']['spring_stiffness'], name='toolSpring',
                springColor='0 1 0 1', drawSpring='1', updateStiffness='1', printLog='0', listening='1', angularStiffness='0', startTimeSpringOn='0',
                external_rest_shape='../phant/MO', points='@prescDispBox.indices', external_points='@prescDispBox.indices', springThickness=4, showIndicesScale=0.0)

        # export
        if self.saveGeo:
            simuNode.createObject('VTKExporterDA', filename=self.geoFolder+'/object.vtk', XMLformat='0',listening='1',edges="0",triangles="0",quads="0",tetras="1",
                exportAtBegin="1", exportAtEnd="0", exportEveryNumberOfSteps="1", printLog='0')


        if self.planeCollision == 1:
            # simuNode.createObject('LinearSolverConstraintCorrection')
            simuNode.createObject('PardisoConstraintCorrection', solverName='lsolver', schurSolverName='lsolver')

        # /ModelNode/cylinder/collision
        if self.planeCollision == 1:
            surface=simuNode.createChild('collision')
            surface.createObject('TriangleSetTopologyContainer', position='@/sloader.position', name='TriangleContainer', triangles='@/sloader.triangles')
            surface.createObject('TriangleSetTopologyModifier', name='Modifier')
            surface.createObject('MechanicalObject', showIndices='false', name='mstate')
            surface.createObject('Triangle', color='1 0 0 1', group=0)
            surface.createObject('Line', color='1 0 0 1', group=0)
            surface.createObject('Point', color='1 0 0 1', group=0)
            surface.createObject('BarycentricMapping', name='bpmapping')

        # /ModelNode/cylinder/observations
        obsNode = simuNode.createChild('observations')
        obsNode.createObject('MeshVTKLoader', name='obsloader', filename=self.obsPoints)
        obsNode.createObject('MechanicalObject', name='SourceMO', position='@obsloader.position')
        # obsNode.createObject('MechanicalObject', name='SourceMO', position='0.02 0 0.08 0.02 0 0.16    0.0141 0.0141 0.08    0.0141 -0.0141 0.08    0.0141 0.0141 0.16    0.0141 -0.0141 0.16    0.02 0 0.0533    0.02 0 0.107   \
        #     0.02 0 0.133    0.02 0 0.187    0.02 0 0.213    0.0175 0.00961 0.0649    0.00925 0.0177 0.0647    0.0139 0.0144 0.0398    0.00961 -0.0175 0.0649    0.0177 -0.00925 0.0647  \
        #     0.0144 -0.0139 0.0402    0.0177 0.00936 0.145    0.0095 0.0176 0.145    0.0175 0.00961 0.0951    0.00925 0.0177 0.0953    0.0139 0.0144 0.12    0.00937 -0.0177 0.145   \
        #     0.0176 -0.00949 0.145    0.00935 -0.0177 0.0953    0.0176 -0.00949 0.095    0.0142 -0.0141 0.12    0.0177 0.00937 0.175    0.00949 0.0176 0.175    0.014 0.0143 0.2   \
        #     0.00959 -0.0175 0.175    0.0177 -0.00924 0.175    0.0143 -0.014 0.2')

        obsNode.createObject('VTKExporter', name='temporaryExporter', filename='tempObs.vtk', XMLformat='0',listening='1',edges="0",triangles="0",quads="0",tetras="0",
                exportAtBegin="1", exportAtEnd="0", exportEveryNumberOfSteps="0", position='@SourceMO.position')

        obsNode.createObject('BarycentricMapping')
        obsNode.createObject('MappedStateObservationManager', name="MOBS", listening="1", stateWrapper="@../StateWrapper", verbose="1",
                    observationStdev=self.opt['filter']['observ_stdev'], noiseStdev=self.opt['filter']['obs_added_noise_var'], doNotMapObservations='1')
        obsNode.createObject('SimulatedStateObservationSource', name="ObsSource", monitorPrefix=self.obsFile)
        obsNode.createObject('ShowSpheres', radius="0.002", color="1 0 0 1", position='@SourceMO.position')
        obsNode.createObject('ShowSpheres', radius="0.0015", color="1 1 0 1", position='@MOBS.mappedObservations')


        # /ModelNode/cylinder/visualization
        oglNode = simuNode.createChild('visualization')
        self.oglNode = oglNode
        # oglNode.createObject('OglModel', color='1 0 0 1')
        # oglNode.createObject('BarycentricMapping')

        # /ModelNode/floor
        if self.planeCollision == 1:
            floor = modelNode.createChild('floor')
            floor.createObject('RegularGrid', nx="2", ny="2", nz="2", xmin="-0.1", xmax="0.1",  ymin="-0.059", ymax="-0.061", zmin="0.0", zmax="0.3")
            floor.createObject('MechanicalObject', template="Vec3d")
            floor.createObject('Triangle',simulated="false", bothSide="true", contactFriction="0.00", color="1 1 0 1")
            floor.createObject('Line', simulated="false", bothSide="true", contactFriction="0.0", color="1 1 0 1")
            floor.createObject('Point', simulated="false", bothSide="true", contactFriction="0.0", color="1 1 0 1")

        return 0

    def createTimeProfiler(self):
        print 'Time statistics file: ' + self.estFolder + '/' + self.opt['time']['time_statistics_file']
        Sofa.timerSetInterval(self.opt['time']['timer_name'], self.opt['time']['iterations_interval'])    # Set the number of steps neded to compute the timer
        Sofa.timerSetOutputType(self.opt['time']['timer_name'], 'json')    # Set output file format
        with open(self.estFolder + '/' + self.opt['time']['time_statistics_file'], "a") as outputFile:
            outputFile.write('{')
            outputFile.close()

        return 0


    def initGraph(self,node):
        return 0

    def bwdInitGraph(self, node):
    	self.exportStochasticState()
    	return 0

    def onBeginAnimationStep(self, deltaTime):
        self.step += 1
        if 'applied_force' in self.opt['model'].keys():
            maxTS = self.opt['model']['applied_force']['num_inc_steps']
            delta = np.array(self.opt['model']['applied_force']['delta'])
            if self.step < maxTS:
                fc = np.array(self.appliedForce.findData('force').value)
                fc[0] += delta
                self.appliedForce.findData('force').value = fc.tolist()

        if 'applied_pressure' in self.opt['model'].keys():
            maxTS = self.opt['model']['applied_pressure']['num_inc_steps']
            maxWS = self.opt['model']['applied_pressure']['num_wait_steps']
            delta = np.array(self.opt['model']['applied_pressure']['delta'])
            self.waitStep -= 1
            if self.incStep < maxTS and self.waitStep == -1:
                press = np.array(self.appliedPressure.findData('pressure').value)
                press[0] += delta
                self.appliedPressure.findData('pressure').value = press.tolist()
                self.waitStep = maxWS
                self.incStep += 1

            if self.incStep == maxTS:
                print "Maximum pressure achieved!"
            else:
                print "Current incremental step: ",self.incStep," (", self.waitStep,")"

        return 0


    def onEndAnimationStep(self, deltaTime):
        self.iterations = self.iterations + 1
        self.exportStochasticState()
        self.saveTimeStatistics()

        # print self.basePoints.findData('indices_position').value

        return 0

    def saveTimeStatistics(self):
        if self.opt['time']['time_profiling']:
            if self.iterations <= self.opt['time']['iteration_amount']:
                result = Sofa.timerEnd(self.opt['time']['timer_name'], self.rootNode)
                if result != None :
                    with open(self.estFolder + '/' + self.opt['time']['time_statistics_file'], "a") as outputFile:
                        outputFile.write(result + ",")
                        outputFile.close()
            # replace last symbol
            if self.iterations == self.opt['time']['iteration_amount']:
                with open(self.estFolder + '/' + self.opt['time']['time_statistics_file'], "a") as outputFile:
                    outputFile.seek(-1, os.SEEK_END)
                    outputFile.truncate()
                    outputFile.write("\n}")
                    outputFile.close()

        return 0


    def exportStochasticState(self):
    	if self.saveEst:
            stateName = 'reducedState' if self.filterKind == 'ROUKF' else 'state'
            varName = 'reducedVariance' if self.filterKind == 'ROUKF' else 'variance'
            covarName = 'reducedCovariance' if self.filterKind == 'ROUKF' else 'covariance'

            rs=self.filter.findData(stateName).value
            state = [val for sublist in rs for val in sublist]
            print 'State:',state
            #print reducedState

            f1 = open(self.stateExpFile, "a")
            f1.write(" ".join(map(lambda x: str(x), state)))
            f1.write('\n')
            f1.close()

            rv=self.filter.findData(varName).value
            variance = [val for sublist in rv for val in sublist]
            print 'Stdev: ', np.sqrt(variance)
            #print 'Reduced variance:'
            #print reducedVariance

            f2 = open(self.stateVarFile, "a")
            f2.write(" ".join(map(lambda x: str(x), variance)))
            f2.write('\n')
            f2.close()

            rcv=self.filter.findData(covarName).value
            covariance = [val for sublist in rcv for val in sublist]
            #print 'Covariance:', covariance
            estStd = np.sqrt(variance)
            # print 'Correlation: ',covariance[0]/(np.prod(estStd))


            f3 = open(self.stateCovarFile, "a")
            f3.write(" ".join(map(lambda x: str(x), covariance)))
            f3.write('\n')
            f3.close()

            return

    def cleanup(self):
        if self.saveEst:
            print 'Estimations saved to '+self.estFolder

        if self.saveGeo:
            print 'Geometries saved to '+self.geoFolder

        return 0;

    def onScriptEvent(self, senderNode, eventName,data):
        return 0;
