<Node animate="0" dt="0.2" gravity="0 0 0" name="root">
    <RequiredPlugin name="SofaPython" pluginName="SofaPython" /><PythonScriptController classname="pigLiver1_BCDA" filename="pigLiver1_BCDA.py" listening="1" name="pigLiver1_BCDA" /></Node>
