<Node animate="0" dt="0.2" gravity="0 0 0" name="root">
    <RequiredPlugin name="SofaPython" pluginName="SofaPython" /><PythonScriptController classname="pigLiver1_knownBC" filename="pigLiver1_knownBC.py" listening="1" name="pigLiver1_knownBC" /></Node>
