<?xml version="1.0" ?>
<Node animate="0" dt="0.01" gravity="0 0 0" name="Root">
	<RequiredPlugin name="SofaPython" pluginName="SofaPython" />
	<PythonScriptController classname="silicon1_BCDA" filename="silicon1_BCDA.py" listening="1" name="pythonDA" />
</Node>
