import Sofa
import os

class synth1_GenObs (Sofa.PythonScriptController):

    def createGraph(self,rootNode):
        nu=0.45
        E=7500
        volumeFileName='../../data/brickD/brickD_536.vtk'
        surfaceSTL='../../data/brickD/brickD_536.stl'
        outputDir='observations/brickD_ogrid4'
        os.system('mv '+outputDir+ ' observations/arch')
        os.system('mkdir -p '+outputDir)
        saveObservations=0

        self.toolForceFile = open("toolForce.txt", "w")

        # rootNode
        rootNode.createObject('VisualStyle', displayFlags='showVisual showBehavior showCollision hideMapping showWireframe hideNormals')
        rootNode.createObject('RequiredPlugin', pluginName='Optimus')
        rootNode.createObject('RequiredPlugin', pluginName='SofaPardisoSolver')
        rootNode.createObject('RequiredPlugin', pluginName='ImageMeshAux')
        rootNode.createObject('RequiredPlugin', pluginName='SofaMJEDFEM')

        rootNode.findData('gravity').value="0 0 0"
        rootNode.findData('dt').value="0.1"

        # rootNode/tool
        tool = rootNode.createChild('tool')
        tool.createObject('MechanicalObject', name='MO', position='0.045 0.1 0.0   0.05 0.1 0.0   0.055 0.1 0.0   0.045 0.1 -0.005   0.05 0.1 -0.005   0.055 0.1 -0.005    0.045 0.1 -0.01   0.05 0.1 -0.01   0.055 0.1 -0.01')
        tool.createObject('Sphere', color='1 0 0 1', radius='0.001')
        tool.createObject('LinearMotionStateController', indices='0 1 2 3 4 5 6 7 8', keyTimes='0 5', keyDisplacements='0 0 0    0.0 0.04 0')

        if saveObservations:
            tool.createObject('VTKExporter', position="@MO.position", edges="0", listening="0" , XMLformat='0', exportAtBegin='1', exportEveryNumberOfSteps="0", filename=outputDir+'/tool.vtk')
            tool.createObject('BoxROI', name='toolDOFs', box='-1 -1 -1 1 1 1')
            tool.createObject('Monitor', name=outputDir+'/tool', showPositions='1', indices="@toolDOFs.indices", ExportPositions="1", ExportVelocities="1", ExportForces="1")

        # rootNode/grid
        # gridNode = rootNode.createChild('grid')
        # gridNode.createObject('RegularGrid', name="grid", max='0.1 0.1 -0.01', n='21 21 3', min='0.0 0.0 0.0')

        # rootNode/simuNode
        simuNode = rootNode.createChild('simu')
        simuNode.activated = 'true'
        # simuNode.createObject('EulerImplicitSolver', firstOrder="0")
        simuNode.createObject('NewtonStaticSolver', maxIt='3', name='NewtonStatic', correctionTolerance='1e-8', convergeOnResidual='1', residualTolerance='1e-8', printLog='1')
        # simuNode.createObject('StepPCGLinearSolver', name="StepPCG", iterations="10000", tolerance="1e-12", preconditioners="precond", verbose="1", precondOnTimeStep="1")
        # simuNode.createObject('StaticSolver')
        simuNode.createObject('SparsePARDISOSolver', symmetric='1', exportDataToDir='', name='precond', iterativeSolverNumbering='1')


        simuNode.createObject('MeshVTKLoader', name='loader', filename=volumeFileName)
        simuNode.createObject('TetrahedronSetTopologyContainer', name='Container', src="@loader")
        simuNode.createObject('TetrahedronSetTopologyModifier', name='Modifier')
        simuNode.createObject('TetrahedronSetTopologyAlgorithms', name='TopoAlgs')
        simuNode.createObject('TetrahedronSetGeometryAlgorithms', name='GeomAlgs')
        # simuNode.createObject('Hexa2TetraTopologicalMapping', input="@/grid/grid", output="@Container", swapping='1')

        # simuNode.createObject('MechanicalObject', src='@/grid/grid', showIndicesScale='0.00025', name='MO', template='Vec3d', showIndices='0')
        simuNode.createObject('MechanicalObject', src='@loader', showIndicesScale='0.00025', name='MO', template='Vec3d', showIndices='0')
        simuNode.createObject('UniformMass', totalmass='0.01')

        lamb=(E*nu)/((1+nu)*(1-2*nu))
        mu=E/(2+2*nu)
        materialParams='{} {}'.format(mu,lamb)
        simuNode.createObject('MJEDTetrahedralForceField', name='FEM', materialName='StVenantKirchhoff', ParameterSet=materialParams)

        # simuNode.createObject('TetrahedronFEMForceField', name='FEM', youngModulus=E, poissonRatio=nu, computeVonMisesStress='0', method='large')
        # simuNode.createObject('FastTetrahedralCorotationalForceField', name='FEM', youngModulus=E, poissonRatio=nu)

        simuNode.createObject('Sphere', radius="0.0003")

        simuNode.createObject('BoxROI', box='-0.001 -0.001 -0.011 0.025 0.001 0.001', drawBoxes='1', name='FROI1')
        # simuNode.createObject('BoxROI', box='0.075 -0.001 -0.011 0.101 0.001 0.001', drawBoxes='1', name='FROI2')
        # simuNode.createObject('BoxROI', box='-0.001 -0.001 -0.011 0.101 0.001 0.001', drawBoxes='1', name='FROI')
        simuNode.createObject('ExtendedRestShapeSpringForceField', stiffness='1e5', name='fixingSpring', points='@FROI1.indices', springColor='0 1 0 1', startTimeSpringOn='0', numStepsSpringOn='10000')
        # simuNode.createObject('ExtendedRestShapeSpringForceField', stiffness='1e5', name='fixingSpring', points='@FROI2.indices', springColor='0 1 0 1', startTimeSpringOn='0', numStepsSpringOn='10000')
        # simuNode.createObject('FixedConstraint', indices='@FROI.indices', template='Vec3d')
        simuNode.createObject('Mapped3DoFForceField', mappedFEM='mappedTool/toolSpring', mappedMechObject='mappedTool/MO', printLog='0', mapping='mappedTool/baryMapping')

        if saveObservations:
            simuNode.createObject('VTKExporter', position="@MO.position", listening="1" , XMLformat='0', exportAtBegin="1", exportAtEnd='0', exportEveryNumberOfSteps="1",
                filename=outputDir+'/object.vtk', tetras='1', edges='0')

        # rootNode/object/mappedTool
        mappedTool = simuNode.createChild('mappedTool')
        mappedTool.createObject('MechanicalObject', position='0.045 0.1 0.0   0.05 0.1 0.0   0.055 0.1 0.0   0.045 0.1 -0.005   0.05 0.1 -0.005   0.055 0.1 -0.005    0.045 0.1 -0.01   0.05 0.1 -0.01   0.055 0.1 -0.01', name='MO')
        self.toolSprings=mappedTool.createObject('ExtendedRestShapeSpringForceField', numStepsSpringOn='10000', stiffness='1e5', name='toolSpring', springColor='0 1 0 1', drawSpring='1', updateStiffness='1', printLog='0', listening='1', angularStiffness='0', startTimeSpringOn='0', external_rest_shape='/tool/MO')
        mappedTool.createObject('Sphere', color='0 0 1 1', radius='0.001')
        mappedTool.createObject('BarycentricMapping', name='baryMapping')

        # rootNode/simu/obsGrid
        obsGrid = simuNode.createChild('obsGrid')
        monitorFile=outputDir+'/observations'
        # obsGrid.createObject('RegularGrid', name="grid", min='0.0 0.01 0.0', max='0.1 0.1 -0.01', n='10 10 3')  # obs. grid1
        # obsGrid.createObject('RegularGrid', name="grid", min='0.0 0.01 0.0', max='0.1 0.1 -0.0', n='10 10 1')  # obs. grid2
        # obsGrid.createObject('RegularGrid', name="grid", min='0.0 0.01 0.0', max='0.1 0.03 -0.0', n='10 3 1')  # obs. grid3
        obsGrid.createObject('RegularGrid', name="grid", min='0.0 0.08 0.0', max='0.1 0.1 -0.0', n='10 3 1')  # obs. grid4
        obsGrid.createObject('MechanicalObject', src='@grid', showIndicesScale='0.00025', name='MO', template='Vec3d', showIndices='1')
        obsGrid.createObject('BarycentricMapping')
        obsGrid.createObject('Sphere', radius="0.0006", color="1 0 1 1")

        if saveObservations:
            obsGrid.createObject('VTKExporter', filename=monitorFile+'.vtk', position="@MO.position", listening="0" , XMLformat='0', exportAtBegin='1', exportEveryNumberOfSteps="0")
            obsGrid.createObject('BoxROI', name='gridDOFs', box='-1 -1 -1 1 1 1')
            obsGrid.createObject('Monitor', name=monitorFile, indices="@gridDOFs.indices", ExportPositions="1", ExportVelocities="0", ExportForces="0")

        visNode = simuNode.createChild('ObjectVisualization')
        visNode.createObject('MeshSTLLoader', name='objectSLoader', filename=surfaceSTL)
        visNode.createObject('MechanicalObject',src="@objectSLoader",name="Surface")
        visNode.createObject('TriangleSetTopologyContainer', name="Container", src="@objectSLoader", tags=" ")
        # visNode.createObject('TriangleSetTopologyModifier', name="Modifier")
        # visNode.createObject('TriangleSetTopologyAlgorithms', name="TopoAlgo")
        # visNode.createObject('TriangleSetGeometryAlgorithms', name="GeomAlgo")
        visNode.createObject('Line',color="0 0 0 1")
        visNode.createObject('Triangle',color="1 0 0 1")
        visNode.createObject('BarycentricMapping')


        return 0;

    def onEndAnimationStep(self, deltaTime):
        totalToolForce=self.toolSprings.findData('totalForce').value
        print 'Total tool force: ',totalToolForce
        self.toolForceFile.write("%g %g %g\n" % (totalToolForce[0][0], totalToolForce[0][1], totalToolForce[0][2]))

        return 0;


    def onKeyPressed(self, c):
        return 0;

    def onKeyReleased(self, c):
        return 0;

    def onLoaded(self, node):
        return 0;

    def onMouseButtonLeft(self, mouseX,mouseY,isPressed):
        return 0;

    def onMouseButtonRight(self, mouseX,mouseY,isPressed):
        return 0;

    def onMouseButtonMiddle(self, mouseX,mouseY,isPressed):
        return 0;

    def onMouseWheel(self, mouseX,mouseY,wheelDelta):
        return 0;

    def onGUIEvent(self, strControlID,valueName,strValue):
        return 0;

    def onBeginAnimationStep(self, deltaTime):
        return 0;

    def onScriptEvent(self, senderNode, eventName,data):
        return 0;

    def initGraph(self, node):
        return 0;

    def bwdInitGraph(self, node):
        return 0;

    def storeResetState(self):
        return 0;

    def reset(self):
        return 0;

    def cleanup(self):
        self.toolForceFile.close()
        return 0;
