<!-- Complete for expired chest, including rib cage, organs, precise liver...
	 You will need to download dataset from IRCAD at :
	 and extract the archive in <Sofa_Directory>/examples/Demos/Passport/data/models
-->

<Node name="root" dt="0.01" gravity="0 0 0">
    <RequiredPlugin pluginName="SofaPython" />
    <RequiredPlugin pluginName="SofaCUDA" />
    <RequiredPlugin pluginName="Optimus" />
    <RequiredPlugin pluginName="SofaPardisoSolver" />
    <RequiredPlugin pluginName="ImageMeshAux" />
    <RequiredPlugin pluginName="Geomagic" />
    <RequiredPlugin pluginName="BoundaryConditionsPlugin" />

    <DefaultVisualManagerLoop />
    <!--    <FreeMotionAnimationLoop /> -->
    <VisualStyle displayFlags="showVisualModels hideBehaviorModels hideCollisionModels hideMappings hideForceFields" />


    <!-- <GenericConstraintSolver tolerance="0.01" maxIt="100" printLog="false" /> -->
    <!-- <GenericConstraintCorrection solverName="Instruments/CarvingObject/solver Organs/liver/warpingsolver Organs/diaphragm/warpingsolver Organs/intestine/warpingsolver Organs/intestine/warpingsolver Organs/large_intestine/warpingsolver  Organs/stomach_oesophage/warpingsolver"  /> -->

    <!-- <CudaRasterizer template="CudaVec3f" tags="LDI" subVolumeResolution="32" pixelSize="2" keepDist="0.25" responseType="2" /> -->

    <InteractiveCamera />

<!--    <EulerImplicitSolver firstOrder="false" vdamping="5.0" rayleighMass="0.1" rayleighStiffness="0.2" />-->
<!--    <CGLinearSolver name="linear solver" iterations="25" tolerance="1e-10" threshold="10e-10" />-->
    <!--    <NewtonStaticSolver maxIt="3" name="NewtonStatic" correctionTolerance="1e-8" convergeOnResidual="1" residualTolerance="1e-8" printLog="1" />-->
<!--        <SparsePARDISOSolver name="precond" symmetric="1" exportDataToDir="" iterativeSolverNumbering="1" /> -->

    <Node name="externalImpact">
        <EulerImplicit firstOrder="false" vdamping="5.0" rayleighMass="0.1" rayleighStiffness="0.2" />
        <CGLinearSolver iterations="25" tolerance="1e-5" threshold="1e-5"/>
        <!--        <NewtonStaticSolver maxIt="3" name="NewtonStatic" correctionTolerance="1e-8" convergeOnResidual="1" residualTolerance="1e-8" printLog="1" />-->
        <!--        <SparsePARDISOSolver name="precond" symmetric="1" exportDataToDir="" iterativeSolverNumbering="1" /> -->

<!--	<GeomagicDriver name="GeomagicDevice" deviceName="Default Device" scale="0.02" drawDeviceFrame="1" orientationBase="0 1 -1 -1" positionBase="0.16 0.18 0.28" orientationTool="0 0 0 1" />-->
	<GeomagicDriver name="GeomagicDevice" deviceName="Default Device" scale="0.02" orientationBase="0 1 -1 -1" positionBase="0.16 0.18 0.28" orientationTool="0 0 0 1" />
	<MechanicalObject template="Rigid" name="GeomagicMO" position="@GeomagicDevice.positionDevice" />
        <!--        <Sphere color="0.5 0.5 0.5 1" radius="14.0" template='Vec3d' />-->

	<Node name="Visual" >
            <MeshObjLoader name="devloader" filename="data/sphere.obj" />
            <TriangleSetTopologyContainer name="Container" src="@devloader" />
            <MechanicalObject template="Vec3d" name="state" showObject="true" />
            <UniformMass name="mass" mass="0.005" />
	    <RigidMapping name="meshGeomagicMapping" input="@../GeomagicMO" output="@state" />
            <!--       <FixedConstraint name="FixedConstraint" fixAll="true" />-->
	</Node>
    </Node>

    <Node name="liver">
        <EulerImplicit name="odesolver" firstOrder="false" vdamping="5.0" rayleighMass="0.1" rayleighStiffness="0.2" />
        <!--        <CGLinearSolver iterations="25" tolerance="1e-5" threshold="1e-5"/> -->
        <!--        <NewtonStaticSolver maxIt="3" name="NewtonStatic" correctionTolerance="1e-8" convergeOnResidual="1" residualTolerance="1e-8" printLog="1" />-->
        <!-- <ShewchukPCGLinearSolver iterations="10" tolerance="1e-5" preconditioners="warpingsolver" use_precond="true" /> -->
        <SparsePARDISOSolver name="precond" symmetric="1" exportDataToDir="" iterativeSolverNumbering="1" />

        <!--        <MeshVTKLoader name="vloader" filename="data/liverVolume.vtu" />-->
        <MeshGmshLoader name="vloader" filename="data/liver.msh" />
        <MechanicalObject name="dofs" src="@vloader" />

        <TetrahedronSetTopologyContainer src="@vloader" name="Container" />
        <TetrahedronSetTopologyModifier name="Modifier" />
        <TetrahedronSetTopologyAlgorithms name="TopoAlgo" />
        <TetrahedronSetGeometryAlgorithms name="GeomAlgo" />

        <ShapeMarkersGenerator name="markersGen" minimumDistance="7.0" />

        <UniformMass totalmass="0.2" />
        <TetrahedronFEMForceField name="FEM" listening="true" youngModulus="5000" poissonRatio="0.45" />
        <!--        <RestShapeSpringsForceField name="Falciform" stiffness="1000" angularStiffness="1" points="320 370 413" /> -->
	<!--        <RestShapeSpringsForceField name="RightCoronary" stiffness="10000" angularStiffness="1" points="483 450 494 480" />-->
	<!--        <RestShapeSpringsForceField name="LeftCoronary" stiffness="10000" angularStiffness="1" points="381 352 473 239 277" />-->
	<!--        <RestShapeSpringsForceField name="Hepatogastric" stiffness="10000" angularStiffness="1" points="53 83 200 190" />-->
	<!--        <RestShapeSpringsForceField name="Unpredictable" stiffness="10000" angularStiffness="1" points="79 60" />-->
        <RestShapeSpringsForceField name="RightCoronary" stiffness="150" angularStiffness="1" points="83" />
        <RestShapeSpringsForceField name="LeftCoronary" stiffness="300" angularStiffness="1" points="116" />

        <VTKExporter position="@dofs.position" edges="0" tetras="1" listening="1" XMLformat="0" exportAtBegin="1" exportAtEnd="0" exportEveryNumberOfSteps="0" filename="observations/object.vtk" />

        <Node name="observations">
            <MechanicalObject name="mechanicalObject" position="@markersGen.markersPositions" template="Vec3d" />
            <BarycentricMapping />
            <Sphere color="0.0 0.5 0.0 1" radius="0.005" template='Vec3d' />
	    <VTKExporter position="@mechanicalObject.position" edges="0" listening="0" XMLformat="0" exportAtBegin="1" exportEveryNumberOfSteps="0" filename="observations/observations.vtk" />
            <BoxROI name="observeBounds" box="0.05 0.08 0.2 0.35 0.39 0.54" />
            <Monitor name="observationMonitor" showPositions="1" indices="@observeBounds.indices" ExportPositions="1" ExportVelocities="0" ExportForces="0" fileName="observations/observations" />
        </Node>

        <!--        <Node name="collision">-->
        <!--             <Mesh name="surface" filename="data/mesh/liverColli.obj" tags="LDI" />-->
        <!--             <MechanicalObject name="collisionVertices"/>-->
        <!--             <TriangleModel name="CM" />-->
        <!--             <BarycentricMapping isMechanical="false" input="@../dofs" output="@collisionVertices" />-->
        <!--        </Node>-->

        <Node name="ModifiedVisual">
            <MeshObjLoader name="visloader" filename="data/sphere.obj" />
            <TriangleSetTopologyContainer name="Container" src="@visloader" />
            <MechanicalObject template="Vec3d" showObject="true" name="dofs" translation="0.15 0.21 0.37" />
            <RestShapeSpringsForceField name="Springs" stiffness="2.5" angularStiffness="1" external_rest_shape="@../../externalImpact/Visual" />
            <GeomagicDeviceListener geomagicButtonPressed="@../../externalImpact/GeomagicDevice.button1" geomagicSecondButtonPressed="@../../externalImpact/GeomagicDevice.button2" geomagicPosition="@../../externalImpact/GeomagicDevice.positionDevice" />
            <BarycentricMapping />
            <VTKExporter position="@state.position" edges="0" listening="0" XMLformat="0" exportAtBegin="1" exportEveryNumberOfSteps="0" filename="observations/impact.vtk" />
	    <BoxROI name="impactBounds" box="0.08 0.16 0.31 0.22 0.27 0.46" />
	    <Monitor name="toolMonitor" showPositions="1" indices="@impactBounds.indices" ExportPositions="1" ExportVelocities="0" ExportForces="0" fileName="observations/impact" />
        </Node>
    </Node>

    <!--    <Node name="CoronaryRight">-->
    <!--        <MeshObjLoader name="meshLoader" filename="data/rightCoronary.obj" />-->
    <!--	<TetrahedronSetTopologyContainer name="Container" src="@meshLoader" />                                         -->
    <!--	<MechanicalObject name="mstate" />                 -->
    <!--	<UniformMass totalmass="0.05" />-->
    <!--	<FixedConstraint name="FixedConstraint" fixAll="true" />-->
    <!--    </Node>-->
    <!--    <Node name="CoronaryLeft">-->
    <!--        <MeshObjLoader name="mesh1Loader" filename="data/leftCoronary.obj" />-->
    <!--    	<TetrahedronSetTopologyContainer name="Container" src="@mesh1Loader" />                                         -->
    <!--    	<MechanicalObject name="mstate" />                 -->
    <!--    	<UniformMass totalmass="0.05" />-->
    <!--    	<FixedConstraint name="FixedConstraint" fixAll="true" />-->
    <!--    </Node>-->
    <!--    <Node name="HepatogastricLig">-->
    <!--        <MeshObjLoader name="mesh2Loader" filename="data/hepatogastric.obj" />-->
    <!--    	<TetrahedronSetTopologyContainer name="Container" src="@mesh2Loader" />                                         -->
    <!--    	<MechanicalObject name="mstate" />                 -->
    <!--    	<UniformMass totalmass="0.05" />-->
    <!--    	<FixedConstraint name="FixedConstraint" fixAll="true" />-->
    <!--    </Node>-->
    <!--    <Node name="FalciformLig">-->
    <!--        <MeshObjLoader name="mesh3Loader" filename="data/falciform.obj" />-->
    <!--    	<TetrahedronSetTopologyContainer name="Container" src="@mesh3Loader" />                                         -->
    <!--    	<MechanicalObject name="mstate" />                 -->
    <!--    	<UniformMass totalmass="0.05" />-->
    <!--    	<FixedConstraint name="FixedConstraint" fixAll="true" />-->
    <!--    </Node>-->
    <!--    <Node name="UnpredictableLig">-->
    <!--        <MeshObjLoader name="mesh4Loader" filename="data/unpredictable.obj" />-->
    <!--    	<TetrahedronSetTopologyContainer name="Container" src="@mesh4Loader" />                                         -->
    <!--    	<MechanicalObject name="mstate" />                 -->
    <!--    	<UniformMass totalmass="0.05" />-->
    <!--    	<FixedConstraint name="FixedConstraint" fixAll="true" />-->
    <!--    </Node>-->

    <!--    <BoxStiffSpringForceField template="Vec3d" name="Spring" stiffness="20000" forceOldBehavior="false" object1="@liver/collision" object2="@Bound" box_object1="90.0 150.0 260.0 120.0 290.0 400.0" box_object2="60.0 150.0 260.0 80.0 290.0 400.0" />-->
</Node>
