import Sofa
import math
import os
import sys
import csv
import yaml

__file = __file__.replace('\\', '/') # windows

def createScene(rootNode):
    rootNode.createObject('RequiredPlugin', name='Optimus', pluginName='Optimus')
    rootNode.createObject('RequiredPlugin', name='Pardiso', pluginName='SofaPardisoSolver')
    rootNode.createObject('RequiredPlugin', name='IMAUX', pluginName='ImageMeshAux')
    # rootNode.createObject('RequiredPlugin', name='MJED', pluginName='SofaMJEDFEM')
    rootNode.createObject('RequiredPlugin', pluginName='Geomagic')
    rootNode.createObject('RequiredPlugin', name='BoundaryConditions', pluginName="BoundaryConditionsPlugin")

    try :
        sys.argv[0]
    except :
        commandLineArguments = []
    else :
        commandLineArguments = sys.argv

    if len(commandLineArguments) > 1:
        configFileName = commandLineArguments[1]
    else:
        print 'ERROR: Must supply a yaml config file as an argument!'
        return
    print "Command line arguments for python : " + str(commandLineArguments)

    with open(configFileName, 'r') as stream:
        try:
            options = yaml.load(stream)

        except yaml.YAMLError as exc:
            print(exc)
            return

    liver_geomagicControlPoint_GenObs(rootNode, options)
    return 0


class liver_geomagicControlPoint_GenObs (Sofa.PythonScriptController):

    def __init__(self, rootNode, options):
        self.options = options
        self.vdamping = 5.0
        self.generalFolderName = self.options['filtering_parameters']['common_directory_prefix'] + self.options['general_parameters']['solver_kind']
        if not os.path.isdir(self.generalFolderName):
            os.mkdir(self.generalFolderName)
        if not os.path.isdir(self.generalFolderName + '/observations'):
            os.mkdir(self.generalFolderName + '/observations')

        rootNode.findData('dt').value = options['general_parameters']['delta_time']
        rootNode.findData('gravity').value = options['general_parameters']['gravity']
        self.createGraph(rootNode)
        return None


    def createGraph(self, rootNode):
        nu=0.45
        E=5000

        rootNode.createObject('VisualStyle', displayFlags='showVisualModels hideBehaviorModels hideCollisionModels hideMappings showForceFields')

        # rootNode/externalImpact
        dotNode = rootNode.createChild('dotNode')
        self.dotNode = dotNode
        dotNode.createObject('EulerImplicitSolver', firstOrder='false', vdamping=self.vdamping, rayleighStiffness=self.options['general_parameters']['rayleigh_stiffness'], rayleighMass=self.options['general_parameters']['rayleigh_mass'])
        dotNode.createObject('CGLinearSolver', iterations='25', tolerance='1e-5', threshold='1e-5')
        if self.options['geomagic_parameters']['load_track']:
            dotNode.createObject('GeomagicEmulator', name='GeomagicDevice', positionFilename = self.options['geomagic_parameters']['position_file'], buttonFilename = self.options['geomagic_parameters']['listener_file'])
        else:
            dotNode.createObject('GeomagicDriver', name='GeomagicDevice', deviceName='Default Device', scale='0.02', orientationBase='0 1 -1 -1', positionBase='-0.06 0.08 0.37', orientationTool='0 0 0 1')
        dotNode.createObject('MechanicalObject', template='Rigid', name='GeomagicMO', position='@GeomagicDevice.positionDevice')
        dotNode.createObject('Sphere', color='0.5 0.5 0.5 1', radius='0.014', template='Rigid')
        if self.options['obs_generating_parameters']['save_observations']:
            dotNode.createObject('BoxROI', name='geomagicBounds', box='-0.05 -0.05 -0.05 0.52 0.3 0.4', doUpdate='0')
            dotNode.createObject('OptimMonitor', name='toolMonitor', template='Rigid', showPositions='1', indices='@geomagicBounds.indices', ExportPositions='1', fileName = self.generalFolderName + '/observations/geomagic')

        mappingNode = dotNode.createChild('mappingNode')
        mappingNode.createObject('MechanicalObject', template='Vec3d', name='dot', showObject='true', position='0.0 0.0 0.0')
        mappingNode.createObject('RigidMapping', name='meshGeomagicMapping', input='@../GeomagicMO', output='@dot')
        if self.options['obs_generating_parameters']['save_observations']:
            mappingNode.createObject('BoxROI', name='dotBounds', box='-0.05 -0.05 -0.05 0.52 0.3 0.4', doUpdate='0')
            mappingNode.createObject('OptimMonitor', name='toolMonitor', template='Vec3d', showPositions='1', indices='@dotBounds.indices', ExportPositions='1', fileName = self.generalFolderName + '/' + self.options['impact_parameters']['observation_file_name'])

        # rootNode/simuNode
        simuNode = rootNode.createChild('simuNode')
        self.simuNode = simuNode
        if self.options['general_parameters']['solver_kind'] == 'Euler':
            simuNode.createObject('EulerImplicitSolver', firstOrder='false', vdamping=self.vdamping, rayleighStiffness=self.options['general_parameters']['rayleigh_stiffness'], rayleighMass=self.options['general_parameters']['rayleigh_mass'])
        elif self.options['general_parameters']['solver_kind'] == 'Symplectic':
            simuNode.createObject('VariationalSymplecticSolver', rayleighStiffness=self.options['general_parameters']['rayleigh_stiffness'], rayleighMass=self.options['general_parameters']['rayleigh_mass'], newtonError='1e-12', steps='1', verbose='0')
        elif self.options['general_parameters']['solver_kind'] == 'Newton':
            simuNode.createObject('NewtonStaticSolver', name="NewtonStatic", printLog="0", correctionTolerance="1e-8", residualTolerance="1e-8", convergeOnResidual="1", maxIt="2")
        else:
            print 'Unknown solver type!'
        simuNode.createObject('SparsePARDISOSolver', name='LDLsolver', verbose='0', symmetric='1', exportDataToFolder='')

        fileExtension = self.options['system_parameters']['volume_file_name']
        fileExtension = fileExtension[fileExtension.rfind('.') + 1:]
        if fileExtension == 'vtk' or fileExtension == 'vtu':
            simuNode.createObject('MeshVTKLoader', name='loader', filename=self.options['system_parameters']['volume_file_name'])
        elif fileExtension == 'msh':
            simuNode.createObject('MeshGmshLoader', name='loader', filename=self.options['system_parameters']['volume_file_name'])
        else:
            print 'Unknown file type!'
        simuNode.createObject('MechanicalObject', src='@loader', name='Volume')

        simuNode.createObject('BoxROI', name='impactBounds', box='0.14 0.15 0.37 0.18 0.17 0.4', doUpdate='0')
        simuNode.createObject('RestShapeSpringsForceField', name='Springs', stiffness='10000', angularStiffness='1', external_rest_shape='@../dotNode/mappingNode/dot', points='@impactBounds.indices')
        simuNode.createObject('GeomagicDeviceListener', template='Vec3d', geomagicButtonPressed='@../dotNode/GeomagicDevice.button1', geomagicSecondButtonPressed='@../dotNode/GeomagicDevice.button2', geomagicPosition='@../dotNode/GeomagicDevice.positionDevice', saveAttachmentData='true', filename = self.generalFolderName + '/observations/listener.txt')

        if 'boundary_conditions_list' in self.options['general_parameters'].keys():
            for index in range(0, len(self.options['general_parameters']['boundary_conditions_list'])):
                bcElement = self.options['general_parameters']['boundary_conditions_list'][index]
                simuNode.createObject('BoxROI', box=bcElement['boxes_coordinates'], name='boundBoxes'+str(index), drawBoxes='0', doUpdate='0')
                if bcElement['condition_type'] == 'fixed':
                    simuNode.createObject('FixedConstraint', indices='@boundBoxes'+str(index)+'.indices')
                elif bcElement['condition_type'] == 'elastic':
                    if self.options['boundary_parameters']['spring_type'] == 'Polynomial':
                        simuNode.createObject('PolynomialRestShapeSpringsForceField', stiffness=bcElement['spring_stiffness_values'], howIndicesScale='0', springThickness="3", listening="1", updateStiffness="1", printLog="0", points='@boundBoxes'+str(index)+'.indices')
                    else:
                        simuNode.createObject('RestShapeSpringsForceField', stiffness=bcElement['spring_stiffness_values'], angularStiffness="1", points='@boundBoxes'+str(index)+'.indices')
                else:
                    print 'Unknown type of boundary conditions'

        simuNode.createObject('TetrahedronSetTopologyContainer', name="Container", src="@loader", tags=" ")
        simuNode.createObject('TetrahedronSetTopologyModifier', name="Modifier")
        simuNode.createObject('TetrahedronSetTopologyAlgorithms', name="TopoAlgo")
        simuNode.createObject('TetrahedronSetGeometryAlgorithms', name="GeomAlgo")
        if 'total_mass' in self.options['general_parameters'].keys():
            simuNode.createObject('UniformMass', totalMass=self.options['general_parameters']['total_mass'])
        if 'density' in self.options['general_parameters'].keys():
            simuNode.createObject('MeshMatrixMass', printMass='0', lumping='1', massDensity=self.options['general_parameters']['density'], name='mass')

        lamb=(E*nu)/((1+nu)*(1-2*nu))
        mu=E/(2+2*nu)
        materialParams='{} {}'.format(mu,lamb)
        #simuNode.createObject('TetrahedralTotalLagrangianForceField', name='FEM', materialName='StVenantKirchhoff', ParameterSet=materialParams)
        simuNode.createObject('TetrahedronFEMForceField', updateStiffness='1', name='FEM', listening='true', drawHeterogeneousTetra='1', method='large', youngModulus='5000', poissonRatio='0.45')

        if self.options['obs_generating_parameters']['save_observations']:
            simuNode.createObject('BoxROI', name='observationBox', box='-1 -1 -1 1 1 1', doUpdate='0')
            simuNode.createObject('OptimMonitor', name='ObservationMonitor', indices='@observationBox.indices', fileName = self.generalFolderName + '/' + self.options['system_parameters']['observation_file_name'], ExportPositions='1', ExportVelocities='0', ExportForces='0')

        visuNode = simuNode.createChild('visu')
        visuNode.createObject('OglModel', name='VisualModel', material="texture Ambient 1 0.5 0.5 0.5 1.0 Diffuse 1 1.0 1.0 1.0 1.0", fileMesh='../../data/liver/liver-smooth.obj')
        visuNode.createObject('BarycentricMapping', name='VisualMapping', input='@../Volume', output='@VisualModel')

        return 0


    def onMouseButtonLeft(self, mouseX,mouseY,isPressed):
        ## usage e.g.
        #if isPressed :
        #    print "Control+Left mouse button pressed at position "+str(mouseX)+", "+str(mouseY)
        return 0;

    def onKeyReleased(self, c):
        ## usage e.g.
        #if c=="A" :
        #    print "You released a"
        return 0;

    def initGraph(self, node):
        ## Please feel free to add an example for a simple usage in /home/ip/Work/sofa/MyPlugins/Optimus/scenes/assimStiffness//home/ip/Work/sofa/master/src/applications/plugins/SofaPython/scn2python.py
        return 0;

    def onKeyPressed(self, c):
        ## usage e.g.
        #if c=="A" :
        #    print "You pressed control+a"
        return 0;

    def onMouseWheel(self, mouseX,mouseY,wheelDelta):
        ## usage e.g.
        #if isPressed :
        #    print "Control button pressed+mouse wheel turned at position "+str(mouseX)+", "+str(mouseY)+", wheel delta"+str(wheelDelta)
        return 0;

    def storeResetState(self):
        ## Please feel free to add an example for a simple usage in /home/ip/Work/sofa/MyPlugins/Optimus/scenes/assimStiffness//home/ip/Work/sofa/master/src/applications/plugins/SofaPython/scn2python.py
        return 0;

    def cleanup(self):
        ## Please feel free to add an example for a simple usage in /home/ip/Work/sofa/MyPlugins/Optimus/scenes/assimStiffness//home/ip/Work/sofa/master/src/applications/plugins/SofaPython/scn2python.py
        return 0;

    def onGUIEvent(self, strControlID,valueName,strValue):
        ## Please feel free to add an example for a simple usage in /home/ip/Work/sofa/MyPlugins/Optimus/scenes/assimStiffness//home/ip/Work/sofa/master/src/applications/plugins/SofaPython/scn2python.py
        return 0;

    def onEndAnimationStep(self, deltaTime):
        ## Please feel free to add an example for a simple usage in /home/ip/Work/sofa/MyPlugins/Optimus/scenes/assimStiffness//home/ip/Work/sofa/master/src/applications/plugins/SofaPython/scn2python.py
        return 0;

    def onLoaded(self, node):
        ## Please feel free to add an example for a simple usage in /home/ip/Work/sofa/MyPlugins/Optimus/scenes/assimStiffness//home/ip/Work/sofa/master/src/applications/plugins/SofaPython/scn2python.py
        return 0;

    def reset(self):
        ## Please feel free to add an example for a simple usage in /home/ip/Work/sofa/MyPlugins/Optimus/scenes/assimStiffness//home/ip/Work/sofa/master/src/applications/plugins/SofaPython/scn2python.py
        return 0;

    def onMouseButtonMiddle(self, mouseX,mouseY,isPressed):
        ## usage e.g.
        #if isPressed :
        #    print "Control+Middle mouse button pressed at position "+str(mouseX)+", "+str(mouseY)
        return 0;

    def bwdInitGraph(self, node):
        ## Please feel free to add an example for a simple usage in /home/ip/Work/sofa/MyPlugins/Optimus/scenes/assimStiffness//home/ip/Work/sofa/master/src/applications/plugins/SofaPython/scn2python.py
        return 0;

    def onScriptEvent(self, senderNode, eventName,data):
        ## Please feel free to add an example for a simple usage in /home/ip/Work/sofa/MyPlugins/Optimus/scenes/assimStiffness//home/ip/Work/sofa/master/src/applications/plugins/SofaPython/scn2python.py
        return 0;

    def onMouseButtonRight(self, mouseX,mouseY,isPressed):
        ## usage e.g.
        #if isPressed :
        #    print "Control+Right mouse button pressed at position "+str(mouseX)+", "+str(mouseY)
        return 0;

    def onBeginAnimationStep(self, deltaTime):
        ## Please feel free to add an example for a simple usage in /home/ip/Work/sofa/MyPlugins/Optimus/scenes/assimStiffness//home/ip/Work/sofa/master/src/applications/plugins/SofaPython/scn2python.py
        return 0;
