# this scene is compatible with python3
import Sofa
import math
import os
import sys
import csv
import yaml

sys.path.append(os.getcwd() + '/../../python_src/utils')
from FileSystemUtils import FolderHandler

__file = __file__.replace('\\', '/') # windows

def createScene(rootNode):
    rootNode.addObject('RequiredPlugin', pluginName='Optimus')
    rootNode.addObject('RequiredPlugin', pluginName='SofaPardisoSolver')

    try :
        sys.argv[0]
    except :
        commandLineArguments = []
    else :
        commandLineArguments = sys.argv

    #if len(commandLineArguments) > 1:
    configFileName = "yaml/cylRestShape_scene_config.yml"
    #    configFileName = commandLineArguments[1]
    #else:
    #    print('ERROR: Must supply a yaml config file as an argument!')
    #    return
    print("Command line arguments for python : " + str(commandLineArguments))

    with open(configFileName, 'r') as stream:
        try:
            options = yaml.load(stream)

        except yaml.YAMLError as exc:
            print(exc)
            return

    if options['general_parameters']['linear_solver_kind'] == 'Pardiso':
        rootNode.addObject('RequiredPlugin', name='PardisoSolver', pluginName='SofaPardisoSolver')

    rootNode.addObject(cylRestShapeSDA_Controller(name="cylRestShape_GenObs", node=rootNode, opt=options))
    return 0


# Class definition
class cylRestShapeSDA_Controller(Sofa.Core.Controller):

    def __init__(self, *args, **kwargs):
        # These are needed (and the normal way to override from a python class)
        Sofa.Core.Controller.__init__(self, *args, **kwargs)

        self.rootNode = kwargs["node"]
        self.options = kwargs["opt"]
        self.cameraReactivated = False
        self.generalFolderName = self.options['filtering_parameters']['common_directory_prefix'] + self.options['general_parameters']['solver_kind']
        if not os.path.isdir(self.generalFolderName):
            os.mkdir(self.generalFolderName)

        observationInfix = self.options['system_parameters']['observation_points_file_name']
        observationInfix = observationInfix[observationInfix.rfind('/') + 1 : observationInfix.rfind('.')]
        self.folderName = self.options['filtering_parameters']['filter_kind'] + "_" + observationInfix + self.options['filtering_parameters']['output_directory_suffix']
        self.fullFolderName = self.generalFolderName + '/' + self.folderName
        folderCreator = FolderHandler()
        folderCreator.createFolder(self.generalFolderName, self.folderName, archiveResults=1)

        # create file with parameters and additional information
        self.options['visual_parameters'] = {}
        self.stateFileName = 'state_' + self.options['filtering_parameters']['output_files_suffix'] + '.txt'
        self.options['visual_parameters']['state_file_name'] = self.stateFileName
        self.varianceFileName = 'variance_' + self.options['filtering_parameters']['output_files_suffix'] + '.txt'
        self.options['visual_parameters']['variance_file_name'] = self.varianceFileName
        self.covarianceFileName = 'covariance_' + self.options['filtering_parameters']['output_files_suffix'] + '.txt'
        self.options['visual_parameters']['covariance_file_name'] = self.covarianceFileName
        self.innovationFileName = 'innovation_' + self.options['filtering_parameters']['output_files_suffix'] + '.txt'
        self.options['visual_parameters']['innovation_file_name'] = self.innovationFileName

        self.informationFileName = self.fullFolderName + '/daconfig.yml'

        with open(self.informationFileName, 'w') as stream:
            try:
                yaml.dump(self.options, stream, default_flow_style=None)

            except yaml.YAMLError as exc:
                print(exc)
                return

        self.createGraph(self.rootNode)


    def createGraph(self, rootNode):

        print("Create graph called (Python side)\n")

        self.lambdaScale = 1.0
        if self.options['filtering_parameters']['filter_kind'] == 'ROUKF':
            self.estimPosition='1'
            self.estimVelocity='0'

        if self.options['filtering_parameters']['filter_kind'] == 'UKFSimCorr':
            self.estimPosition='0'
            self.estimVelocity='0'

        if self.options['filtering_parameters']['filter_kind'] == 'UKFClassic':
            self.estimPosition='1'
            self.estimVelocity='0'

        self.createSimulationScene(rootNode)

        return 0


    def createGlobalComponents(self, rootNode):
        # scene global stuff
        rootNode.findData('gravity').value = self.options['general_parameters']['gravity']
        rootNode.findData('dt').value = self.options['general_parameters']['delta_time']

        rootNode.addObject('ViewerSetting', cameraMode='Perspective', resolution='1000 700', objectPickingMethod='Ray casting')
        rootNode.addObject('VisualStyle', name='VisualStyle', displayFlags='showBehaviorModels showForceFields showCollisionModels')

        rootNode.addObject('FilteringAnimationLoop', name="StochAnimLoop", verbose="1")
        #rootNode.addObject('FilteringAnimationLoop', name="StochAnimLoop", verbose="1", computationTimeFile=self.fullFolderName+'/'+self.options['time_parameters']['computation_time_file_name'])

        if (self.options['filtering_parameters']['filter_kind'] == 'ROUKF'):
            self.filter = rootNode.addObject('ROUKFilter', name="ROUKF", verbose="1", useUnbiasedVariance=self.options['filtering_parameters']['use_unbiased_variance'], sigmaTopology=self.options['filtering_parameters']['sigma_points_topology'], lambdaScale=self.lambdaScale)
        elif (self.options['filtering_parameters']['filter_kind'] == 'UKFSimCorr'):
            self.filter = rootNode.addObject('UKFilterSimCorr', name="UKF", verbose="1", useUnbiasedVariance=self.options['filtering_parameters']['use_unbiased_variance'], sigmaTopology=self.options['filtering_parameters']['sigma_points_topology'], lambdaScale=self.lambdaScale)
        elif (self.options['filtering_parameters']['filter_kind'] == 'UKFClassic'):
            self.filter = rootNode.addObject('UKFilterClassic', name="UKFClas", verbose="1", exportPrefix=self.fullFolderName, useUnbiasedVariance=self.options['filtering_parameters']['use_unbiased_variance'], sigmaTopology=self.options['filtering_parameters']['sigma_points_topology'], lambdaScale=self.lambdaScale)
        else:
            print('Unknown filter type!')

        rootNode.addObject('MeshVTKLoader', name='loader', filename=self.options['system_parameters']['volume_file_name'])

        impactSimu = rootNode.addChild('externalImpSimu')
        impactSimu.addObject('PreStochasticWrapper')
        impactSimu.addObject('EulerImplicitSolver')
        impactSimu.addObject('CGLinearSolver')
        impactSimu.addObject('MechanicalObject', name="state", template='Vec3d', useTopology='false', position=self.options['impact_parameters']['position'])
        impactSimu.addObject('SimulatedStateObservationSource', name="ImpactSim", template='Vec3d', printLog="1", monitorPrefix = self.generalFolderName + '/' + self.options['impact_parameters']['observation_file_name'], drawSize="0.0015", controllerMode="1")

        return 0


    #components common for both master and slave: the simulation itself (without observations and visualizations)
    def createCommonComponents(self, node):
        # node.addObject('StaticSolver', applyIncrementFactor="0")
        if self.options['general_parameters']['solver_kind'] == 'Euler':
            node.addObject('EulerImplicitSolver', rayleighStiffness=self.options['general_parameters']['rayleigh_stiffness'], rayleighMass=self.options['general_parameters']['rayleigh_mass'])
        elif self.options['general_parameters']['solver_kind'] == 'Symplectic':
            node.addObject('VariationalSymplecticSolver', rayleighStiffness=self.options['general_parameters']['rayleigh_stiffness'], rayleighMass=self.options['general_parameters']['rayleigh_mass'], newtonError='1e-12', steps='1', verbose='0')
        elif self.options['general_parameters']['solver_kind'] == 'Newton':
            node.addObject('StaticSolver', name="NewtonStatic", printLog="0", correction_tolerance_threshold="1e-8", residual_tolerance_threshold="1e-8", should_diverge_when_residual_is_growing="1", newton_iterations="2")
        else:
            print('Unknown solver type!')

        if self.options['general_parameters']['linear_solver_kind'] == 'Pardiso':
            node.addObject('SparsePARDISOSolver', name="precond", symmetric="1", exportDataToFolder="", iterativeSolverNumbering="0")
        elif self.options['general_parameters']['linear_solver_kind'] == 'CG':
            node.addObject('CGLinearSolver', iterations="20", tolerance="1e-12", threshold="1e-12")
            # node.addObject('StepPCGLinearSolver', name="StepPCG", iterations="10000", tolerance="1e-12", preconditioners="precond", verbose="1", precondOnTimeStep="1")
        else:
            print('Unknown linear solver type!')


        node.addObject('MechanicalObject', src="@/loader", name="Volume")
        node.addObject('TetrahedronSetTopologyContainer', name="Container", src="@/loader", tags=" ")
        node.addObject('TetrahedronSetTopologyModifier', name="Modifier")
        node.addObject('TetrahedronSetTopologyAlgorithms', name="TopoAlgo")
        node.addObject('TetrahedronSetGeometryAlgorithms', name="GeomAlgo")
        if 'total_mass' in self.options['general_parameters'].keys():
            node.addObject('UniformMass', totalMass=self.options['general_parameters']['total_mass'])
        if 'density' in self.options['general_parameters'].keys():
            node.addObject('MeshMatrixMass', printMass='0', lumping='1', massDensity=self.options['general_parameters']['density'], name='mass')

        if 'boundary_conditions_list' in self.options['general_parameters'].keys():
            for index in range(0, len(self.options['general_parameters']['boundary_conditions_list'])):
                bcElement = self.options['general_parameters']['boundary_conditions_list'][index]
                print(bcElement)
                node.addObject('BoxROI', box=bcElement['boxes_coordinates'], name='boundBoxes'+str(index), drawBoxes='0', doUpdate='0')
                if bcElement['condition_type'] == 'fixed':
                    node.addObject('FixedConstraint', indices='@boundBoxes'+str(index)+'.indices')
                elif bcElement['condition_type'] == 'elastic':
                    node.addObject('RestShapeSpringsForceField', stiffness=bcElement['spring_stiffness_values'], angularStiffness="1", points='@boundBoxes'+str(index)+'.indices')
                else:
                    print('Unknown type of boundary conditions')

        node.addObject('OptimParams', name="paramE", optimize="1", numParams=self.options['filtering_parameters']['optim_params_size'], template="Vector", initValue=self.options['filtering_parameters']['initial_stiffness'], minValue=self.options['filtering_parameters']['minimal_stiffness'], maxValue=self.options['filtering_parameters']['maximal_stiffness'], stdev=self.options['filtering_parameters']['initial_standart_deviation'], transformParams=self.options['filtering_parameters']['transform_parameters'])
        node.addObject('Indices2ValuesMapper', name='youngMapper', indices='1 2 3 4 5 6 7 8 9 10', values='@paramE.value', inputValues='@/loader.dataset')
        node.addObject('TetrahedronFEMForceField', name='FEM', updateStiffness='1', listening='true', drawHeterogeneousTetra='1', method='large', poissonRatio='0.45', youngModulus='@youngMapper.outputValues')
        node.addObject('VTKExporter', position='@Volume.position', edges='0', tetras='1', listening='0', XMLformat='0', exportAtEnd='1', exportEveryNumberOfSteps='0', filename = self.generalFolderName + '/observations/stochasticScene2.vtk')

        node.addObject('BoxROI', name='impactBounds', box='-0.01 -0.03 0.11 0.01 0.01 0.12', doUpdate='0')
        self.toolSprings = node.addObject('RestShapeSpringsForceField', name="impactSpring", stiffness="10000", angularStiffness='1', external_rest_shape='@../externalImpSimu/state', points='@impactBounds.indices')

        return 0


    def createMasterScene(self, node):
        node.addObject('StochasticStateWrapper',name="StateWrapper",verbose="1", estimatePosition=self.estimPosition, positionStdev=self.options['filtering_parameters']['positions_standart_deviation'], estimateVelocity=self.estimVelocity)

        self.createCommonComponents(node)

        obsNode = node.addChild('obsNode')
        obsNode.addObject('MeshVTKLoader', name='obsLoader', filename=self.options['system_parameters']['observation_points_file_name'])
        obsNode.addObject('MechanicalObject', name='SourceMO', src="@obsLoader")
        obsNode.addObject('BarycentricMapping')
        obsNode.addObject('MappedStateObservationManager', name="MOBS", observationStdev=self.options['filtering_parameters']['observation_noise_standart_deviation'], noiseStdev="0.0", listening="1", stateWrapper="@../StateWrapper", verbose="1")
        obsNode.addObject('SimulatedStateObservationSource', name="ObsSource", monitorPrefix = self.generalFolderName + '/' + self.options['system_parameters']['observation_file_name'])
        obsNode.addObject('ShowSpheres', name="estimated", radius="0.002", color="1 0 0 1", position='@SourceMO.position')
        obsNode.addObject('ShowSpheres', name="groundTruth", radius="0.0015", color="1 1 0 1", position='@MOBS.mappedObservations')

        return 0


    def createSimulationScene(self,node):
        # r_slaves = [] # list of created auxiliary nodes
        self.createGlobalComponents(node)

        masterNode=node.addChild('MasterScene')
        self.createMasterScene(masterNode)

        return 0


    def initGraph(self,node):
        print('Init graph called (python side)')
        self.step = 0
        self.total_time = 0

        # self.process.initializationObjects(node)
        return 0

    def onAnimateEndEvent(self, eventType):

        if self.options['filtering_parameters']['save_state']:
            if (self.options['filtering_parameters']['filter_kind'] == 'ROUKF'):
                st=self.filter.findData('reducedState').value
            elif (self.options['filtering_parameters']['filter_kind'] == 'UKFSimCorr' or self.options['filtering_parameters']['filter_kind'] == 'UKFClassic'):
                st=self.filter.findData('state').value

            state = [val for val in st]
            #state = [val for sublist in st for val in sublist]
            #print 'Reduced state:'
            #print reducedState

            self.stateExpValFile = self.fullFolderName + '/' + self.stateFileName
            print('Storing to', self.stateExpValFile)
            f1 = open(self.stateExpValFile, "a")
            f1.write(" ".join(map(lambda x: str(x), state)))
            f1.write('\n')
            f1.close()

            if (self.options['filtering_parameters']['filter_kind'] == 'ROUKF'):
                var=self.filter.findData('reducedVariance').value
            elif (self.options['filtering_parameters']['filter_kind'] == 'UKFSimCorr' or self.options['filtering_parameters']['filter_kind'] == 'UKFClassic'):
                var=self.filter.findData('variance').value

            variance = [val for val in var]
            #variance = [val for sublist in var for val in sublist]
            #print 'Reduced variance:'
            #print reducedVariance

            self.stateVarFile = self.fullFolderName + '/' + self.varianceFileName
            f2 = open(self.stateVarFile, "a")
            f2.write(" ".join(map(lambda x: str(x), variance)))
            f2.write('\n')
            f2.close()

            if (self.options['filtering_parameters']['filter_kind'] == 'ROUKF'):
                covar=self.filter.findData('reducedCovariance').value
            elif (self.options['filtering_parameters']['filter_kind'] == 'UKFSimCorr' or self.options['filtering_parameters']['filter_kind'] == 'UKFClassic'):
                covar=self.filter.findData('covariance').value

            covariance = [val for val in covar]
            #covariance = [val for sublist in covar for val in sublist]
            #print 'Reduced Covariance:'
            #print reducedCovariance

            self.stateCovarFile = self.fullFolderName + '/' + self.covarianceFileName
            f3 = open(self.stateCovarFile, "a")
            f3.write(" ".join(map(lambda x: str(x), covariance)))
            f3.write('\n')
            f3.close()

        if self.options['filtering_parameters']['save_internal_data']:
            if (self.options['filtering_parameters']['filter_kind'] == 'ROUKF'):
                innov=self.filter.findData('reducedInnovation').value
            elif (self.options['filtering_parameters']['filter_kind'] == 'UKFSimCorr' or self.options['filtering_parameters']['filter_kind'] == 'UKFClassic'):
                innov=self.filter.findData('innovation').value

            innovation = [val for val in innov]
            #innovation = [val for sublist in innov for val in sublist]
            #print 'Reduced state:'
            #print reducedState

            self.innovationFile = self.fullFolderName + '/' + self.innovationFileName
            f4 = open(self.innovationFile, "a")
            f4.write(" ".join(map(lambda x: str(x), innovation)))
            f4.write('\n')
            f4.close()

        # print self.basePoints.findData('indices_position').value

        return 0

    def onScriptEvent(self, senderNode, eventName,data):
        return 0;
