import Sofa
import math
import os
import sys
import csv
import yaml
sys.path.append(os.getcwd() + '/../../python_src/utils')
from FileSystemUtils import FolderHandler

__file = __file__.replace('\\', '/') # windows

def createScene(rootNode):
    rootNode.createObject('RequiredPlugin', pluginName='Optimus')

    try :
        sys.argv[0]
    except :
        commandLineArguments = []
    else :
        commandLineArguments = sys.argv

    if len(commandLineArguments) > 1:
        configFileName = commandLineArguments[1]
    else:
        print 'ERROR: Must supply a yaml config file as an argument!'
        return
    print "Command line arguments for python : " + str(commandLineArguments)

    with open(configFileName, 'r') as stream:
        try:
            options = yaml.load(stream)

        except yaml.YAMLError as exc:
            print(exc)
            return

    if options['general_parameters']['linear_solver_kind'] == 'Pardiso':
        rootNode.createObject('RequiredPlugin', name='Pardiso', pluginName='SofaPardisoSolver')

    liver_constForce_SDA(rootNode, options, configFileName)
    return 0


# Class definition
class liver_constForce_SDA(Sofa.PythonScriptController):

    def __init__(self, rootNode, options, configFileName):
        self.options = options
        self.cameraReactivated = False
        self.generalFolderName = self.options['filtering_parameters']['common_directory_prefix'] + self.options['general_parameters']['solver_kind']
        if not os.path.isdir(self.generalFolderName):
            os.mkdir(self.generalFolderName)

        observationInfix = self.options['system_parameters']['observation_points_file_name']
        observationInfix = observationInfix[observationInfix.rfind('/') + 1 : observationInfix.rfind('.')]
        self.folderName = options['filtering_parameters']['filter_kind'] + "_" + observationInfix + options['filtering_parameters']['output_directory_suffix']
        self.fullFolderName = self.generalFolderName + '/' + self.folderName
        folderCreator = FolderHandler()
        folderCreator.createFolder(self.generalFolderName, self.folderName, archiveResults=1)

        # create file with parameters and additional information
        self.options['visual_parameters'] = {}
        self.stateFileName = 'state_' + self.options['filtering_parameters']['output_files_suffix'] + '.txt'
        self.options['visual_parameters']['state_file_name'] = self.stateFileName
        self.varianceFileName = 'variance_' + self.options['filtering_parameters']['output_files_suffix'] + '.txt'
        self.options['visual_parameters']['variance_file_name'] = self.varianceFileName
        self.covarianceFileName = 'covariance_' + self.options['filtering_parameters']['output_files_suffix'] + '.txt'
        self.options['visual_parameters']['covariance_file_name'] = self.covarianceFileName
        self.innovationFileName = 'innovation_' + self.options['filtering_parameters']['output_files_suffix'] + '.txt'
        self.options['visual_parameters']['innovation_file_name'] = self.innovationFileName

        self.informationFileName = self.fullFolderName + '/daconfig.yml'

        with open(self.informationFileName, 'w') as stream:
            try:
                yaml.dump(self.options, stream, default_flow_style=None)

            except yaml.YAMLError as exc:
                print(exc)
                return

        self.createGraph(rootNode)


    def createGraph(self, rootNode):
        self.iterations = 0
        self.timeIterations = 0
        self.amplitude = self.options['force_parameters']['force_amplitude']
        self.period = self.options['force_parameters']['force_period']

        self.rootNode = rootNode

        print "Create graph called (Python side)\n"

        self.lambdaScale = 1.0
        if self.options['filtering_parameters']['filter_kind'] == 'ROUKF':
            self.estimPosition='1'
            self.estimVelocity='0'

        if self.options['filtering_parameters']['filter_kind'] == 'UKFSimCorr':
            self.estimPosition='0'
            self.estimVelocity='0'

        if self.options['filtering_parameters']['filter_kind'] == 'UKFClassic':
            self.estimPosition='1'
            self.estimVelocity='0'

        self.createScene(rootNode)

        return 0


    def createGlobalComponents(self, rootNode):
        # scene global stuff
        rootNode.findData('gravity').value = self.options['general_parameters']['gravity']
        rootNode.findData('dt').value = self.options['general_parameters']['delta_time']

        rootNode.createObject('ViewerSetting', cameraMode='Perspective', resolution='1000 700', objectPickingMethod='Ray casting')
        rootNode.createObject('VisualStyle', name='VisualStyle', displayFlags='showBehaviorModels showForceFields showCollisionModels')

        rootNode.createObject('FilteringAnimationLoop', name="StochAnimLoop", verbose="1")

        if (self.options['filtering_parameters']['filter_kind'] == 'ROUKF'):
            self.filter = rootNode.createObject('ROUKFilter', name="ROUKF", verbose="1", useUnbiasedVariance=self.options['filtering_parameters']['use_unbiased_variance'], sigmaTopology=self.options['filtering_parameters']['sigma_points_topology'], lambdaScale=self.lambdaScale)
        elif (self.options['filtering_parameters']['filter_kind'] == 'UKFSimCorr'):
            self.filter = rootNode.createObject('UKFilterSimCorr', name="UKF", verbose="1", useUnbiasedVariance=self.options['filtering_parameters']['use_unbiased_variance'], sigmaTopology=self.options['filtering_parameters']['sigma_points_topology'], lambdaScale=self.lambdaScale)
        elif (self.options['filtering_parameters']['filter_kind'] == 'UKFClassic'):
            self.filter = rootNode.createObject('UKFilterClassic', name="UKFClas", verbose="1", exportPrefix=self.fullFolderName, useUnbiasedVariance=self.options['filtering_parameters']['use_unbiased_variance'], sigmaTopology=self.options['filtering_parameters']['sigma_points_topology'], lambdaScale=self.lambdaScale)
        else:
            print 'Unknown filter type!'

        fileExtension = self.options['system_parameters']['volume_file_name']
        fileExtension = fileExtension[fileExtension.rfind('.') + 1:]
        if fileExtension == 'vtk' or fileExtension == 'vtu':
            rootNode.createObject('MeshVTKLoader', name='loader', filename=self.options['system_parameters']['volume_file_name'])
        elif fileExtension == 'msh':
            rootNode.createObject('MeshGmshLoader', name='loader', filename=self.options['system_parameters']['volume_file_name'])
        else:
            print 'Unknown file type!'
        # rootNode.createObject('MeshSTLLoader', name='objectSLoader', filename=self.surfaceSTL)

        return 0


    #components common for both master and slave: the simulation itself (without observations and visualizations)
    def createCommonComponents(self, node):
        # node.createObject('StaticSolver', applyIncrementFactor="0")
        if self.options['general_parameters']['solver_kind'] == 'Euler':
            node.createObject('EulerImplicitSolver', rayleighStiffness=self.options['general_parameters']['rayleigh_stiffness'], rayleighMass=self.options['general_parameters']['rayleigh_mass'])
        elif self.options['general_parameters']['solver_kind'] == 'Symplectic':
            node.createObject('VariationalSymplecticSolver', rayleighStiffness=self.options['general_parameters']['rayleigh_stiffness'], rayleighMass=self.options['general_parameters']['rayleigh_mass'], newtonError='1e-12', steps='1', verbose='0')
        elif self.options['general_parameters']['solver_kind'] == 'Newton':
            node.createObject('NewtonStaticSolver', name="NewtonStatic", printLog="0", correctionTolerance="1e-8", residualTolerance="1e-8", convergeOnResidual="1", maxIt="2")
        else:
            print 'Unknown solver type!'

        if self.options['general_parameters']['linear_solver_kind'] == 'Pardiso':
            node.createObject('SparsePARDISOSolver', name="precond", symmetric="1", exportDataToFolder="", iterativeSolverNumbering="0")
            # node.createObject('StepPCGLinearSolver', name="StepPCG", iterations="10000", tolerance="1e-12", preconditioners="precond", verbose="1", precondOnTimeStep="1")
        elif self.options['general_parameters']['linear_solver_kind'] == 'CG':
            node.createObject('CGLinearSolver', iterations="20", tolerance="1e-12", threshold="1e-12")
        else:
            print 'Unknown linear solver type!'

        node.createObject('MechanicalObject', src="@/loader", name="Volume")
        node.createObject('TetrahedronSetTopologyContainer', name="Container", src="@/loader", tags=" ")
        node.createObject('TetrahedronSetTopologyModifier', name="Modifier")
        node.createObject('TetrahedronSetTopologyAlgorithms', name="TopoAlgo")
        node.createObject('TetrahedronSetGeometryAlgorithms', name="GeomAlgo")
        if 'total_mass' in self.options['general_parameters'].keys():
            node.createObject('UniformMass', totalMass=self.options['general_parameters']['total_mass'])
        if 'density' in self.options['general_parameters'].keys():
            node.createObject('MeshMatrixMass', printMass='0', lumping='1', massDensity=self.options['general_parameters']['density'], name='mass')

        node.createObject('OptimParams', name="paramE", optimize="1", numParams=self.options['filtering_parameters']['optim_params_size'], template="Vector", initValue=self.options['filtering_parameters']['initial_stiffness'], minValue=self.options['filtering_parameters']['minimal_stiffness'], maxValue=self.options['filtering_parameters']['maximal_stiffness'], stdev=self.options['filtering_parameters']['initial_standart_deviation'], transformParams=self.options['filtering_parameters']['transform_parameters'])
        node.createObject('Indices2ValuesMapper', name='youngMapper', indices='1 2 3 4 5 6 7 8 9 10', values='@paramE.value', inputValues='@/loader.dataset')
        node.createObject('TetrahedronFEMForceField', name='FEM', updateStiffness='1', listening='true', drawHeterogeneousTetra='1', method='large', youngModulus='@paramE.value', poissonRatio='0.45')

        if 'boundary_conditions_list' in self.options['general_parameters'].keys():
            for index in range(0, len(self.options['general_parameters']['boundary_conditions_list'])):
                bcElement = self.options['general_parameters']['boundary_conditions_list'][index]
                node.createObject('BoxROI', box=bcElement['boxes_coordinates'], name='boundBoxes'+str(index), doUpdate='0')
                if bcElement['condition_type'] == 'fixed':
                    #node.createObject('FixedConstraint', indices='@boundBoxes'+str(index)+'.indices'
                    node.createObject('FixedConstraint', indices=bcElement['fixed_indices'])
                elif bcElement['condition_type'] == 'elastic':
                    node.createObject('ExtendedRestShapeSpringForceField', stiffness=bcElement['spring_stiffness_values'], showIndicesScale='0', springThickness="3", listening="1", updateStiffness="1", printLog="0", points='@boundBoxes'+str(index)+'.indices')
                    #node.createObject('ExtendedRestShapeSpringForceField', stiffness='@paramE.value', showIndicesScale='0', springThickness="3", listening="1", updateStiffness="1", printLog="0", points='@boundBoxes'+str(index)+'.indices')
                else:
                    print 'Unknown type of boundary conditions'

        # add constant force field
        node.createObject('BoxROI', name='impactBounds', box='0.14 0.15 0.4 0.16 0.17 0.43', doUpdate='0')
        #node.createObject('ConstantForceField', name='appliedForce', indices='@impactBounds.indices', totalForce=self.options['impact_parameters']['force_value'])
        self.constantForce = node.createObject('ConstantForceField', name='appliedForce', indices=self.options['impact_parameters']['applied_indices'], totalForce='0.0 0.0 0.0')

        return 0


    def createMasterScene(self, node):
        node.createObject('StochasticStateWrapper', name="StateWrapper", verbose="1", estimatePosition=self.estimPosition, positionStdev=self.options['filtering_parameters']['positions_standart_deviation'], posModelStdev=self.options['filtering_parameters']['model_standart_deviation'], estimateVelocity=self.estimVelocity)

        self.createCommonComponents(node)

        obsNode = node.createChild('obsNode')
        obsNode.createObject('MeshVTKLoader', name='obsLoader', filename=self.options['system_parameters']['observation_points_file_name'])
        obsNode.createObject('MechanicalObject', name='SourceMO', src="@obsLoader")
        obsNode.createObject('BarycentricMapping')
        obsNode.createObject('MappedStateObservationManager', name="MOBS", observationStdev=self.options['filtering_parameters']['observation_noise_standart_deviation'], noiseStdev="0.0", listening="1", stateWrapper="@../StateWrapper", doNotMapObservations="1", verbose="1")
        obsNode.createObject('SimulatedStateObservationSource', name="ObsSource", monitorPrefix = self.generalFolderName + '/' + self.options['system_parameters']['observation_file_name'])
        obsNode.createObject('ShowSpheres', radius="0.002", color="1 0 0 1", position='@SourceMO.position')
        obsNode.createObject('ShowSpheres', radius="0.0015", color="1 1 0 1", position='@MOBS.mappedObservations')

        return 0


    def createScene(self,node):
        # r_slaves = [] # list of created auxiliary nodes
        self.createGlobalComponents(node)

        masterNode=node.createChild('MasterScene')
        self.createMasterScene(masterNode)

        return 0


    def initGraph(self,node):
        print 'Init graph called (python side)'
        self.step    =     0
        self.total_time =     0

        # self.process.initializationObjects(node)
        return 0

    def onEndAnimationStep(self, deltaTime):

        self.iterations = self.iterations + 1
        self.timeIterations = self.timeIterations + 1
        if self.options['impact_parameters']['impact_type'] == 'Periodic':
            currentValue = self.options['force_parameters']['force_value']
            currentValue = [elem * self.amplitude * 0.5 * (1 - math.cos(math.pi * self.iterations / self.period)) for elem in currentValue]
            self.constantForce.findData('totalForce').value = currentValue


        if self.options['filtering_parameters']['save_state']:
            if (self.options['filtering_parameters']['filter_kind'] == 'ROUKF'):
                st=self.filter.findData('reducedState').value
            elif (self.options['filtering_parameters']['filter_kind'] == 'UKFSimCorr' or self.options['filtering_parameters']['filter_kind'] == 'UKFClassic'):
                st=self.filter.findData('state').value

            state = [val for sublist in st for val in sublist]
            #print 'Reduced state:'
            #print reducedState

            self.stateExpValFile = self.fullFolderName + '/' + self.stateFileName
            print 'Storing to',self.stateExpValFile
            f1 = open(self.stateExpValFile, "a")
            f1.write(" ".join(map(lambda x: str(x), state)))
            f1.write('\n')
            f1.close()

            if (self.options['filtering_parameters']['filter_kind'] == 'ROUKF'):
                var=self.filter.findData('reducedVariance').value
            elif (self.options['filtering_parameters']['filter_kind'] == 'UKFSimCorr' or self.options['filtering_parameters']['filter_kind'] == 'UKFClassic'):
                var=self.filter.findData('variance').value

            variance = [val for sublist in var for val in sublist]
            #print 'Reduced variance:'
            #print reducedVariance

            self.stateVarFile = self.fullFolderName + '/' + self.varianceFileName
            f2 = open(self.stateVarFile, "a")
            f2.write(" ".join(map(lambda x: str(x), variance)))
            f2.write('\n')
            f2.close()

            if (self.options['filtering_parameters']['filter_kind'] == 'ROUKF'):
                covar=self.filter.findData('reducedCovariance').value
            elif (self.options['filtering_parameters']['filter_kind'] == 'UKFSimCorr' or self.options['filtering_parameters']['filter_kind'] == 'UKFClassic'):
                covar=self.filter.findData('covariance').value

            covariance = [val for sublist in covar for val in sublist]
            #print 'Reduced Covariance:'
            #print reducedCovariance

            self.stateCovarFile = self.fullFolderName + '/' + self.covarianceFileName
            f3 = open(self.stateCovarFile, "a")
            f3.write(" ".join(map(lambda x: str(x), covariance)))
            f3.write('\n')
            f3.close()

        if self.options['filtering_parameters']['save_internal_data']:
            if (self.options['filtering_parameters']['filter_kind'] == 'ROUKF'):
                innov=self.filter.findData('reducedInnovation').value
            elif (self.options['filtering_parameters']['filter_kind'] == 'UKFSimCorr' or self.options['filtering_parameters']['filter_kind'] == 'UKFClassic'):
                innov=self.filter.findData('innovation').value

            innovation = [val for sublist in innov for val in sublist]
            #print 'Reduced state:'
            #print reducedState

            self.innovationFile = self.fullFolderName + '/' + self.innovationFileName
            f4 = open(self.innovationFile, "a")
            f4.write(" ".join(map(lambda x: str(x), innovation)))
            f4.write('\n')
            f4.close()

        # print self.basePoints.findData('indices_position').value

        return 0

    def onScriptEvent(self, senderNode, eventName,data):
        return 0;
