<?xml version="1.0"?>

<Node    name="root" dt="0.01" gravity="0 0 0" >
      <RequiredPlugin pluginName="Optimus"/>

      <VisualStyle displayFlags=" showCollisionModels hideForceFields" />

        <Node name="GroundTruth">
            <EdgeSetTopologyContainer  name="Container"
            position="   0     0  0     -0.01  0  0    -0.02  0  0    -0.03  0  0    -0.04  0  0
            -0.05  0  0     -0.06  0  0    -0.07  0  0    -0.08  0  0    -0.09  0  0
            -0.1   0  0     -0.11  0  0    -0.12  0  0    -0.13  0  0    -0.14  0  0
            -0.15  0  0     -0.16  0  0    -0.17  0  0    -0.18  0  0    -0.19  0  0 "
            edges=  "0 1   1 2   2 3   3 4   4 5   5 6   6 7   7 8   8 9   9  10
            10 11  11 12   12 13   13 14   14 15   15 16   16 17   17 18   18 19"/>
            <Transform3dToRigid name="transform"/>
            <MechanicalObject name="catDoFs" position="@transform.out_position" template="Rigid"  showObject="false" />
            <ReadState filename="IPCAI_GT" />
            <Sphere radius="0.002" color="0 1 0 1" />
        </Node>

        <Node name="Filterz">
            <EdgeSetTopologyContainer  name="Container"
            position="   0     0  0     -0.01  0  0    -0.02  0  0    -0.03  0  0    -0.04  0  0
            -0.05  0  0     -0.06  0  0    -0.07  0  0    -0.08  0  0    -0.09  0  0
            -0.1   0  0     -0.11  0  0    -0.12  0  0    -0.13  0  0    -0.14  0  0
            -0.15  0  0     -0.16  0  0    -0.17  0  0    -0.18  0  0    -0.19  0  0 "
            edges=  "0 1   1 2   2 3   3 4   4 5   5 6   6 7   7 8   8 9   9  10
            10 11  11 12   12 13   13 14   14 15   15 16   16 17   17 18   18 19"/>
            <Transform3dToRigid name="transform"/>
            <MechanicalObject name="catDoFs" position="@transform.out_position" template="Rigid"  showObject="false" />
            <ReadState filename="IPCAI_FLTR" />
            <Sphere radius="0.002" color="0 0 1 1" />
        </Node>
</Node>
