<?xml version="1.0"?>
<Node    name="root" dt="0.001" gravity="0 0 0" >
    <RequiredPlugin pluginName="Optimus"/>c
    <RequiredPlugin pluginName="ImageMeshAux" />
    <RequiredPlugin pluginName="ConstraintGeometryPlugin" />
    <RequiredPlugin pluginName="NeedleConstraintPlugin" />
    <RequiredPlugin pluginName="OpenCVPlugin" />
    <RequiredPlugin pluginName="SofaAsyncSolvers" />


<VisualStyle displayFlags="showVisualModels hideBehaviorModels hideCollisionModels hideMappings hideForceFields hideWireframe" />
<BackgroundSetting color="1 1 1 1" />
<OpenCVPngStreamer name="streamer" filename="/home/raffa/work/data_optimus/Raffa/cat0/cat0__??????.png" imageId="001447"/>
<OpenCVProjectiveCalibrator listening="1" name="calibrator" streamer="streamer" mode="0"
                            projectionMatrix="[-3452.30000000000	219.165000000000	-50.3532000000002	251.620000000000
                                                -24.5691000000002	647.057000000000	3388.13000000000	271.587000000000
                                                -0.00217631999999999	0.993000000000000	-0.118096000000000	0.474452000000000]"
                            drawCamera="0" depth="0.7" drawzNear="0.0000001" drawViewPort="0" drawscreenSize="640 480" drawzFar="10000000" drawscreenPosition="0 0" drawswapMainView="1" />
<OpenCVViewer name="viewer" streamer="streamer" drawcolor="1 1 1 1" />
<OpenCVScheduler name="scheduler" frequency="0.0" sequence="001447 004014" />0

 <Node name="simulation">
        <PreStochasticWrapper />
        <Node name="init">
            <EulerImplicitSolver  />
            <CGLinearSolver iterations="25" tolerance="1e-5" threshold="1e-5"/>
            <MechanicalObject template="Vec3" name="MO"
                              position="   0.0082633  0.052761  -0.060243  0.0036518  0.05402  -0.059224  -0.0013484  0.05402  -0.059224  -0.0063486  0.054018  -0.059224  -0.011349  0.054016  -0.059224  -0.016349  0.054014  -0.059224  -0.021349  0.054012  -0.059224  -0.026349  0.05401  -0.059224  -0.031349  0.054007  -0.059225  -0.036349  0.054004  -0.059225  -0.041349  0.054  -0.059226  -0.046349  0.053997  -0.059227"/>
            <ReadState filename="/home/raffa/work/Optimus/scenes/estimState/realDataSet/rszrealAll3" />
            <ShowSpheres  radius="0.0"  color="0 0 1 1" position="@MO.position" />
        </Node>

        <Node name="init">
            <EulerImplicitSolver  />
            <CGLinearSolver iterations="25" tolerance="1e-5" threshold="1e-5"/>
            <MechanicalObject template="Vec3" name="MO"
                              position="   0.0082633  0.052761  -0.060243  0.0036518  0.05402  -0.059224  -0.0013484  0.05402  -0.059224  -0.0063486  0.054018  -0.059224  -0.011349  0.054016  -0.059224  -0.016349  0.054014  -0.059224  -0.021349  0.054012  -0.059224  -0.026349  0.05401  -0.059224  -0.031349  0.054007  -0.059225  -0.036349  0.054004  -0.059225  -0.041349  0.054  -0.059226  -0.046349  0.053997  -0.059227"/>
            <ReadState filename="/home/raffa/work/Optimus/scenes/estimState/realDataSet/readQuaternion" />
            <ShowSpheres  radius="0.000"  color="1 0 0  1" position="@MO.position" />
        </Node>


        <Node name="init">
            <EulerImplicitSolver  />
            <CGLinearSolver iterations="25" tolerance="1e-5" threshold="1e-5"/>
            <MechanicalObject template="Vec3" name="MO"
                              position="   0.0082633  0.052761  -0.060243  0.0036518  0.05402  -0.059224  -0.0013484  0.05402  -0.059224  -0.0063486  0.054018  -0.059224  -0.011349  0.054016  -0.059224  -0.016349  0.054014  -0.059224  -0.021349  0.054012  -0.059224  -0.026349  0.05401  -0.059224  -0.031349  0.054007  -0.059225  -0.036349  0.054004  -0.059225  -0.041349  0.054  -0.059226  -0.046349  0.053997  -0.059227"/>
            <ReadState filename="/home/raffa/work/Optimus/scenes/estimState/realDataSet/readQuaternion2" />
            <ShowSpheres  radius="0.000"  color="1 1  0  1" position="@MO.position" />
        </Node>

        <Node name="VisualRealSurface">
            <VisualStyle displayFlags="showWireframe " />
            <MeshSTLLoader name="surface" filename="/home/raffa/work/data_optimus/Raffa/phantomScaled.stl"  />
            <MeshTopology src="@surface" />
            <MechanicalObject name="DOFs" />
            <OglModel name="VisualModel" src="@surface"  material="Default Diffuse 1 1 0.93 0.83 0.05 Ambient 0 0 0 0 0 Specular 0 0 0 0 0 Emissive 0 0 0 0 0 Shininess 0 45" />
        </Node>
    </Node>
</Node>
