<?xml version="1.0"?>
<Node    name="root" dt="0.001" gravity="0 0 0" >
    <RequiredPlugin pluginName="Optimus"/>c
    <RequiredPlugin pluginName="ImageMeshAux" />
    <RequiredPlugin pluginName="ConstraintGeometryPlugin" />
    <RequiredPlugin pluginName="NeedleConstraintPlugin" />
    <RequiredPlugin pluginName="OpenCVPlugin" />
<!--     <RequiredPlugin pluginName="SofaAsyncSolvers" /> -->


    <VisualStyle displayFlags="showVisualModels hideBehaviorModels hideCollisionModels hideMappings hideForceFields hideWireframe" />
    <BackgroundSetting color="1 1 1 1" />
    <ViewerSetting resolution="837 600" />

<!--     <FreeMotionAnimationLoop /> -->
<!--     <GenericConstraintSolver name="GenericConstraintSolver"  printLog="0"  maxIterations="1000"  tolerance="1e-10"  allVerified="0" />   -->

    <FilteringAnimationLoop name="StochAnimLoop" verbose="1"/>
    <UKFilterClassic name="UKF" verbose="1" useUnbiasedVariance="0"   draw="0" radiusDraw="0.0" MOnodesDraw="12"  filenameFinalState="realDataSet/real_Q6_1" exportPrefix="cov_" />


    <Node name="validationView"/>
        <OpenCVPngStreamer name="streamer" filename="/home/rtrivi/work/Optimus/scenes/estimState/realDataSet/cat0/cat0__??????.png" imageId="001448"/>
        <OpenCVProjectiveCalibrator listening="1" name="calibrator" streamer="streamer" mode="0" projectionMatrix="[-3452.3 219.165 -50.3532 251.620 -24.5691 647.057 3388.13 271.587 -0.00217632 0.993 -0.118096	0.474452]" drawCamera="0" depth="0.9" drawzNear="0.0000001" drawViewPort="0" drawscreenSize="640 480" drawzFar="10000000" drawscreenPosition="0 0" drawswapMainView="1" />
        <OpenCVViewer name="viewer" streamer="streamer" drawcolor="1 1 1 1" />
        <OpenCVScheduler name="scheduler" frequency="0"  />
    <Node />

<!--    <Node name="aquisitionView" />
        <OpenCVPngStreamer name="streamer" filename="realDataSet/cat1/test_004014.png" imageId="001448"/>
        <OpenCVProjectiveCalibrator listening="1" name="calibrator" streamer="streamer" mode="0"  projectionMatrix="[-3320.65	174.572	-514.441 193.451 134.409 3340.13 44.4847 -64.7090 0.0480279	0.103531 -0.993466 0.400192]" drawCamera="0" depth="0.7" drawzNear="0.0000001" drawViewPort="0" drawscreenSize="640 480" drawzFar="10000000" drawscreenPosition="0 0" drawswapMainView="1" />
        <OpenCVViewer name="viewer" streamer="streamer" drawcolor="1 1 1 1" />
        <OpenCVScheduler name="scheduler" frequency="0"  />
    <Node/>-->

    <Node name="Reference">
        <PreStochasticWrapper />
        <Node name="init">
            <EulerImplicitSolver  />
            <CGLinearSolver iterations="25" tolerance="1e-5" threshold="1e-5"/>
            <MechanicalObject template="Vec3" name="MO" position="0.015043  0.053987  -0.058037  0.010226  0.054093  -0.058009  0.0053189  0.054576  -0.057995  0.00031872  0.054576  -0.057995  -0.0046815  0.054576  -0.057995  -0.0096816  0.054575  -0.057996  -0.014682  0.054575  -0.057996  -0.019682  0.054574  -0.057996  -0.024682  0.054572  -0.057997  -0.029682  0.054571  -0.057998  -0.034682  0.054569  -0.057999  -0.039682  0.054568  -0.058"/>
<!--             <ReadState filename="/home/rtrivi/work/Optimus/scenes/estimState/realDataSet/referenceAll3" /> -->
<!--            <MechanicalObject template="Vec3" name="MO" position="0.015192 0.053973 -0.0579 0.0042507 0.054592 -0.057979 -0.0067152 0.054591 -0.057979 -0.017681 0.05459 -0.05798 -0.028647 0.054587 -0.057982 -0.039613 0.054584 -0.057984"/>
            <ReadState filename="realDataSet/resizeCat_N_6" />-->

<!--             <ShowSpheres  radius="0.0002"  color="0 0 1 1" position="@MO.position" /> -->
        </Node>
        <Node name="VisualRealSurface">
<!--             <VisualStyle displayFlags="showWireframe " />  -->
            <MeshSTLLoader name="surface" filename="realDataSet/phantomScaled.stl"  />
            <MeshTopology src="@surface" />
            <MechanicalObject name="DOFs" />
            <OglModel name="VisualModel" src="@surface"  material="Default Diffuse 1 1 0.93 0.83 0.05 Ambient 0 0 0 0 0 Specular 0 0 0 0 0 Emissive 0 0 0 0 0 Shininess 0 45" />
        </Node>
    </Node>
<!--  </Node>  -->
    <Node name="filteredModel">
        <StochasticStateWrapper name="StateWrapper" template="Rigid3d" verbose="1" estimatePosition="1"  estimateOnlyXYZ="1" estimateVelocity="1"
        positionStdev="1.4e-04     1.4e-04     1.4e-04   0 0 0 "
        velocityStdev="1.4e-04      1.4e-04     1.4e-04    1.4e-04      1.4e-04     1.4e-04  "
        posModelStdev="0 0 0 0 0 0 "
        velModelStdev="1.4e-04      1.4e-04     1.4e-04   1.4e-04      1.4e-04     1.4e-04   "
        mappedState="ball/CollisionBall/ms" langrangeMultipliers="1" draw="0" radiusDraw="0.0"/>

        <GenericConstraintSolver name="GenericConstraintSolver"  printLog="0"  maxIterations="1000"  tolerance="1e-10"  allVerified="0" />

        <Node name="ball">
            <EulerImplicitSolver rayleighMass="0.00" rayleighStiffness="0.0" />
<!--             <PCGLinearSolver  preconditioners="BTD" update_step="1"/>  -->
            <BTDLinearSolver name="BTD"/>
<!--            <MechanicalObject template="Rigid" name="MO"
                              position=" 0.015043 0.053987 -0.058037 -5.84121e-12 -0.707107 0.707107 -3.31838e-10 0.010226 0.054093 -0.058009 -7.7867e-12 -0.707107 0.707107 -3.29785e-10 0.00531889 0.054576 -0.057995 -1.94831e-12 -0.707107 0.707107 2.06597e-12 0.000318715 0.054576 -0.057995 6.338e-06 -0.707107 0.707107 -3.9493e-05 -0.00468152 0.0545756 -0.0579953 7.922e-06 -0.707107 0.707107 -4.9364e-05 -0.00968158 0.0545752 -0.0579956 2.255e-05 -0.707107 0.707107 -7.74e-05 -0.0146817 0.0545746 -0.057996 3.7177e-05 -0.707107 0.707107 -0.000105436 -0.0196818 0.0545736 -0.0579964 3.0473e-05 -0.707107 0.707107 -0.000126767 -0.0246819 0.0545724 -0.057997 4.3515e-05 -0.707107 0.707107 -0.000144928 -0.0296819 0.0545711 -0.0579977 5.8143e-05 -0.707107 0.707107 -0.000172964 -0.0346819 0.0545694 -0.0579987 5.3023e-05 -0.707107 0.707107 -0.00020417 -0.039682 0.0545677 -0.0579997 5.3023e-05 -0.707107 0.707107 -0.00020417" showObject="0" showObjectScale="0.001"/>
            <Mesh name="lines" lines="0 1  1 2 2 3 3 4 4 5 5 6 6 7 7 8 8 9 9 10 10 11  " />-->
            <MechanicalObject template="Rigid" name="MO"
                              position="  0.01504300000000000082 0.05398700000000000027 -0.05803699999999999831 0.007348283780554797605 0.7312437546025285506 -0.6820311600085957604 -0.007878506051703020735 -0.01230769823172369985 0.05457499999999999851 -0.05799599999999999894 -4.366723939209342251e-05 0.7312861932050940261 -0.6820707308939534252 0.0001406362760827442853 -0.03968200000000000199 0.05456799999999999845 -0.05800000000000000294 -4.366723939209343606e-05 0.7312861932050940261 -0.6820707308939535363 0.0001406362760827442853" showObject="0" showObjectScale="0.001"/>
            <Mesh name="lines" lines="0 1  1 2 " />
<!--                <MechanicalObject template="Rigid" name="MO"
                              position=" 0.01504300000000000082 0.05398700000000000027 -0.05803699999999999831 0.01839539064948729485 0.7315552858583641571 -0.681247575952430906 -0.01975382480627222576 0.00411688375344516997 0.05457599999999999951 -0.05799499999999999794 -2.674541860564012675e-05 0.7318219380778041572 -0.6814958911192430246 2.490618542248468361e-05 -0.006832837677081409627 0.05457519965535759937 -0.05799499999999999794 -8.97001018173616657e-06 0.7318219384892258317 -0.6814958879258702362 7.074984388240782387e-05 -0.01778255882642349947 0.05457399999999999751 -0.05799599999999999894 -3.709470393499610992e-05 0.7318219332920582465 -0.6814958829779182992 0.0001343904937559859867 -0.02873227957378480038 0.05457139980724529799 -0.05799760019275469747 -3.893226011916606059e-05 0.7318219292268504095 -0.6814958751106552359 0.0001859949786955759519 -0.03968200000000000199 0.05456799999999999845 -0.05800000000000000294 -3.893226011916604026e-05 0.7318219292268504095 -0.6814958751106552359 0.0001859949786955759519" showObject="0" showObjectScale="0.001"/>
            <Mesh name="lines" lines="0 1  1 2  2 3 3 4 4   5"/>-->
            <UniformMass totalMass="0.0001" printLog="false" />
            <BeamFEMForceField name="FEM" radius="0.0005" youngModulus="1e6" poissonRatio="0.49" useSymmetricAssembly="1"/>
            <ConstantForceField force="0.0008 0 -0.0008  0.0 0.0  0.0 "  indices=" 11"/>
            <Node name="CollisionBall">
                <CubeTopology nx="21" ny="1" nz="1" min="0 0 0" max="2 0 0" />
                <MechanicalObject name="ms" />
                <BeamLinearMapping />
                <EdgeGeometry name="edge"/>
                <PointGeometry name ="point"/>
<!--                 <ShowSpheres  radius="0.0002"  color="0 1 0 1" position="@ms.position" /> -->
                <BoxROI name="boxA" box="0 0 -0.1 0.1 0.1 0" drawBoxes="0" drawSize="1" position="@ms.position"/>
            </Node>
            <Node name="visu">
                <CubeTopology nx="21" ny="1" nz="1" min="0 0 0" max="2 0 0" />
                <MechanicalObject name="ms" />
                <BeamLinearMapping />
                <ShowSpheres  radius="0.0"  color="0 0 1 1" position="@ms.position" />
                <StochasticPositionHandler filename="realDataSet/visu_N6_Q1" observations="true"  /> -->

            </Node>

<!--             <Node name="VM">
                <MechanicalObject name="VisualDOFs"/>
                <QuadSetTopologyContainer name="ContainerCath" />
                <QuadSetTopologyModifier name="Modifier"/>
                <QuadSetTopologyAlgorithms name="TopoAlgo" template="Vec3d"/>
                <QuadSetGeometryAlgorithms name="GeomAlgo" template="Vec3d"/>
                <Edge2QuadTopologicalMapping nbPointsOnEachCircle="10" radius="0.5" input="@../lines" output="@ContainerCath"/>
                <TubularMapping nbPointsOnEachCircle="10" radius="0.0003" input="@../MO" output="@VisualDOFs" />

                <Node name="VisuOgl">
                    <OglModel position="@../ContainerCath.position" vertices="@../ContainerCath.position" quads="@../ContainerCath.quads"
                    color="0.85 0.85 0.85" material="texture Ambient 1 0.2 0.2 0.2 0.0 Diffuse 0 1.0 1.0 1.0 1.0 Specular 1 1.0 1.0 1.0 1.0 Emissive 0 0.15 0.05 0.05 0.0 Shininess 1 20" name="VisualCatheter"/>                    <IdentityMapping />
                </Node>
            </Node>  -->
            <LinearSolverConstraintCorrection solverName="BTD" />

 <!--           <Node name="obsNode" activated="1">
                <SimulatedStateObservationSource template="Vec2d" name="observations" monitorPrefix="/home/rtrivi/work/Optimus/scenes/estimState/realDataSet/obs_N5" asynObs="true"/>
                <BindedSimpleObservationManager name="MSIDES" template="Vec2d,Rigid3d" listening="1"  stateWrapper="@../../StateWrapper" use2dObservation="true"   mappedState="../CollisionBall/ms"
                                          projectionMatrix="[-3320.65	174.572	-514.441	193.451 134.409	3340.13	44.4847	-64.7090 0.0480279000000001	0.103531	-0.993466	0.400192]" verbose="1" observationStdev="1" bindId="0 3 6 9 12"/>
            </Node>-->

            <Node name="obsNode" activated="1">
                <SimulatedStateObservationSource template="Vec2d" name="observations" monitorPrefix="realDataSet/obs_N3" asynObs="true"/>
                <SimpleObservationManager name="MSIDES" template="Vec2d,Rigid3d" listening="1"  stateWrapper="@../../StateWrapper" use2dObservation="true"
                                          projectionMatrix="[-3320.65	174.572	-514.441	193.451
                                                            134.409	3340.13	44.4847	-64.7090
                                                            0.0480279000000001	0.103531	-0.993466	0.400192]" verbose="1" observationStdev="0.001"/>
            </Node>

    </Node>


    <Node name="Spring" >
        <VisualStyle displayFlags="showWireframe hideCollisionModels"  />
        <MeshSTLLoader name="surface" filename="/home/rtrivi/work/Optimus/scenes/estimState/realDataSet/phantomScaled.stl"  />
        <TransformStochasticEngine name="transform" input_position="@surface.position" optimParams="0 0 0 0 0 0 "  triangles="@surface.triangles"  />
        <MeshTopology name="mesh" position="@transform.output_position" triangles="@transform.triangles"  />
        <TriangleSetTopologyContainer name="Container" src="@mesh" />
        <MechanicalObject name="MS" free_position="@transform.output_position" position="@transform.output_position" template="Vec3d" />
        <TriangleGeometry name="triangle"/>
        <AABBDecorator/>
    </Node>


    <NeedleContactConstraint needle="ball/CollisionBall/point" surface="Spring/triangle" tipIndex="@ball/CollisionBall/boxA.indices" friction="0.1" draw="0" draw_normal_scale="0.001" />
    </Node>


</Node>
