<?xml version="1.0"?>
<Node    name="root" dt="0.001" gravity="0 0 0" >
    <RequiredPlugin pluginName="Optimus"/>c
    <RequiredPlugin pluginName="ConstraintGeometryPlugin" />
    <RequiredPlugin pluginName="NeedleConstraintPlugin" />
    <RequiredPlugin pluginName="OpenCVPlugin" />


    <VisualStyle displayFlags="showVisualModels hideBehaviorModels hideCollisionModels hideMappings hideForceFields hideWireframe" />
    <BackgroundSetting color="1 1 1 1" />
    <ViewerSetting resolution="837 600" />

    <FilteringAnimationLoop name="StochAnimLoop" verbose="1"/>
    <UKFilterClassic name="UKF" verbose="1" useUnbiasedVariance="0"   draw="0" radiusDraw="0.0001" MOnodesDraw="12"   exportPrefix="cov_" />


<!--  ####   HERE YOU CAN CHOOSE YOUR VIEW: EITHER SIDE OR TOP VIEW   ####-->

    <Node name="validationView"/>
        <OpenCVPngStreamer name="streamer" filename="realDataSet/cat0_/cat0__????.png" imageId="0001"/>
        <OpenCVProjectiveCalibrator listening="1" name="calibrator" streamer="streamer" mode="0" projectionMatrix="[-3452.3 219.165 -50.3532 251.620 -24.5691 647.057 3388.13 271.587 -0.00217632 0.993 -0.118096	0.474452]" drawCamera="0" depth="0.9" drawzNear="0.0000001" drawViewPort="0" drawscreenSize="640 480" drawzFar="10000000" drawscreenPosition="0 0" drawswapMainView="1" />
        <OpenCVViewer name="viewer" streamer="streamer" drawcolor="1 1 1 1" />
        <OpenCVScheduler name="scheduler" frequency="0"  />
    <Node />

<!--    <Node name="aquisitionView" />
        <OpenCVPngStreamer name="streamer" filename="realDataSet/cat1_/test_??????.png" imageId="001451"/>
        <OpenCVProjectiveCalibrator listening="1" name="calibrator" streamer="streamer" mode="0"  projectionMatrix="[-3320.65	174.572	-514.441 193.451 134.409 3340.13 44.4847 -64.7090 0.0480279	0.103531 -0.993466 0.400192]" drawCamera="0" depth="0.7" drawzNear="0.0000001" drawViewPort="0" drawscreenSize="640 480" drawzFar="10000000" drawscreenPosition="0 0" drawswapMainView="1" />
        <OpenCVViewer name="viewer" streamer="streamer" drawcolor="1 1 1 1" />
        <OpenCVScheduler name="scheduler" frequency="0"  />
    <Node/>-->


    <!--  ####   HERE YOU HAVE A NODE WITH THE GROUND TRUTH    ####-->
    <Node name="Reference">
        <PreStochasticWrapper />
        <Node name="init">
            <EulerImplicitSolver  />
            <CGLinearSolver iterations="25" tolerance="1e-5" threshold="1e-5"/>
            <MechanicalObject template="Vec3" name="MO" position="0.015043  0.053987  -0.058037  0.010226  0.054093  -0.058009  0.0053189  0.054576  -0.057995  0.00031872  0.054576  -0.057995  -0.0046815  0.054576  -0.057995  -0.0096816  0.054575  -0.057996  -0.014682  0.054575  -0.057996  -0.019682  0.054574  -0.057996  -0.024682  0.054572  -0.057997  -0.029682  0.054571  -0.057998  -0.034682  0.054569  -0.057999  -0.039682  0.054568  -0.058"/>
            <ReadState filename="realDataSet/referenceAll3" />
            <ShowCatheter  radius="0.0002"  color="0 0 1 1" position="@MO.position" />
        </Node>
        <Node name="VisualRealSurface">
            <MeshSTLLoader name="surface" filename="realDataSet/phantomScaled.stl"  />
            <MeshTopology src="@surface" />
            <MechanicalObject name="DOFs" />
            <OglModel name="VisualModel" src="@surface"  material="Default Diffuse 1 1 0.93 0.83 0.05 Ambient 0 0 0 0 0 Specular 0 0 0 0 0 Emissive 0 0 0 0 0 Shininess 0 45" />
        </Node>
    </Node>


    <!--  ####   HERE YOU HAVE THE NODE WITH THE FILTER     ####-->
    <Node name="filteredModel">
        <StochasticStateWrapper name="StateWrapper" template="Rigid3d" verbose="1" estimatePosition="1"  estimateOnlyXYZ="1" estimateVelocity="1"
                                positionStdev="1e-03  1e-03  1e-03  "
                                velocityStdev="1e-03 1e-03 1e-03 1e-03  1e-03  1e-03  "
                                posModelStdev="0 0 0 "
                                velModelStdev="0 0 0 0 0 0"
                                paramModelStdev="0.000001 0.000001 0.000001
                                                    0.000001 0.000001 0.000001
                                                    0.000001 0.000001 0.000001
                                                    0.000001 0.000001 0.000001
                                                    0.000001 0.000001 0.000001
                                                    0.000001 0.000001 0.000001
                                                    0.000001 0.000001 0.000001
                                                    0.000001 0.000001 0.000001
                                                    0.000001 0.000001 0.000001
                                                    0.000001 0.000001 0.000001
                                                    0.000001 0.000001 0.000001
                                                    0.000001 0.000001 0.000001"
                                mappedState="cat/CollisionCat/ms" langrangeMultipliers="1" draw="0" radiusDraw="0.0"/>
        <OptimParams name="paramForces" optimize="1" template ="VecDeriv3d" numParams="12"
                         stdev="0 0 0
                                    0 0 0
                                    0 0 0
                                    0 0 0
                                    0 0 0
                                    0 0 0
                                    0 0 0
                                    0 0 0
                                    0 0 0
                                    0 0 0
                                    0 0 0
                                    0 0 0 "
                         initValue="0.000001 0.000001 0.000001
                                0.000001 0.000001 0.000001
                                0.000001 0.000001 0.000001
                                0.000001 0.000001 0.000001
                                0.000001 0.000001 0.000001
                                0.000001 0.000001 0.000001
                                0.000001 0.000001 0.000001
                                0.000001 0.000001 0.000001
                                0.000001 0.000001 0.000001
                                0.000001 0.000001 0.000001
                                0.000001 0.000001 0.000001
                                0.000001 0.000001 0.000001" transformParams="0"/>
        <GenericConstraintSolver name="GenericConstraintSolver"  printLog="0"  maxIterations="1000"  tolerance="1e-10"  allVerified="0" />
        <Node name="cat">
            <EulerImplicitSolver rayleighMass="0.00" rayleighStiffness="0.0" />
            <BTDLinearSolver name="BTD"/>
            <MechanicalObject template="Rigid3d" name="MO"
                              position=" 0.015043 0.053987 -0.058037 -5.84121e-12 -0.707107 0.707107 -3.31838e-10
                                        0.010226 0.054093 -0.058009 -7.7867e-12 -0.707107 0.707107 -3.29785e-10
                                        0.00531889 0.054576 -0.057995 -1.94831e-12 -0.707107 0.707107 2.06597e-12
                                        0.000318715 0.054576 -0.057995 6.338e-06 -0.707107 0.707107 -3.9493e-05
                                        -0.00468152 0.0545756 -0.0579953 7.922e-06 -0.707107 0.707107 -4.9364e-05
                                        -0.00968158 0.0545752 -0.0579956 2.255e-05 -0.707107 0.707107 -7.74e-05
                                        -0.0146817 0.0545746 -0.057996 3.7177e-05 -0.707107 0.707107 -0.000105436
                                        -0.0196818 0.0545736 -0.0579964 3.0473e-05 -0.707107 0.707107 -0.000126767
                                        -0.0246819 0.0545724 -0.057997 4.3515e-05 -0.707107 0.707107 -0.000144928
                                        -0.0296819 0.0545711 -0.0579977 5.8143e-05 -0.707107 0.707107 -0.000172964
                                        -0.0346819 0.0545694 -0.0579987 5.3023e-05 -0.707107 0.707107 -0.00020417
                                        -0.039682 0.0545677 -0.0579997 5.3023e-05 -0.707107 0.707107 -0.00020417" showObject="0" showObjectScale="0.001"/>
            <Mesh name="lines" lines="0 1  1 2 2 3 3 4 4 5 5 6 6 7 7 8 8 9 9 10 10 11  " />
            <UniformMass totalMass="0.0001" printLog="false" />
            <BeamFEMForceField name="FEM" radius="0.0005" youngModulus="1e6" poissonRatio="0.49" useSymmetricAssembly="1"/>
<!--             <ConstantForceField force="0.0008 0 -0.0008  0.0 0.0  0.0 "  indices=" 11"/> -->
            <Node name="CollisionCat">
                <CubeTopology nx="12" ny="1" nz="1" min="0 0 0" max="11 0 0" />
                <MechanicalObject name="ms" />
                <BeamLinearMapping />
                <EdgeGeometry name="edge"/>
                <PointGeometry name ="point"/>
                <CorrectionForceField forces ="@../../paramForces.value" />
                <ShowCatheter  radius="0.0002"  color="0 1 0 1" position="@ms.position" />
                <BoxROI name="boxA" box="0 0 -0.1 0.1 0.1 0" drawBoxes="0" drawSize="1" position="@ms.position"/>
            </Node>
<!--             <Node name="VM">
                <MechanicalObject name="VisualDOFs"/>
                <QuadSetTopologyContainer name="ContainerCath" />
                <QuadSetTopologyModifier name="Modifier"/>
                <QuadSetTopologyAlgorithms name="TopoAlgo" template="Vec3d"/>
                <QuadSetGeometryAlgorithms name="GeomAlgo" template="Vec3d"/>
                <Edge2QuadTopologicalMapping nbPointsOnEachCircle="10" radius="0.5" input="@../lines" output="@ContainerCath"/>
                <TubularMapping nbPointsOnEachCircle="10" radius="0.0003" input="@../MO" output="@VisualDOFs" />

                <Node name="VisuOgl">
                    <OglModel position="@../ContainerCath.position" vertices="@../ContainerCath.position" quads="@../ContainerCath.quads"
                    color="0.0 1 0" material="texture Ambient 1 1 1 1 1 Diffuse 0 1.0 1.0 1.0 1.0 Specular 1 1.0 1.0 1.0 1.0 Emissive 0 0.15 0.05 0.05 0.0 Shininess 1 20" name="VisualCatheter"/>                    <IdentityMapping />
                </Node>
            </Node>     -->
            <LinearSolverConstraintCorrection solverName="BTD" />

            <Node name="obsNode" activated="1">
                <SimulatedStateObservationSource template="Vec2d" name="observations" monitorPrefix="realDataSet/Asynobs_N12_noise" asynObs="true"/>
                <SimpleObservationManager name="MSIDES" template="Vec2d,Rigid3d" listening="1"  stateWrapper="@../../StateWrapper" use2dObservation="true"
                                          projectionMatrix="[-3320.65 174.572 -514.441 193.451 134.409 3340.13 44.4847 -64.7090 0.0480279 0.103531 -0.993466 0.400192]" verbose="1" observationStdev="0.0001"/>
            </Node>
        </Node>

        <Node name="Vessel" >
            <VisualStyle displayFlags="showWireframe hideCollisionModels"  />
            <MeshSTLLoader name="surface" filename="realDataSet/phantomScaled2.stl"  />
            <TransformStochasticEngine name="transform" input_position="@surface.position" optimParams="0 0 0 0 0 0 "  triangles="@surface.triangles"  />
            <MeshTopology name="mesh" position="@transform.output_position" triangles="@transform.triangles"  />
            <TriangleSetTopologyContainer name="Container" src="@mesh" />
            <MechanicalObject name="MS" free_position="@transform.output_position" position="@transform.output_position" template="Vec3d" />
            <TriangleGeometry name="triangle"/>
            <AABBDecorator/>
        </Node>

        <NeedleContactConstraint needle="cat/CollisionCat/point" surface="Vessel/triangle" tipIndex="@cat/CollisionCat/boxA.indices" friction="0.1" draw="0" draw_normal_scale="0.001" />

    </Node>


</Node>
