    <?xml version="1.0"?>
    <Node    name="root" dt="0.001" gravity="0 0 0" >
    <RequiredPlugin pluginName="Optimus"/>
    <RequiredPlugin pluginName="ImageMeshAux" />
    <RequiredPlugin pluginName="ConstraintGeometryPlugin" />
    <RequiredPlugin pluginName="NeedleConstraintPlugin" />
    <RequiredPlugin pluginName="OpenCVPlugin" />
    <VisualStyle displayFlags=" hideCollisionModels hideForceFields" />
    <BackgroundSetting color="1 1 1 1" />
    <ViewerSetting resolution="837 600" />
    <FreeMotionAnimationLoop />
    <GenericConstraintSolver name="GenericConstraintSolver"  printLog="0"  maxIterations="1000"  tolerance="1e-10"  allVerified="0" />
    <OpenCVProjectiveCalibrator name="opengl" streamer="video" mode="5" listening="false" drawzNear="0.001" drawzFar="3" />
    <OpenCVOpenGlStreamer name="video" src="@opengl" />
    <OpenCVScheduler name="scheduler" frequency="0" />

        <Node name="all">
            <Node name="ball0">
                <EulerImplicitSolver rayleighMass="0.01" rayleighStiffness="0.1" />
                <SparseLDLSolver name="BTD"/>
                <MechanicalObject template="Rigid" name="MO" position="0 0 0 0 0 0 1    0.01 0 0 0 0 0 1     0.02 0 0 0 0 0 1     0.03 0 0 0 0 0 1    0.04 0 0 0 0 0 1 0.05 0 0 0 0 0 1    0.06 0 0 0 0 0 1     0.07 0 0 0 0 0 1     0.08 0 0 0 0 0 1    0.09 0 0 0 0 0 1" />
                <Mesh name="lines" lines="0 1   1 2   2 3  3 4   4 5   5 6   6 7   7 8   8 9" />
                <UniformMass totalmass="0.0005 " printLog="false" />
                <BeamFEMForceField name="FEM" radius="0.0005" youngModulus="1e6" poissonRatio="0.49" useSymmetricAssembly="1"/>
                <Node name="CollisionBall_f+100_mu-100">
                    <CubeTopology nx="10" ny="1" nz="1" min="0 0 0" max="9 0 0" />
                    <MechanicalObject name="ms" />
                    <BeamLinearMapping />
                    <EdgeGeometry name="edge"/>
                    <PointGeometry name ="point"/>
                    <BoxROI name="boxA" box="-0.1-0.05 -0.1 0.1 0.1 0.1 " drawBoxes="1" drawSize="1" position="@ms.position"/>
                    <ConstantForceField force="-0.001 0.0 0  "/>
                    <ShowSpheres  radius="0.000001"  color="1 0 0 1" position="@ms.position" />
                    <ValuesFromIndices name="indexValue" template="Vec3" in="@ms.position" indices="0 1 2 3 4 5 6 7 8 9" />
                    <WriteState filename="/home/raffa/work/data/journalValid/modelSens/ref_f+100_mu-100" groundTruth="true" />
                </Node>
            <LinearSolverConstraintCorrection solverName="BTD"/>
            </Node>

            <Node name="ball1">
                <EulerImplicitSolver rayleighMass="0.01" rayleighStiffness="0.1" />
                <SparseLDLSolver name="BTD"/>
                <MechanicalObject template="Rigid" name="MO" position="0 0 0 0 0 0 1    0.01 0 0 0 0 0 1     0.02 0 0 0 0 0 1     0.03 0 0 0 0 0 1    0.04 0 0 0 0 0 1 0.05 0 0 0 0 0 1    0.06 0 0 0 0 0 1     0.07 0 0 0 0 0 1     0.08 0 0 0 0 0 1    0.09 0 0 0 0 0 1" />
                <Mesh name="lines" lines="0 1   1 2   2 3  3 4   4 5   5 6   6 7   7 8   8 9" />
                <UniformMass totalmass="0.0005 " printLog="false" />
                <BeamFEMForceField name="FEM" radius="0.0005" youngModulus="1e6" poissonRatio="0.49" useSymmetricAssembly="1"/>
                <Node name="CollisionBall_f+100_mu-50">
                    <CubeTopology nx="10" ny="1" nz="1" min="0 0 0" max="9 0 0" />
                    <MechanicalObject name="ms" />
                    <BeamLinearMapping />
                    <EdgeGeometry name="edge"/>
                    <PointGeometry name ="point"/>
                    <BoxROI name="boxA" box="-0.1-0.05 -0.1 0.1 0.1 0.1 " drawBoxes="1" drawSize="1" position="@ms.position"/>
                    <ConstantForceField force="-0.001 0.0 0  "/>
                    <ValuesFromIndices name="indexValue" template="Vec3" in="@ms.position" indices="0 1 2 3 4 5 6 7 8 9" />
                    <ShowSpheres  radius="0.000001"  color="0 1 0 1" position="@ms.position" />
                    <WriteState filename="/home/raffa/work/data/journalValid/modelSens/ref_f+100_mu-50" groundTruth="true" />
                </Node>
            <LinearSolverConstraintCorrection solverName="BTD"/>
            </Node>

            <Node name="ball2">
                <EulerImplicitSolver rayleighMass="0.01" rayleighStiffness="0.1" />
                <SparseLDLSolver name="BTD"/>
                <MechanicalObject template="Rigid" name="MO" position="0 0 0 0 0 0 1    0.01 0 0 0 0 0 1     0.02 0 0 0 0 0 1     0.03 0 0 0 0 0 1    0.04 0 0 0 0 0 1 0.05 0 0 0 0 0 1    0.06 0 0 0 0 0 1     0.07 0 0 0 0 0 1     0.08 0 0 0 0 0 1    0.09 0 0 0 0 0 1" />
                <Mesh name="lines" lines="0 1   1 2   2 3  3 4   4 5   5 6   6 7   7 8   8 9" />
                <UniformMass totalmass="0.0005 " printLog="false" />
                <BeamFEMForceField name="FEM" radius="0.0005" youngModulus="1e6" poissonRatio="0.49" useSymmetricAssembly="1"/>
                <Node name="CollisionBall_f+100_mu-20">
                    <CubeTopology nx="10" ny="1" nz="1" min="0 0 0" max="9 0 0" />
                    <MechanicalObject name="ms" />
                    <BeamLinearMapping />
                    <EdgeGeometry name="edge"/>
                    <PointGeometry name ="point"/>
                    <BoxROI name="boxA" box="-0.1-0.05 -0.1 0.1 0.1 0.1 " drawBoxes="1" drawSize="1" position="@ms.position"/>
                    <ConstantForceField force="-0.001 0.0 0  "/>
                    <ValuesFromIndices name="indexValue" template="Vec3" in="@ms.position" indices="0 1 2 3 4 5 6 7 8 9" />
                    <ShowSpheres  radius="0.000001"  color="0 0 1 1" position="@ms.position" />
                    <WriteState filename="/home/raffa/work/data/journalValid/modelSens/ref_f+100_mu-20" groundTruth="true" />
                </Node>
            <LinearSolverConstraintCorrection solverName="BTD"/>
            </Node>

            <Node name="ball3">
                <EulerImplicitSolver rayleighMass="0.01" rayleighStiffness="0.1" />
                <SparseLDLSolver name="BTD"/>
                <MechanicalObject template="Rigid" name="MO" position="0 0 0 0 0 0 1    0.01 0 0 0 0 0 1     0.02 0 0 0 0 0 1     0.03 0 0 0 0 0 1    0.04 0 0 0 0 0 1 0.05 0 0 0 0 0 1    0.06 0 0 0 0 0 1     0.07 0 0 0 0 0 1     0.08 0 0 0 0 0 1    0.09 0 0 0 0 0 1" />
                <Mesh name="lines" lines="0 1   1 2   2 3  3 4   4 5   5 6   6 7   7 8   8 9" />
                <UniformMass totalmass="0.0005 " printLog="false" />
                <BeamFEMForceField name="FEM" radius="0.0005" youngModulus="1e6" poissonRatio="0.49" useSymmetricAssembly="1"/>
                <Node name="CollisionBall_f+100_mu-10">
                    <CubeTopology nx="10" ny="1" nz="1" min="0 0 0" max="9 0 0" />
                    <MechanicalObject name="ms" />
                    <BeamLinearMapping />
                    <EdgeGeometry name="edge"/>
                    <PointGeometry name ="point"/>
                    <BoxROI name="boxA" box="-0.1-0.05 -0.1 0.1 0.1 0.1 " drawBoxes="1" drawSize="1" position="@ms.position"/>
                    <ConstantForceField force="-0.001 0.0 0  "/>
                    <ValuesFromIndices name="indexValue" template="Vec3" in="@ms.position" indices="0 1 2 3 4 5 6 7 8 9" />
                    <ShowSpheres  radius="0.000001"  color="0 0.5 1 1" position="@ms.position" />
                    <WriteState filename="/home/raffa/work/data/journalValid/modelSens/ref_f+100_mu-10" groundTruth="true" />
                </Node>
            <LinearSolverConstraintCorrection solverName="BTD"/>
            </Node>

            <Node name="ball4">
                <EulerImplicitSolver rayleighMass="0.01" rayleighStiffness="0.1" />
                <SparseLDLSolver name="BTD"/>
                <MechanicalObject template="Rigid" name="MO" position="0 0 0 0 0 0 1    0.01 0 0 0 0 0 1     0.02 0 0 0 0 0 1     0.03 0 0 0 0 0 1    0.04 0 0 0 0 0 1 0.05 0 0 0 0 0 1    0.06 0 0 0 0 0 1     0.07 0 0 0 0 0 1     0.08 0 0 0 0 0 1    0.09 0 0 0 0 0 1" />
                <Mesh name="lines" lines="0 1   1 2   2 3  3 4   4 5   5 6   6 7   7 8   8 9" />
                <UniformMass totalmass="0.0005 " printLog="false" />
                <BeamFEMForceField name="FEM" radius="0.0005" youngModulus="1e6" poissonRatio="0.49" useSymmetricAssembly="1"/>
                <Node name="CollisionBall_f+100_mu">
                    <CubeTopology nx="10" ny="1" nz="1" min="0 0 0" max="9 0 0" />
                    <MechanicalObject name="ms" />
                    <BeamLinearMapping />
                    <EdgeGeometry name="edge"/>
                    <PointGeometry name ="point"/>
                    <BoxROI name="boxA" box="-0.1-0.05 -0.1 0.1 0.1 0.1 " drawBoxes="1" drawSize="1" position="@ms.position"/>
                    <ConstantForceField force="-0.001 0.0 0  "/>
                    <ValuesFromIndices name="indexValue" template="Vec3" in="@ms.position" indices="0 1 2 3 4 5 6 7 8 9" />
                    <ShowSpheres  radius="0.000001"  color="0.5 0 0 1" position="@ms.position" />
                    <WriteState filename="/home/raffa/work/data/journalValid/modelSens/ref_f+100_mu" groundTruth="true" />
                </Node>
                            <LinearSolverConstraintCorrection solverName="BTD"/>

            </Node>

            <Node name="ball5">
                <EulerImplicitSolver rayleighMass="0.01" rayleighStiffness="0.1" />
                <SparseLDLSolver name="BTD"/>
                <MechanicalObject template="Rigid" name="MO" position="0 0 0 0 0 0 1    0.01 0 0 0 0 0 1     0.02 0 0 0 0 0 1     0.03 0 0 0 0 0 1    0.04 0 0 0 0 0 1 0.05 0 0 0 0 0 1    0.06 0 0 0 0 0 1     0.07 0 0 0 0 0 1     0.08 0 0 0 0 0 1    0.09 0 0 0 0 0 1" />
                <Mesh name="lines" lines="0 1   1 2   2 3  3 4   4 5   5 6   6 7   7 8   8 9" />
                <UniformMass totalmass="0.0005 " printLog="false" />
                <BeamFEMForceField name="FEM" radius="0.0005" youngModulus="1e6" poissonRatio="0.49" useSymmetricAssembly="1"/>
                <Node name="CollisionBall_f+100_mu+10">
                    <CubeTopology nx="10" ny="1" nz="1" min="0 0 0" max="9 0 0" />
                    <MechanicalObject name="ms" />
                    <BeamLinearMapping />
                    <EdgeGeometry name="edge"/>
                    <PointGeometry name ="point"/>
                    <BoxROI name="boxA" box="-0.1-0.05 -0.1 0.1 0.1 0.1 " drawBoxes="1" drawSize="1" position="@ms.position"/>
                    <ConstantForceField force="-0.001 0.0 0  "/>
                    <ValuesFromIndices name="indexValue" template="Vec3" in="@ms.position" indices="0 1 2 3 4 5 6 7 8 9" />
                    <ShowSpheres  radius="0.000001"  color="0.5 1 0 1" position="@ms.position" />
                    <WriteState filename="/home/raffa/work/data/journalValid/modelSens/ref_f+100_mu+10" groundTruth="true" />
                </Node>
            <LinearSolverConstraintCorrection solverName="BTD"/>
            </Node>

            <Node name="ball6">
                <EulerImplicitSolver rayleighMass="0.01" rayleighStiffness="0.1" />
                <SparseLDLSolver name="BTD"/>
                <MechanicalObject template="Rigid" name="MO" position="0 0 0 0 0 0 1    0.01 0 0 0 0 0 1     0.02 0 0 0 0 0 1     0.03 0 0 0 0 0 1    0.04 0 0 0 0 0 1 0.05 0 0 0 0 0 1    0.06 0 0 0 0 0 1     0.07 0 0 0 0 0 1     0.08 0 0 0 0 0 1    0.09 0 0 0 0 0 1" />
                <Mesh name="lines" lines="0 1   1 2   2 3  3 4   4 5   5 6   6 7   7 8   8 9" />
                <UniformMass totalmass="0.0005 " printLog="false" />
                <BeamFEMForceField name="FEM" radius="0.0005" youngModulus="1e6" poissonRatio="0.49" useSymmetricAssembly="1"/>
                <Node name="CollisionBall_f+100_mu+20">
                    <CubeTopology nx="10" ny="1" nz="1" min="0 0 0" max="9 0 0" />
                    <MechanicalObject name="ms" />
                    <BeamLinearMapping />
                    <EdgeGeometry name="edge"/>
                    <PointGeometry name ="point"/>
                    <BoxROI name="boxA" box="-0.1-0.05 -0.1 0.1 0.1 0.1 " drawBoxes="1" drawSize="1" position="@ms.position"/>
                    <ConstantForceField force="-0.001 0.0 0  "/>
                    <ValuesFromIndices name="indexValue" template="Vec3" in="@ms.position" indices="0 1 2 3 4 5 6 7 8 9" />
                    <ShowSpheres  radius="0.000001"  color="0 1 0.5 1" position="@ms.position" />
                    <WriteState filename="/home/raffa/work/data/journalValid/modelSens/ref_f+100_mu+20" groundTruth="true" />
                </Node>
            <LinearSolverConstraintCorrection solverName="BTD"/>
            </Node>

            <Node name="ball7">
                <EulerImplicitSolver rayleighMass="0.01" rayleighStiffness="0.1" />
                <SparseLDLSolver name="BTD"/>
                <MechanicalObject template="Rigid" name="MO" position="0 0 0 0 0 0 1    0.01 0 0 0 0 0 1     0.02 0 0 0 0 0 1     0.03 0 0 0 0 0 1    0.04 0 0 0 0 0 1 0.05 0 0 0 0 0 1    0.06 0 0 0 0 0 1     0.07 0 0 0 0 0 1     0.08 0 0 0 0 0 1    0.09 0 0 0 0 0 1" />
                <Mesh name="lines" lines="0 1   1 2   2 3  3 4   4 5   5 6   6 7   7 8   8 9" />
                <UniformMass totalmass="0.0005 " printLog="false" />
                <BeamFEMForceField name="FEM" radius="0.0005" youngModulus="1e6" poissonRatio="0.49" useSymmetricAssembly="1"/>
                <Node name="CollisionBall_f+100_mu+50">
                    <CubeTopology nx="10" ny="1" nz="1" min="0 0 0" max="9 0 0" />
                    <MechanicalObject name="ms" />
                    <BeamLinearMapping />
                    <EdgeGeometry name="edge"/>
                    <PointGeometry name ="point"/>
                    <BoxROI name="boxA" box="-0.1-0.05 -0.1 0.1 0.1 0.1 " drawBoxes="1" drawSize="1" position="@ms.position"/>
                    <ConstantForceField force="-0.001 0.0 0  "/>
                    <ValuesFromIndices name="indexValue" template="Vec3" in="@ms.position" indices="0 1 2 3 4 5 6 7 8 9" />
                    <ShowSpheres  radius="0.000001"  color="1 0.5 0 1" position="@ms.position" />
                    <WriteState filename="/home/raffa/work/data/journalValid/modelSens/ref_f+100_mu+50" groundTruth="true" />
                </Node>
            <LinearSolverConstraintCorrection solverName="BTD"/>
            </Node>

            <Node name="ball8">
                <EulerImplicitSolver rayleighMass="0.01" rayleighStiffness="0.1" />
                <SparseLDLSolver name="BTD"/>
                <MechanicalObject template="Rigid" name="MO" position="0 0 0 0 0 0 1    0.01 0 0 0 0 0 1     0.02 0 0 0 0 0 1     0.03 0 0 0 0 0 1    0.04 0 0 0 0 0 1 0.05 0 0 0 0 0 1    0.06 0 0 0 0 0 1     0.07 0 0 0 0 0 1     0.08 0 0 0 0 0 1    0.09 0 0 0 0 0 1" />
                <Mesh name="lines" lines="0 1   1 2   2 3  3 4   4 5   5 6   6 7   7 8   8 9" />
                <UniformMass totalmass="0.0005 " printLog="false" />
                <BeamFEMForceField name="FEM" radius="0.0005" youngModulus="1e6" poissonRatio="0.49" useSymmetricAssembly="1"/>
                <Node name="CollisionBall_f+100_mu+100">
                    <CubeTopology nx="10" ny="1" nz="1" min="0 0 0" max="9 0 0" />
                    <MechanicalObject name="ms" />
                    <BeamLinearMapping />
                    <EdgeGeometry name="edge"/>
                    <PointGeometry name ="point"/>
                    <BoxROI name="boxA" box="-0.1-0.05 -0.1 0.1 0.1 0.1 " drawBoxes="1" drawSize="1" position="@ms.position"/>
                    <ConstantForceField force="-0.001 0.0 0  "/>
                    <ValuesFromIndices name="indexValue" template="Vec3" in="@ms.position" indices="0 1 2 3 4 5 6 7 8 9" />
                    <ShowSpheres  radius="0.000001"  color="0 0.5 0 1" position="@ms.position" />
                    <WriteState filename="/home/raffa/work/data/journalValid/modelSens/ref_f+100_mu+100" groundTruth="true" />
                </Node>
            <LinearSolverConstraintCorrection solverName="BTD"/>
            </Node>

        </Node>

        <Node name="Spring" >
            <VisualStyle displayFlags="showWireframe" />
            <MeshObjLoader name="surface" filename="../mesh/y.obj"  />
            <TransformStochasticEngine name="transform" input_position="@surface.position" optimParams="0 0 0 0 0 0" triangles="@surface.triangles"  />
            <MeshTopology name="mesh" position="@transform.output_position" triangles="@transform.triangles"  />
            <TriangleSetTopologyContainer name="Container" src="@mesh" />
            <MechanicalObject name="MS" free_position="@transform.output_position" position="@transform.output_position" template="Vec3d" />
            <TriangleGeometry name="triangle"/>
            <OglModel name="VisualModel" src="@surface"  material="Default Diffuse 1 1 0.93 0.83 0.1 Ambient 0 0 0 0 0 Specular 0 0 0 0 0 Emissive 0 0 0 0 0 Shininess 0 45" />
        </Node>


        <NeedleContactConstraint needle="all/ball0/CollisionBall_f+100_mu-100/point" surface="Spring/triangle" tipIndex="@all/ball0/CollisionBall_f+100_mu-100/boxA.indices" friction="0.00" draw="0" draw_normal_scale="0.005" />
        <NeedleContactConstraint needle="all/ball1/CollisionBall_f+100_mu-50/point" surface="Spring/triangle" tipIndex="@all/ball1/CollisionBall_f+100_mu-50/boxA.indices" friction="0.02" draw="0" draw_normal_scale="0.005" />
        <NeedleContactConstraint needle="all/ball2/CollisionBall_f+100_mu-20/point" surface="Spring/triangle" tipIndex="@all/ball2/CollisionBall_f+100_mu-20/boxA.indices" friction="0.032" draw="0" draw_normal_scale="0.005" />
        <NeedleContactConstraint needle="all/ball3/CollisionBall_f+100_mu-10/point" surface="Spring/triangle" tipIndex="@all/ball3/CollisionBall_f+100_mu-10/boxA.indices" friction="0.036" draw="0" draw_normal_scale="0.005" />
        <NeedleContactConstraint needle="all/ball4/CollisionBall_f+100_mu/point" surface="Spring/triangle" tipIndex="@all/ball4/CollisionBall_f+100_mu/boxA.indices" friction="0.04" draw="0" draw_normal_scale="0.005" />
        <NeedleContactConstraint needle="all/ball5/CollisionBall_f+100_mu+10/point" surface="Spring/triangle" tipIndex="@all/ball5/CollisionBall_f+100_mu+10/boxA.indices" friction="0.044" draw="0" draw_normal_scale="0.005" />
        <NeedleContactConstraint needle="all/ball6/CollisionBall_f+100_mu+20/point" surface="Spring/triangle" tipIndex="@all/ball6/CollisionBall_f+100_mu+20/boxA.indices" friction="0.048" draw="0" draw_normal_scale="0.005" />
        <NeedleContactConstraint needle="all/ball7/CollisionBall_f+100_mu+50/point" surface="Spring/triangle" tipIndex="@all/ball7/CollisionBall_f+100_mu+50/boxA.indices" friction="0.06" draw="0" draw_normal_scale="0.005" />
        <NeedleContactConstraint needle="all/ball8/CollisionBall_f+100_mu+100/point" surface="Spring/triangle" tipIndex="@all/ball8/CollisionBall_f+100_mu+100/boxA.indices" friction="0.08" draw="0" draw_normal_scale="0.005" />


<!--        <Node name="MatlabPlotGroundTruthPosition">
            <MechanicalObject template="Vec3" name="MO" position="@../all/ball/MO.position" showObject="0"/>
            <StochasticPositionHandler filename="/home/raffa/work/data/journalValid/modelSens/y_gt_matlab"   observations="true" groundTruth="true"/>
        </Node>-->


        <Node name="noisyObsf+100_mu-100">
            <MechanicalObject template="Vec3d" name="MO" position="@../all/ball0/CollisionBall_f+100_mu-100/indexValue.out"  showObject="0"/>
            <AddNoiseEngine name="NoiseEngine" listening="1" inputPositions="@MO.position" noiseOrthogonalVariance="1e-5" noisePrincipalVariance="1e-5" noisePrincipalDirection="1 1 1"/>
            <ShowSpheres  radius="0.0009"  color="1 0 0 1" position="@NoiseEngine.outputPositions"    />
        </Node>
        <Node name="noisyObsf+100_mu-50">
            <MechanicalObject template="Vec3d" name="MO" position="@../all/ball1/CollisionBall_f+100_mu-50/indexValue.out"  showObject="0"/>
            <AddNoiseEngine name="NoiseEngine" listening="1" inputPositions="@MO.position" noiseOrthogonalVariance="1e-5" noisePrincipalVariance="1e-5" noisePrincipalDirection="1 1 1"/>
            <ShowSpheres  radius="0.0009"  color="1 0 0 1" position="@NoiseEngine.outputPositions"    />
        </Node>
        <Node name="noisyObsf+100_mu-20">
            <MechanicalObject template="Vec3d" name="MO" position="@../all/ball2/CollisionBall_f+100_mu-20/indexValue.out"  showObject="0"/>
            <AddNoiseEngine name="NoiseEngine" listening="1" inputPositions="@MO.position" noiseOrthogonalVariance="1e-5" noisePrincipalVariance="1e-5" noisePrincipalDirection="1 1 1"/>
            <ShowSpheres  radius="0.0009"  color="1 0 0 1" position="@NoiseEngine.outputPositions"    />
        </Node>
        <Node name="noisyObsf+100_mu-10">
            <MechanicalObject template="Vec3d" name="MO" position="@../all/ball3/CollisionBall_f+100_mu-10/indexValue.out"  showObject="0"/>
            <AddNoiseEngine name="NoiseEngine" listening="1" inputPositions="@MO.position" noiseOrthogonalVariance="1e-5" noisePrincipalVariance="1e-5" noisePrincipalDirection="1 1 1"/>
            <ShowSpheres  radius="0.0009"  color="1 0 0 1" position="@NoiseEngine.outputPositions"    />
        </Node>
        <Node name="noisyObsf+100_mu">
            <MechanicalObject template="Vec3d" name="MO" position="@../all/ball4/CollisionBall_f+100_mu/indexValue.out"  showObject="0"/>
            <AddNoiseEngine name="NoiseEngine" listening="1" inputPositions="@MO.position" noiseOrthogonalVariance="1e-5" noisePrincipalVariance="1e-5" noisePrincipalDirection="1 1 1"/>
            <ShowSpheres  radius="0.0009"  color="1 0 0 1" position="@NoiseEngine.outputPositions"    />
        </Node>
        <Node name="noisyObsf+100_mu+10">
            <MechanicalObject template="Vec3d" name="MO" position="@../all/ball5/CollisionBall_f+100_mu+10/indexValue.out"  showObject="0"/>
            <AddNoiseEngine name="NoiseEngine" listening="1" inputPositions="@MO.position" noiseOrthogonalVariance="1e-5" noisePrincipalVariance="1e-5" noisePrincipalDirection="1 1 1"/>
            <ShowSpheres  radius="0.0009"  color="1 0 0 1" position="@NoiseEngine.outputPositions"    />
        </Node>
        <Node name="noisyObsf+100_mu+20">
            <MechanicalObject template="Vec3d" name="MO" position="@../all/ball6/CollisionBall_f+100_mu+20/indexValue.out"  showObject="0"/>
            <AddNoiseEngine name="NoiseEngine" listening="1" inputPositions="@MO.position" noiseOrthogonalVariance="1e-5" noisePrincipalVariance="1e-5" noisePrincipalDirection="1 1 1"/>
            <ShowSpheres  radius="0.0009"  color="1 0 0 1" position="@NoiseEngine.outputPositions"    />
        </Node>
        <Node name="noisyObsf+100_mu+50">
            <MechanicalObject template="Vec3d" name="MO" position="@../all/ball7/CollisionBall_f+100_mu+50/indexValue.out"  showObject="0"/>
            <AddNoiseEngine name="NoiseEngine" listening="1" inputPositions="@MO.position" noiseOrthogonalVariance="1e-5" noisePrincipalVariance="1e-5" noisePrincipalDirection="1 1 1"/>
            <ShowSpheres  radius="0.0009"  color="1 0 0 1" position="@NoiseEngine.outputPositions"    />
        </Node>
        <Node name="noisyObsf+100_mu+100">
            <MechanicalObject template="Vec3d" name="MO" position="@../all/ball8/CollisionBall_f+100_mu+100/indexValue.out"  showObject="0"/>
            <AddNoiseEngine name="NoiseEngine" listening="1" inputPositions="@MO.position" noiseOrthogonalVariance="1e-5" noisePrincipalVariance="1e-5" noisePrincipalDirection="1 1 1"/>
            <ShowSpheres  radius="0.0009"  color="1 0 0 1" position="@NoiseEngine.outputPositions"    />
        </Node>


        <Node name="pOri_ImageProcessor_f+100_mu-100" >
            <OpenCVImageProcessor name="processor" streamer="../video" />
            <OpenCV3Dto2DTracker name="detector2D" in="@../noisyObsf+100_mu-100/NoiseEngine.outputPositions" projectionMatrix="[2592.57 -3.61907e-13 -400 111.744,-3.53695e-13 -2592.57 -300 148.623,-1.20654e-16 -1.11022e-16 -1 0.279361]"/>
            <MechanicalObject template="Vec2d" name="MO" position="@detector2D.out"/>
            <StochasticPositionHandler filename="/home/raffa/work/data/journalValid/modelSens/obs/f+100/pOri/pOri_Obs2D_f+100_mu-100_x.txt" observations="true" indices="0 1 2 3 4 5 6 7 8 9 "/>
        </Node>
        <Node name="pOri_ImageProcessor_f+100_mu-50" >
            <OpenCVImageProcessor name="processor" streamer="../video" />
            <OpenCV3Dto2DTracker name="detector2D" in="@../noisyObsf+100_mu-50/NoiseEngine.outputPositions" projectionMatrix="[2592.57 -3.61907e-13 -400 111.744,-3.53695e-13 -2592.57 -300 148.623,-1.20654e-16 -1.11022e-16 -1 0.279361]"/>
            <MechanicalObject template="Vec2d" name="MO" position="@detector2D.out"/>
            <StochasticPositionHandler filename="/home/raffa/work/data/journalValid/modelSens/obs/f+100/pOri/pOri_Obs2D_f+100_mu-50_x.txt" observations="true" indices="0 1 2 3 4 5 6 7 8 9 "/>
        </Node>
        <Node name="pOri_ImageProcessor_f+100_mu-20" >
            <OpenCVImageProcessor name="processor" streamer="../video" />
            <OpenCV3Dto2DTracker name="detector2D" in="@../noisyObsf+100_mu-20/NoiseEngine.outputPositions" projectionMatrix="[2592.57 -3.61907e-13 -400 111.744,-3.53695e-13 -2592.57 -300 148.623,-1.20654e-16 -1.11022e-16 -1 0.279361]"/>
            <MechanicalObject template="Vec2d" name="MO" position="@detector2D.out"/>
            <StochasticPositionHandler filename="/home/raffa/work/data/journalValid/modelSens/obs/f+100/pOri/pOri_Obs2D_f+100_mu-20_x.txt" observations="true" indices="0 1 2 3 4 5 6 7 8 9 "/>
        </Node>
        <Node name="pOri_ImageProcessor_f+100_mu-10" >
            <OpenCVImageProcessor name="processor" streamer="../video" />
            <OpenCV3Dto2DTracker name="detector2D" in="@../noisyObsf+100_mu-10/NoiseEngine.outputPositions" projectionMatrix="[2592.57 -3.61907e-13 -400 111.744,-3.53695e-13 -2592.57 -300 148.623,-1.20654e-16 -1.11022e-16 -1 0.279361]"/>
            <MechanicalObject template="Vec2d" name="MO" position="@detector2D.out"/>
            <StochasticPositionHandler filename="/home/raffa/work/data/journalValid/modelSens/obs/f+100/pOri/pOri_Obs2D_f+100_mu-10_x.txt" observations="true" indices="0 1 2 3 4 5 6 7 8 9 "/>
        </Node>
        <Node name="pOri_ImageProcessor_f+100_mu" >
            <OpenCVImageProcessor name="processor" streamer="../video" />
            <OpenCV3Dto2DTracker name="detector2D" in="@../noisyObsf+100_mu/NoiseEngine.outputPositions" projectionMatrix="[2592.57 -3.61907e-13 -400 111.744,-3.53695e-13 -2592.57 -300 148.623,-1.20654e-16 -1.11022e-16 -1 0.279361]"/>
            <MechanicalObject template="Vec2d" name="MO" position="@detector2D.out"/>
            <StochasticPositionHandler filename="/home/raffa/work/data/journalValid/modelSens/obs/f+100/pOri/pOri_Obs2D_f+100_mu_x.txt" observations="true" indices="0 1 2 3 4 5 6 7 8 9 "/>
        </Node>
        <Node name="pOri_ImageProcessor_f+100_mu+10" >
            <OpenCVImageProcessor name="processor" streamer="../video" />
            <OpenCV3Dto2DTracker name="detector2D" in="@../noisyObsf+100_mu+10/NoiseEngine.outputPositions" projectionMatrix="[2592.57 -3.61907e-13 -400 111.744,-3.53695e-13 -2592.57 -300 148.623,-1.20654e-16 -1.11022e-16 -1 0.279361]"/>
            <MechanicalObject template="Vec2d" name="MO" position="@detector2D.out"/>
            <StochasticPositionHandler filename="/home/raffa/work/data/journalValid/modelSens/obs/f+100/pOri/pOri_Obs2D_f+100_mu+10_x.txt" observations="true" indices="0 1 2 3 4 5 6 7 8 9 "/>
        </Node>
        <Node name="pOri_ImageProcessor_f+100_mu+20" >
            <OpenCVImageProcessor name="processor" streamer="../video" />
            <OpenCV3Dto2DTracker name="detector2D" in="@../noisyObsf+100_mu+20/NoiseEngine.outputPositions" projectionMatrix="[2592.57 -3.61907e-13 -400 111.744,-3.53695e-13 -2592.57 -300 148.623,-1.20654e-16 -1.11022e-16 -1 0.279361]"/>
            <MechanicalObject template="Vec2d" name="MO" position="@detector2D.out"/>
            <StochasticPositionHandler filename="/home/raffa/work/data/journalValid/modelSens/obs/f+100/pOri/pOri_Obs2D_f+100_mu+20_x.txt" observations="true" indices="0 1 2 3 4 5 6 7 8 9 "/>
        </Node>
        <Node name="pOri_ImageProcessor_f+100_mu+50" >
            <OpenCVImageProcessor name="processor" streamer="../video" />
            <OpenCV3Dto2DTracker name="detector2D" in="@../noisyObsf+100_mu+50/NoiseEngine.outputPositions" projectionMatrix="[2592.57 -3.61907e-13 -400 111.744,-3.53695e-13 -2592.57 -300 148.623,-1.20654e-16 -1.11022e-16 -1 0.279361]"/>
            <MechanicalObject template="Vec2d" name="MO" position="@detector2D.out"/>
            <StochasticPositionHandler filename="/home/raffa/work/data/journalValid/modelSens/obs/f+100/pOri/pOri_Obs2D_f+100_mu+50_x.txt" observations="true" indices="0 1 2 3 4 5 6 7 8 9 "/>
        </Node>
        <Node name="pOri_ImageProcessor_f+100_mu+100" >
            <OpenCVImageProcessor name="processor" streamer="../video" />
            <OpenCV3Dto2DTracker name="detector2D" in="@../noisyObsf+100_mu+100/NoiseEngine.outputPositions" projectionMatrix="[2592.57 -3.61907e-13 -400 111.744,-3.53695e-13 -2592.57 -300 148.623,-1.20654e-16 -1.11022e-16 -1 0.279361]"/>
            <MechanicalObject template="Vec2d" name="MO" position="@detector2D.out"/>
            <StochasticPositionHandler filename="/home/raffa/work/data/journalValid/modelSens/obs/f+100/pOri/pOri_Obs2D_f+100_mu+100_x.txt" observations="true" indices="0 1 2 3 4 5 6 7 8 9 "/>
        </Node>


        <Node name="pAx_ImageProcessor_f+100_mu-100" >
            <OpenCVImageProcessor name="processor" streamer="../video" />
            <OpenCV3Dto2DTracker name="detector2D" in="@../noisyObsf+100_mu-100/NoiseEngine.outputPositions" projectionMatrix="[399.041 -22.0329 724.458 90.1947,256.525 -740.777 1.81426 85.7524,0.99824 -0.0592959 0.000489503 0.225592]"/>
            <MechanicalObject template="Vec2d" name="MO" position="@detector2D.out"/>
            <StochasticPositionHandler filename="/home/raffa/work/data/journalValid/modelSens/obs/f+100/pAx/pAx_Obs2D_f+100_mu-100_x.txt" observations="true" indices="0 1 2 3 4 5 6 7 8 9 "/>
        </Node>
        <Node name="pAx_ImageProcessor_f+100_mu-50" >
            <OpenCVImageProcessor name="processor" streamer="../video" />
            <OpenCV3Dto2DTracker name="detector2D" in="@../noisyObsf+100_mu-50/NoiseEngine.outputPositions" projectionMatrix="[399.041 -22.0329 724.458 90.1947,256.525 -740.777 1.81426 85.7524,0.99824 -0.0592959 0.000489503 0.225592]"/>
            <MechanicalObject template="Vec2d" name="MO" position="@detector2D.out"/>
            <StochasticPositionHandler filename="/home/raffa/work/data/journalValid/modelSens/obs/f+100/pAx/pAx_Obs2D_f+100_mu-50_x.txt" observations="true" indices="0 1 2 3 4 5 6 7 8 9 "/>
        </Node>
        <Node name="pAx_ImageProcessor_f+100_mu-20" >
            <OpenCVImageProcessor name="processor" streamer="../video" />
            <OpenCV3Dto2DTracker name="detector2D" in="@../noisyObsf+100_mu-20/NoiseEngine.outputPositions" projectionMatrix="[399.041 -22.0329 724.458 90.1947,256.525 -740.777 1.81426 85.7524,0.99824 -0.0592959 0.000489503 0.225592]"/>
            <MechanicalObject template="Vec2d" name="MO" position="@detector2D.out"/>
            <StochasticPositionHandler filename="/home/raffa/work/data/journalValid/modelSens/obs/f+100/pAx/pAx_Obs2D_f+100_mu-20_x.txt" observations="true" indices="0 1 2 3 4 5 6 7 8 9 "/>
        </Node>
        <Node name="pAx_ImageProcessor_f+100_mu-10" >
            <OpenCVImageProcessor name="processor" streamer="../video" />
            <OpenCV3Dto2DTracker name="detector2D" in="@../noisyObsf+100_mu-10/NoiseEngine.outputPositions" projectionMatrix="[399.041 -22.0329 724.458 90.1947,256.525 -740.777 1.81426 85.7524,0.99824 -0.0592959 0.000489503 0.225592]"/>
            <MechanicalObject template="Vec2d" name="MO" position="@detector2D.out"/>
            <StochasticPositionHandler filename="/home/raffa/work/data/journalValid/modelSens/obs/f+100/pAx/pAx_Obs2D_f+100_mu-10_x.txt" observations="true" indices="0 1 2 3 4 5 6 7 8 9 "/>
        </Node>
        <Node name="pAx_ImageProcessor_f+100_mu" >
            <OpenCVImageProcessor name="processor" streamer="../video" />
            <OpenCV3Dto2DTracker name="detector2D" in="@../noisyObsf+100_mu/NoiseEngine.outputPositions" projectionMatrix="[399.041 -22.0329 724.458 90.1947,256.525 -740.777 1.81426 85.7524,0.99824 -0.0592959 0.000489503 0.225592]"/>
            <MechanicalObject template="Vec2d" name="MO" position="@detector2D.out"/>
            <StochasticPositionHandler filename="/home/raffa/work/data/journalValid/modelSens/obs/f+100/pAx/pAx_Obs2D_f+100_mu_x.txt" observations="true" indices="0 1 2 3 4 5 6 7 8 9 "/>
        </Node>
        <Node name="pAx_ImageProcessor_f+100_mu+10" >
            <OpenCVImageProcessor name="processor" streamer="../video" />
            <OpenCV3Dto2DTracker name="detector2D" in="@../noisyObsf+100_mu+10/NoiseEngine.outputPositions" projectionMatrix="[399.041 -22.0329 724.458 90.1947,256.525 -740.777 1.81426 85.7524,0.99824 -0.0592959 0.000489503 0.225592]"/>
            <MechanicalObject template="Vec2d" name="MO" position="@detector2D.out"/>
            <StochasticPositionHandler filename="/home/raffa/work/data/journalValid/modelSens/obs/f+100/pAx/pAx_Obs2D_f+100_mu+10_x.txt" observations="true" indices="0 1 2 3 4 5 6 7 8 9 "/>
        </Node>
        <Node name="pAx_ImageProcessor_f+100_mu+20" >
            <OpenCVImageProcessor name="processor" streamer="../video" />
            <OpenCV3Dto2DTracker name="detector2D" in="@../noisyObsf+100_mu+20/NoiseEngine.outputPositions" projectionMatrix="[399.041 -22.0329 724.458 90.1947,256.525 -740.777 1.81426 85.7524,0.99824 -0.0592959 0.000489503 0.225592]"/>
            <MechanicalObject template="Vec2d" name="MO" position="@detector2D.out"/>
            <StochasticPositionHandler filename="/home/raffa/work/data/journalValid/modelSens/obs/f+100/pAx/pAx_Obs2D_f+100_mu+20_x.txt" observations="true" indices="0 1 2 3 4 5 6 7 8 9 "/>
        </Node>
        <Node name="pAx_ImageProcessor_f+100_mu+50" >
            <OpenCVImageProcessor name="processor" streamer="../video" />
            <OpenCV3Dto2DTracker name="detector2D" in="@../noisyObsf+100_mu+50/NoiseEngine.outputPositions" projectionMatrix="[399.041 -22.0329 724.458 90.1947,256.525 -740.777 1.81426 85.7524,0.99824 -0.0592959 0.000489503 0.225592]"/>
            <MechanicalObject template="Vec2d" name="MO" position="@detector2D.out"/>
            <StochasticPositionHandler filename="/home/raffa/work/data/journalValid/modelSens/obs/f+100/pAx/pAx_Obs2D_f+100_mu+50_x.txt" observations="true" indices="0 1 2 3 4 5 6 7 8 9 "/>
        </Node>
        <Node name="pAx_ImageProcessor_f+100_mu+100" >
            <OpenCVImageProcessor name="processor" streamer="../video" />
            <OpenCV3Dto2DTracker name="detector2D" in="@../noisyObsf+100_mu+100/NoiseEngine.outputPositions" projectionMatrix="[399.041 -22.0329 724.458 90.1947,256.525 -740.777 1.81426 85.7524,0.99824 -0.0592959 0.000489503 0.225592]"/>
            <MechanicalObject template="Vec2d" name="MO" position="@detector2D.out"/>
            <StochasticPositionHandler filename="/home/raffa/work/data/journalValid/modelSens/obs/f+100/pAx/pAx_Obs2D_f+100_mu+100_x.txt" observations="true" indices="0 1 2 3 4 5 6 7 8 9 "/>
        </Node>


        <Node name="pObl_ImageProcessor_f+100_mu-100" >
            <OpenCVImageProcessor name="processor" streamer="../video" />
            <OpenCV3Dto2DTracker name="detector2D" in="@../noisyObsf+100_mu-100/NoiseEngine.outputPositions" projectionMatrix="[794.719 -200.651 112.78 94.478,-39.4086 -781.439 -48.5703 48.9289,0.521511 -0.362189 -0.772557 0.192201]"/>
            <MechanicalObject template="Vec2d" name="MO" position="@detector2D.out"/>
            <StochasticPositionHandler filename="/home/raffa/work/data/journalValid/modelSens/obs/f+100/pObl/pObl_Obs2D_f+100_mu-100_x.txt" observations="true" indices="0 1 2 3 4 5 6 7 8 9 "/>
        </Node>
        <Node name="pObl_ImageProcessor_f+100_mu-50" >
            <OpenCVImageProcessor name="processor" streamer="../video" />
            <OpenCV3Dto2DTracker name="detector2D" in="@../noisyObsf+100_mu-50/NoiseEngine.outputPositions" projectionMatrix="[794.719 -200.651 112.78 94.478,-39.4086 -781.439 -48.5703 48.9289,0.521511 -0.362189 -0.772557 0.192201]"/>
            <MechanicalObject template="Vec2d" name="MO" position="@detector2D.out"/>
            <StochasticPositionHandler filename="/home/raffa/work/data/journalValid/modelSens/obs/f+100/pObl/pObl_Obs2D_f+100_mu-50_x.txt" observations="true" indices="0 1 2 3 4 5 6 7 8 9 "/>
        </Node>
        <Node name="pObl_ImageProcessor_f+100_mu-20" >
            <OpenCVImageProcessor name="processor" streamer="../video" />
            <OpenCV3Dto2DTracker name="detector2D" in="@../noisyObsf+100_mu-20/NoiseEngine.outputPositions" projectionMatrix="[794.719 -200.651 112.78 94.478,-39.4086 -781.439 -48.5703 48.9289,0.521511 -0.362189 -0.772557 0.192201]"/>
            <MechanicalObject template="Vec2d" name="MO" position="@detector2D.out"/>
            <StochasticPositionHandler filename="/home/raffa/work/data/journalValid/modelSens/obs/f+100/pObl/pObl_Obs2D_f+100_mu-20_x.txt" observations="true" indices="0 1 2 3 4 5 6 7 8 9 "/>
        </Node>
        <Node name="pObl_ImageProcessor_f+100_mu-10" >
            <OpenCVImageProcessor name="processor" streamer="../video" />
            <OpenCV3Dto2DTracker name="detector2D" in="@../noisyObsf+100_mu-10/NoiseEngine.outputPositions" projectionMatrix="[794.719 -200.651 112.78 94.478,-39.4086 -781.439 -48.5703 48.9289,0.521511 -0.362189 -0.772557 0.192201]"/>
            <MechanicalObject template="Vec2d" name="MO" position="@detector2D.out"/>
            <StochasticPositionHandler filename="/home/raffa/work/data/journalValid/modelSens/obs/f+100/pObl/pObl_Obs2D_f+100_mu-10_x.txt" observations="true" indices="0 1 2 3 4 5 6 7 8 9 "/>
        </Node>
        <Node name="pObl_ImageProcessor_f+100_mu" >
            <OpenCVImageProcessor name="processor" streamer="../video" />
            <OpenCV3Dto2DTracker name="detector2D" in="@../noisyObsf+100_mu/NoiseEngine.outputPositions" projectionMatrix="[794.719 -200.651 112.78 94.478,-39.4086 -781.439 -48.5703 48.9289,0.521511 -0.362189 -0.772557 0.192201]"/>
            <MechanicalObject template="Vec2d" name="MO" position="@detector2D.out"/>
            <StochasticPositionHandler filename="/home/raffa/work/data/journalValid/modelSens/obs/f+100/pObl/pObl_Obs2D_f+100_mu_x.txt" observations="true" indices="0 1 2 3 4 5 6 7 8 9 "/>
        </Node>
        <Node name="pObl_ImageProcessor_f+100_mu+10" >
            <OpenCVImageProcessor name="processor" streamer="../video" />
            <OpenCV3Dto2DTracker name="detector2D" in="@../noisyObsf+100_mu+10/NoiseEngine.outputPositions" projectionMatrix="[794.719 -200.651 112.78 94.478,-39.4086 -781.439 -48.5703 48.9289,0.521511 -0.362189 -0.772557 0.192201]"/>
            <MechanicalObject template="Vec2d" name="MO" position="@detector2D.out"/>
            <StochasticPositionHandler filename="/home/raffa/work/data/journalValid/modelSens/obs/f+100/pObl/pObl_Obs2D_f+100_mu+10_x.txt" observations="true" indices="0 1 2 3 4 5 6 7 8 9 "/>
        </Node>
        <Node name="pObl_ImageProcessor_f+100_mu+20" >
            <OpenCVImageProcessor name="processor" streamer="../video" />
            <OpenCV3Dto2DTracker name="detector2D" in="@../noisyObsf+100_mu+20/NoiseEngine.outputPositions" projectionMatrix="[794.719 -200.651 112.78 94.478,-39.4086 -781.439 -48.5703 48.9289,0.521511 -0.362189 -0.772557 0.192201]"/>
            <MechanicalObject template="Vec2d" name="MO" position="@detector2D.out"/>
            <StochasticPositionHandler filename="/home/raffa/work/data/journalValid/modelSens/obs/f+100/pObl/pObl_Obs2D_f+100_mu+20_x.txt" observations="true" indices="0 1 2 3 4 5 6 7 8 9 "/>
        </Node>
        <Node name="pObl_ImageProcessor_f+100_mu+50" >
            <OpenCVImageProcessor name="processor" streamer="../video" />
            <OpenCV3Dto2DTracker name="detector2D" in="@../noisyObsf+100_mu+50/NoiseEngine.outputPositions" projectionMatrix="[794.719 -200.651 112.78 94.478,-39.4086 -781.439 -48.5703 48.9289,0.521511 -0.362189 -0.772557 0.192201]"/>
            <MechanicalObject template="Vec2d" name="MO" position="@detector2D.out"/>
            <StochasticPositionHandler filename="/home/raffa/work/data/journalValid/modelSens/obs/f+100/pObl/pObl_Obs2D_f+100_mu+50_x.txt" observations="true" indices="0 1 2 3 4 5 6 7 8 9 "/>
        </Node>
        <Node name="pObl_ImageProcessor_f+100_mu+100" >
            <OpenCVImageProcessor name="processor" streamer="../video" />
            <OpenCV3Dto2DTracker name="detector2D" in="@../noisyObsf+100_mu+100/NoiseEngine.outputPositions" projectionMatrix="[794.719 -200.651 112.78 94.478,-39.4086 -781.439 -48.5703 48.9289,0.521511 -0.362189 -0.772557 0.192201]"/>
            <MechanicalObject template="Vec2d" name="MO" position="@detector2D.out"/>
            <StochasticPositionHandler filename="/home/raffa/work/data/journalValid/modelSens/obs/f+100/pObl/pObl_Obs2D_f+100_mu+100_x.txt" observations="true" indices="0 1 2 3 4 5 6 7 8 9 "/>
        </Node>


    </Node>
