    <?xml version="1.0"?>
    <Node    name="root" dt="0.001" gravity="0 0 0" >
    <RequiredPlugin pluginName="Optimus"/>
    <RequiredPlugin pluginName="ImageMeshAux" />
    <RequiredPlugin pluginName="ConstraintGeometryPlugin" />
    <RequiredPlugin pluginName="NeedleConstraintPlugin" />
    <RequiredPlugin pluginName="OpenCVPlugin" />
    <VisualStyle displayFlags=" showCollisionModels hideForceFields" />
    <BackgroundSetting color="1 1 1 1" />
    <ViewerSetting resolution="837 600" />
    <FreeMotionAnimationLoop />
    <GenericConstraintSolver name="GenericConstraintSolver"  printLog="0"  maxIterations="1000"  tolerance="1e-10"  allVerified="0" />
    <OpenCVProjectiveCalibrator name="opengl" streamer="video" mode="5" listening="false" drawzNear="0.001" drawzFar="3" />
    <OpenCVOpenGlStreamer name="video" src="@opengl" />
    <OpenCVScheduler name="scheduler" frequency="0" />


    <EulerImplicitSolver  />
    <CGLinearSolver iterations="25" tolerance="1e-5" threshold="1e-5"/>

    <Node name="ref_f-100_mu-100">
        <MechanicalObject template="Vec3" name="MO"   position="0 0 0     0.01 0 0      0.02 0 0      0.03 0 0     0.04 0 0  0.05 0 0     0.06 0 0      0.07 0 0      0.08 0 0     0.09 0 0 " />
        <BoxROI name="boxA" box="-0.1-0.05 -0.1 0.1 0.1 0.1 " drawBoxes="1" drawSize="1"/>
        <ReadState filename="/home/raffa/work/data/journalValid/modelSens/sens/ref_f-100_mu-100" />
        <ShowSpheres  radius="0.000001"  color="1 0 0 1" position="@MO.position" />
        <StochasticPositionHandler filename="/home/raffa/work/data/journalValid/modelSens/matlabGT/gt_ref_f-100_mu-100"   observations="true" groundTruth="true"/>
    </Node>
    <Node name="ref_f-100_mu-50">
        <MechanicalObject template="Vec3" name="MO"   position="0 0 0     0.01 0 0      0.02 0 0      0.03 0 0     0.04 0 0  0.05 0 0     0.06 0 0      0.07 0 0      0.08 0 0     0.09 0 0 " />
        <BoxROI name="boxA" box="-0.1-0.05 -0.1 0.1 0.1 0.1 " drawBoxes="1" drawSize="1"/>
        <ReadState filename="/home/raffa/work/data/journalValid/modelSens/sens/ref_f-100_mu-50" />
        <ShowSpheres  radius="0.000001"  color="0 1 0 1" position="@MO.position" />
        <StochasticPositionHandler filename="/home/raffa/work/data/journalValid/modelSens/matlabGT/gt_ref_f-100_mu-50"   observations="true" groundTruth="true"/>
    </Node>
    <Node name="ref_f-100_mu-20">
        <MechanicalObject template="Vec3" name="MO"   position="0 0 0     0.01 0 0      0.02 0 0      0.03 0 0     0.04 0 0  0.05 0 0     0.06 0 0      0.07 0 0      0.08 0 0     0.09 0 0 " />
        <BoxROI name="boxA" box="-0.1-0.05 -0.1 0.1 0.1 0.1 " drawBoxes="1" drawSize="1"/>
        <ReadState filename="/home/raffa/work/data/journalValid/modelSens/sens/ref_f-100_mu-20" />
        <ShowSpheres  radius="0.000001"  color="0.5 0 0 1" position="@MO.position" />
        <StochasticPositionHandler filename="/home/raffa/work/data/journalValid/modelSens/matlabGT/gt_ref_f-100_mu-20"   observations="true" groundTruth="true"/>
    </Node>
    <Node name="ref_f-100_mu-10">
        <MechanicalObject template="Vec3" name="MO"   position="0 0 0     0.01 0 0      0.02 0 0      0.03 0 0     0.04 0 0  0.05 0 0     0.06 0 0      0.07 0 0      0.08 0 0     0.09 0 0 " />
        <BoxROI name="boxA" box="-0.1-0.05 -0.1 0.1 0.1 0.1 " drawBoxes="1" drawSize="1"/>
        <ReadState filename="/home/raffa/work/data/journalValid/modelSens/sens/ref_f-100_mu-10" />
        <ShowSpheres  radius="0.000001"  color="0 0 1 1" position="@MO.position" />
        <StochasticPositionHandler filename="/home/raffa/work/data/journalValid/modelSens/matlabGT/gt_ref_f-100_mu-10"   observations="true" groundTruth="true"/>
    </Node>
    <Node name="gt_ref_f-100_mu">
        <MechanicalObject template="Vec3" name="MO"   position="0 0 0     0.01 0 0      0.02 0 0      0.03 0 0     0.04 0 0  0.05 0 0     0.06 0 0      0.07 0 0      0.08 0 0     0.09 0 0 " />
        <BoxROI name="boxA" box="-0.1-0.05 -0.1 0.1 0.1 0.1 " drawBoxes="1" drawSize="1"/>
        <ReadState filename="/home/raffa/work/data/journalValid/modelSens/sens/ref_f-100_mu" />
        <ShowSpheres  radius="0.000001"  color="0.5 1 0 1" position="@MO.position" />
        <StochasticPositionHandler filename="/home/raffa/work/data/journalValid/modelSens/matlabGT/gt_ref_f-100_mu"   observations="true" groundTruth="true"/>
    </Node>
    <Node name="ref_f-100_mu+10">
        <MechanicalObject template="Vec3" name="MO"   position="0 0 0     0.01 0 0      0.02 0 0      0.03 0 0     0.04 0 0  0.05 0 0     0.06 0 0      0.07 0 0      0.08 0 0     0.09 0 0 " />
        <BoxROI name="boxA" box="-0.1-0.05 -0.1 0.1 0.1 0.1 " drawBoxes="1" drawSize="1"/>
        <ReadState filename="/home/raffa/work/data/journalValid/modelSens/sens/ref_f-100_mu+10" />
        <ShowSpheres  radius="0.000001"  color="0.5 0 1 1" position="@MO.position" />
        <StochasticPositionHandler filename="/home/raffa/work/data/journalValid/modelSens/matlabGT/gt_ref_f-100_mu+10"   observations="true" groundTruth="true"/>
    </Node>
    <Node name="ref_f-100_mu+20">
        <MechanicalObject template="Vec3" name="MO"   position="0 0 0     0.01 0 0      0.02 0 0      0.03 0 0     0.04 0 0  0.05 0 0     0.06 0 0      0.07 0 0      0.08 0 0     0.09 0 0 " />
        <BoxROI name="boxA" box="-0.1-0.05 -0.1 0.1 0.1 0.1 " drawBoxes="1" drawSize="1"/>
        <ReadState filename="/home/raffa/work/data/journalValid/modelSens/sens/ref_f-100_mu+20" />
        <ShowSpheres  radius="0.000001"  color="1 0.5 0 1" position="@MO.position" />
        <StochasticPositionHandler filename="/home/raffa/work/data/journalValid/modelSens/matlabGT/gt_ref_f-100_mu+20"   observations="true" groundTruth="true"/>
    </Node>
    <Node name="ref_f-100_mu+50">
        <MechanicalObject template="Vec3" name="MO"   position="0 0 0     0.01 0 0      0.02 0 0      0.03 0 0     0.04 0 0  0.05 0 0     0.06 0 0      0.07 0 0      0.08 0 0     0.09 0 0 " />
        <BoxROI name="boxA" box="-0.1-0.05 -0.1 0.1 0.1 0.1 " drawBoxes="1" drawSize="1"/>
        <ReadState filename="/home/raffa/work/data/journalValid/modelSens/sens/ref_f-100_mu+50" />
        <ShowSpheres  radius="0.000001"  color="1 0.5 0 1" position="@MO.position" />
        <StochasticPositionHandler filename="/home/raffa/work/data/journalValid/modelSens/matlabGT/gt_ref_f-100_mu+50"   observations="true" groundTruth="true"/>
    </Node>
    <Node name="ref_f-100_mu+100">
        <MechanicalObject template="Vec3" name="MO"   position="0 0 0     0.01 0 0      0.02 0 0      0.03 0 0     0.04 0 0  0.05 0 0     0.06 0 0      0.07 0 0      0.08 0 0     0.09 0 0 " />
        <BoxROI name="boxA" box="-0.1-0.05 -0.1 0.1 0.1 0.1 " drawBoxes="1" drawSize="1"/>
        <ReadState filename="/home/raffa/work/data/journalValid/modelSens/sens/ref_f-100_mu+100" />
        <ShowSpheres  radius="0.000001"  color="1 0.5 0 1" position="@MO.position" />
        <StochasticPositionHandler filename="/home/raffa/work/data/journalValid/modelSens/matlabGT/gt_ref_f-100_mu+100"   observations="true" groundTruth="true"/>
    </Node>


     <Node name="ref_f-50_mu-100">
        <MechanicalObject template="Vec3" name="MO"   position="0 0 0     0.01 0 0      0.02 0 0      0.03 0 0     0.04 0 0  0.05 0 0     0.06 0 0      0.07 0 0      0.08 0 0     0.09 0 0 " />
        <BoxROI name="boxA" box="-0.1-0.05 -0.1 0.1 0.1 0.1 " drawBoxes="1" drawSize="1"/>
        <ReadState filename="/home/raffa/work/data/journalValid/modelSens/sens/ref_f-50_mu-100" />
        <ShowSpheres  radius="0.000001"  color="1 0 0 1" position="@MO.position" />
        <StochasticPositionHandler filename="/home/raffa/work/data/journalValid/modelSens/matlabGT/gt_ref_f-50_mu-100"   observations="true" groundTruth="true"/>
    </Node>
    <Node name="ref_f-50_mu-50">
        <MechanicalObject template="Vec3" name="MO"   position="0 0 0     0.01 0 0      0.02 0 0      0.03 0 0     0.04 0 0  0.05 0 0     0.06 0 0      0.07 0 0      0.08 0 0     0.09 0 0 " />
        <BoxROI name="boxA" box="-0.1-0.05 -0.1 0.1 0.1 0.1 " drawBoxes="1" drawSize="1"/>
        <ReadState filename="/home/raffa/work/data/journalValid/modelSens/sens/ref_f-50_mu-50" />
        <ShowSpheres  radius="0.000001"  color="0 1 0 1" position="@MO.position" />
        <StochasticPositionHandler filename="/home/raffa/work/data/journalValid/modelSens/matlabGT/gt_ref_f-50_mu-50"   observations="true" groundTruth="true"/>
    </Node>
    <Node name="ref_f-50_mu-20">
        <MechanicalObject template="Vec3" name="MO"   position="0 0 0     0.01 0 0      0.02 0 0      0.03 0 0     0.04 0 0  0.05 0 0     0.06 0 0      0.07 0 0      0.08 0 0     0.09 0 0 " />
        <BoxROI name="boxA" box="-0.1-0.05 -0.1 0.1 0.1 0.1 " drawBoxes="1" drawSize="1"/>
        <ReadState filename="/home/raffa/work/data/journalValid/modelSens/sens/ref_f-50_mu-20" />
        <ShowSpheres  radius="0.000001"  color="0.5 0 0 1" position="@MO.position" />
        <StochasticPositionHandler filename="/home/raffa/work/data/journalValid/modelSens/matlabGT/gt_ref_f-50_mu-20"   observations="true" groundTruth="true"/>
    </Node>
    <Node name="ref_f-50_mu-10">
        <MechanicalObject template="Vec3" name="MO"   position="0 0 0     0.01 0 0      0.02 0 0      0.03 0 0     0.04 0 0  0.05 0 0     0.06 0 0      0.07 0 0      0.08 0 0     0.09 0 0 " />
        <BoxROI name="boxA" box="-0.1-0.05 -0.1 0.1 0.1 0.1 " drawBoxes="1" drawSize="1"/>
        <ReadState filename="/home/raffa/work/data/journalValid/modelSens/sens/ref_f-50_mu-10" />
        <ShowSpheres  radius="0.000001"  color="0 0 1 1" position="@MO.position" />
        <StochasticPositionHandler filename="/home/raffa/work/data/journalValid/modelSens/matlabGT/gt_ref_f-50_mu-10"   observations="true" groundTruth="true"/>
    </Node>
    <Node name="gt_ref_f-50_mu">
        <MechanicalObject template="Vec3" name="MO"   position="0 0 0     0.01 0 0      0.02 0 0      0.03 0 0     0.04 0 0  0.05 0 0     0.06 0 0      0.07 0 0      0.08 0 0     0.09 0 0 " />
        <BoxROI name="boxA" box="-0.1-0.05 -0.1 0.1 0.1 0.1 " drawBoxes="1" drawSize="1"/>
        <ReadState filename="/home/raffa/work/data/journalValid/modelSens/sens/ref_f-50_mu" />
        <ShowSpheres  radius="0.000001"  color="0.5 1 0 1" position="@MO.position" />
        <StochasticPositionHandler filename="/home/raffa/work/data/journalValid/modelSens/matlabGT/gt_ref_f-50_mu"   observations="true" groundTruth="true"/>
    </Node>
    <Node name="ref_f-50_mu+10">
        <MechanicalObject template="Vec3" name="MO"   position="0 0 0     0.01 0 0      0.02 0 0      0.03 0 0     0.04 0 0  0.05 0 0     0.06 0 0      0.07 0 0      0.08 0 0     0.09 0 0 " />
        <BoxROI name="boxA" box="-0.1-0.05 -0.1 0.1 0.1 0.1 " drawBoxes="1" drawSize="1"/>
        <ReadState filename="/home/raffa/work/data/journalValid/modelSens/sens/ref_f-50_mu+10" />
        <ShowSpheres  radius="0.000001"  color="0.5 0 1 1" position="@MO.position" />
        <StochasticPositionHandler filename="/home/raffa/work/data/journalValid/modelSens/matlabGT/gt_ref_f-50_mu+10"   observations="true" groundTruth="true"/>
    </Node>
    <Node name="ref_f-50_mu+20">
        <MechanicalObject template="Vec3" name="MO"   position="0 0 0     0.01 0 0      0.02 0 0      0.03 0 0     0.04 0 0  0.05 0 0     0.06 0 0      0.07 0 0      0.08 0 0     0.09 0 0 " />
        <BoxROI name="boxA" box="-0.1-0.05 -0.1 0.1 0.1 0.1 " drawBoxes="1" drawSize="1"/>
        <ReadState filename="/home/raffa/work/data/journalValid/modelSens/sens/ref_f-50_mu+20" />
        <ShowSpheres  radius="0.000001"  color="1 0.5 0 1" position="@MO.position" />
        <StochasticPositionHandler filename="/home/raffa/work/data/journalValid/modelSens/matlabGT/gt_ref_f-50_mu+20"   observations="true" groundTruth="true"/>
    </Node>
    <Node name="ref_f-50_mu+50">
        <MechanicalObject template="Vec3" name="MO"   position="0 0 0     0.01 0 0      0.02 0 0      0.03 0 0     0.04 0 0  0.05 0 0     0.06 0 0      0.07 0 0      0.08 0 0     0.09 0 0 " />
        <BoxROI name="boxA" box="-0.1-0.05 -0.1 0.1 0.1 0.1 " drawBoxes="1" drawSize="1"/>
        <ReadState filename="/home/raffa/work/data/journalValid/modelSens/sens/ref_f-50_mu+50" />
        <ShowSpheres  radius="0.000001"  color="1 0.5 0 1" position="@MO.position" />
        <StochasticPositionHandler filename="/home/raffa/work/data/journalValid/modelSens/matlabGT/gt_ref_f-50_mu+50"   observations="true" groundTruth="true"/>
    </Node>
    <Node name="ref_f-50_mu+100">
        <MechanicalObject template="Vec3" name="MO"   position="0 0 0     0.01 0 0      0.02 0 0      0.03 0 0     0.04 0 0  0.05 0 0     0.06 0 0      0.07 0 0      0.08 0 0     0.09 0 0 " />
        <BoxROI name="boxA" box="-0.1-0.05 -0.1 0.1 0.1 0.1 " drawBoxes="1" drawSize="1"/>
        <ReadState filename="/home/raffa/work/data/journalValid/modelSens/sens/ref_f-50_mu+100" />
        <ShowSpheres  radius="0.000001"  color="1 0.5 0 1" position="@MO.position" />
        <StochasticPositionHandler filename="/home/raffa/work/data/journalValid/modelSens/matlabGT/gt_ref_f-50_mu+100"   observations="true" groundTruth="true"/>
    </Node>


     <Node name="ref_f-20_mu-100">
        <MechanicalObject template="Vec3" name="MO"   position="0 0 0     0.01 0 0      0.02 0 0      0.03 0 0     0.04 0 0  0.05 0 0     0.06 0 0      0.07 0 0      0.08 0 0     0.09 0 0 " />
        <BoxROI name="boxA" box="-0.1-0.05 -0.1 0.1 0.1 0.1 " drawBoxes="1" drawSize="1"/>
        <ReadState filename="/home/raffa/work/data/journalValid/modelSens/sens/ref_f-20_mu-100" />
        <ShowSpheres  radius="0.000001"  color="1 0 0 1" position="@MO.position" />
        <StochasticPositionHandler filename="/home/raffa/work/data/journalValid/modelSens/matlabGT/gt_ref_f-20_mu-100"   observations="true" groundTruth="true"/>
    </Node>
    <Node name="ref_f-20_mu-50">
        <MechanicalObject template="Vec3" name="MO"   position="0 0 0     0.01 0 0      0.02 0 0      0.03 0 0     0.04 0 0  0.05 0 0     0.06 0 0      0.07 0 0      0.08 0 0     0.09 0 0 " />
        <BoxROI name="boxA" box="-0.1-0.05 -0.1 0.1 0.1 0.1 " drawBoxes="1" drawSize="1"/>
        <ReadState filename="/home/raffa/work/data/journalValid/modelSens/sens/ref_f-20_mu-50" />
        <ShowSpheres  radius="0.000001"  color="0 1 0 1" position="@MO.position" />
        <StochasticPositionHandler filename="/home/raffa/work/data/journalValid/modelSens/matlabGT/gt_ref_f-20_mu-50"   observations="true" groundTruth="true"/>
    </Node>
    <Node name="ref_f-20_mu-20">
        <MechanicalObject template="Vec3" name="MO"   position="0 0 0     0.01 0 0      0.02 0 0      0.03 0 0     0.04 0 0  0.05 0 0     0.06 0 0      0.07 0 0      0.08 0 0     0.09 0 0 " />
        <BoxROI name="boxA" box="-0.1-0.05 -0.1 0.1 0.1 0.1 " drawBoxes="1" drawSize="1"/>
        <ReadState filename="/home/raffa/work/data/journalValid/modelSens/sens/ref_f-20_mu-20" />
        <ShowSpheres  radius="0.000001"  color="0.5 0 0 1" position="@MO.position" />
        <StochasticPositionHandler filename="/home/raffa/work/data/journalValid/modelSens/matlabGT/gt_ref_f-20_mu-20"   observations="true" groundTruth="true"/>
    </Node>
    <Node name="ref_f-20_mu-10">
        <MechanicalObject template="Vec3" name="MO"   position="0 0 0     0.01 0 0      0.02 0 0      0.03 0 0     0.04 0 0  0.05 0 0     0.06 0 0      0.07 0 0      0.08 0 0     0.09 0 0 " />
        <BoxROI name="boxA" box="-0.1-0.05 -0.1 0.1 0.1 0.1 " drawBoxes="1" drawSize="1"/>
        <ReadState filename="/home/raffa/work/data/journalValid/modelSens/sens/ref_f-20_mu-10" />
        <ShowSpheres  radius="0.000001"  color="0 0 1 1" position="@MO.position" />
        <StochasticPositionHandler filename="/home/raffa/work/data/journalValid/modelSens/matlabGT/gt_ref_f-20_mu-10"   observations="true" groundTruth="true"/>
    </Node>
    <Node name="gt_ref_f-20_mu">
        <MechanicalObject template="Vec3" name="MO"   position="0 0 0     0.01 0 0      0.02 0 0      0.03 0 0     0.04 0 0  0.05 0 0     0.06 0 0      0.07 0 0      0.08 0 0     0.09 0 0 " />
        <BoxROI name="boxA" box="-0.1-0.05 -0.1 0.1 0.1 0.1 " drawBoxes="1" drawSize="1"/>
        <ReadState filename="/home/raffa/work/data/journalValid/modelSens/sens/ref_f-20_mu" />
        <ShowSpheres  radius="0.000001"  color="0.5 1 0 1" position="@MO.position" />
        <StochasticPositionHandler filename="/home/raffa/work/data/journalValid/modelSens/matlabGT/gt_ref_f-20_mu"   observations="true" groundTruth="true"/>
    </Node>
    <Node name="ref_f-20_mu+10">
        <MechanicalObject template="Vec3" name="MO"   position="0 0 0     0.01 0 0      0.02 0 0      0.03 0 0     0.04 0 0  0.05 0 0     0.06 0 0      0.07 0 0      0.08 0 0     0.09 0 0 " />
        <BoxROI name="boxA" box="-0.1-0.05 -0.1 0.1 0.1 0.1 " drawBoxes="1" drawSize="1"/>
        <ReadState filename="/home/raffa/work/data/journalValid/modelSens/sens/ref_f-20_mu+10" />
        <ShowSpheres  radius="0.000001"  color="0.5 0 1 1" position="@MO.position" />
        <StochasticPositionHandler filename="/home/raffa/work/data/journalValid/modelSens/matlabGT/gt_ref_f-20_mu+10"   observations="true" groundTruth="true"/>
    </Node>
    <Node name="ref_f-20_mu+20">
        <MechanicalObject template="Vec3" name="MO"   position="0 0 0     0.01 0 0      0.02 0 0      0.03 0 0     0.04 0 0  0.05 0 0     0.06 0 0      0.07 0 0      0.08 0 0     0.09 0 0 " />
        <BoxROI name="boxA" box="-0.1-0.05 -0.1 0.1 0.1 0.1 " drawBoxes="1" drawSize="1"/>
        <ReadState filename="/home/raffa/work/data/journalValid/modelSens/sens/ref_f-20_mu+20" />
        <ShowSpheres  radius="0.000001"  color="1 0.5 0 1" position="@MO.position" />
        <StochasticPositionHandler filename="/home/raffa/work/data/journalValid/modelSens/matlabGT/gt_ref_f-20_mu+20"   observations="true" groundTruth="true"/>
    </Node>
    <Node name="ref_f-20_mu+50">
        <MechanicalObject template="Vec3" name="MO"   position="0 0 0     0.01 0 0      0.02 0 0      0.03 0 0     0.04 0 0  0.05 0 0     0.06 0 0      0.07 0 0      0.08 0 0     0.09 0 0 " />
        <BoxROI name="boxA" box="-0.1-0.05 -0.1 0.1 0.1 0.1 " drawBoxes="1" drawSize="1"/>
        <ReadState filename="/home/raffa/work/data/journalValid/modelSens/sens/ref_f-20_mu+50" />
        <ShowSpheres  radius="0.000001"  color="1 0.5 0 1" position="@MO.position" />
        <StochasticPositionHandler filename="/home/raffa/work/data/journalValid/modelSens/matlabGT/gt_ref_f-20_mu+50"   observations="true" groundTruth="true"/>
    </Node>
    <Node name="ref_f-20_mu+100">
        <MechanicalObject template="Vec3" name="MO"   position="0 0 0     0.01 0 0      0.02 0 0      0.03 0 0     0.04 0 0  0.05 0 0     0.06 0 0      0.07 0 0      0.08 0 0     0.09 0 0 " />
        <BoxROI name="boxA" box="-0.1-0.05 -0.1 0.1 0.1 0.1 " drawBoxes="1" drawSize="1"/>
        <ReadState filename="/home/raffa/work/data/journalValid/modelSens/sens/ref_f-20_mu+100" />
        <ShowSpheres  radius="0.000001"  color="1 0.5 0 1" position="@MO.position" />
        <StochasticPositionHandler filename="/home/raffa/work/data/journalValid/modelSens/matlabGT/gt_ref_f-20_mu+100"   observations="true" groundTruth="true"/>
    </Node>


     <Node name="ref_f-10_mu-100">
        <MechanicalObject template="Vec3" name="MO"   position="0 0 0     0.01 0 0      0.02 0 0      0.03 0 0     0.04 0 0  0.05 0 0     0.06 0 0      0.07 0 0      0.08 0 0     0.09 0 0 " />
        <BoxROI name="boxA" box="-0.1-0.05 -0.1 0.1 0.1 0.1 " drawBoxes="1" drawSize="1"/>
        <ReadState filename="/home/raffa/work/data/journalValid/modelSens/sens/ref_f-10_mu-100" />
        <ShowSpheres  radius="0.000001"  color="1 0 0 1" position="@MO.position" />
        <StochasticPositionHandler filename="/home/raffa/work/data/journalValid/modelSens/matlabGT/gt_ref_f-10_mu-100"   observations="true" groundTruth="true"/>
    </Node>
    <Node name="ref_f-10_mu-50">
        <MechanicalObject template="Vec3" name="MO"   position="0 0 0     0.01 0 0      0.02 0 0      0.03 0 0     0.04 0 0  0.05 0 0     0.06 0 0      0.07 0 0      0.08 0 0     0.09 0 0 " />
        <BoxROI name="boxA" box="-0.1-0.05 -0.1 0.1 0.1 0.1 " drawBoxes="1" drawSize="1"/>
        <ReadState filename="/home/raffa/work/data/journalValid/modelSens/sens/ref_f-10_mu-50" />
        <ShowSpheres  radius="0.000001"  color="0 1 0 1" position="@MO.position" />
        <StochasticPositionHandler filename="/home/raffa/work/data/journalValid/modelSens/matlabGT/gt_ref_f-10_mu-50"   observations="true" groundTruth="true"/>
    </Node>
    <Node name="ref_f-10_mu-20">
        <MechanicalObject template="Vec3" name="MO"   position="0 0 0     0.01 0 0      0.02 0 0      0.03 0 0     0.04 0 0  0.05 0 0     0.06 0 0      0.07 0 0      0.08 0 0     0.09 0 0 " />
        <BoxROI name="boxA" box="-0.1-0.05 -0.1 0.1 0.1 0.1 " drawBoxes="1" drawSize="1"/>
        <ReadState filename="/home/raffa/work/data/journalValid/modelSens/sens/ref_f-10_mu-20" />
        <ShowSpheres  radius="0.000001"  color="0.5 0 0 1" position="@MO.position" />
        <StochasticPositionHandler filename="/home/raffa/work/data/journalValid/modelSens/matlabGT/gt_ref_f-10_mu-20"   observations="true" groundTruth="true"/>
    </Node>
    <Node name="ref_f-10_mu-10">
        <MechanicalObject template="Vec3" name="MO"   position="0 0 0     0.01 0 0      0.02 0 0      0.03 0 0     0.04 0 0  0.05 0 0     0.06 0 0      0.07 0 0      0.08 0 0     0.09 0 0 " />
        <BoxROI name="boxA" box="-0.1-0.05 -0.1 0.1 0.1 0.1 " drawBoxes="1" drawSize="1"/>
        <ReadState filename="/home/raffa/work/data/journalValid/modelSens/sens/ref_f-10_mu-10" />
        <ShowSpheres  radius="0.000001"  color="0 0 1 1" position="@MO.position" />
        <StochasticPositionHandler filename="/home/raffa/work/data/journalValid/modelSens/matlabGT/gt_ref_f-10_mu-10"   observations="true" groundTruth="true"/>
    </Node>
    <Node name="gt_ref_f-10_mu">
        <MechanicalObject template="Vec3" name="MO"   position="0 0 0     0.01 0 0      0.02 0 0      0.03 0 0     0.04 0 0  0.05 0 0     0.06 0 0      0.07 0 0      0.08 0 0     0.09 0 0 " />
        <BoxROI name="boxA" box="-0.1-0.05 -0.1 0.1 0.1 0.1 " drawBoxes="1" drawSize="1"/>
        <ReadState filename="/home/raffa/work/data/journalValid/modelSens/sens/ref_f-10_mu" />
        <ShowSpheres  radius="0.000001"  color="0.5 1 0 1" position="@MO.position" />
        <StochasticPositionHandler filename="/home/raffa/work/data/journalValid/modelSens/matlabGT/gt_ref_f-10_mu"   observations="true" groundTruth="true"/>
    </Node>
    <Node name="ref_f-10_mu+10">
        <MechanicalObject template="Vec3" name="MO"   position="0 0 0     0.01 0 0      0.02 0 0      0.03 0 0     0.04 0 0  0.05 0 0     0.06 0 0      0.07 0 0      0.08 0 0     0.09 0 0 " />
        <BoxROI name="boxA" box="-0.1-0.05 -0.1 0.1 0.1 0.1 " drawBoxes="1" drawSize="1"/>
        <ReadState filename="/home/raffa/work/data/journalValid/modelSens/sens/ref_f-10_mu+10" />
        <ShowSpheres  radius="0.000001"  color="0.5 0 1 1" position="@MO.position" />
        <StochasticPositionHandler filename="/home/raffa/work/data/journalValid/modelSens/matlabGT/gt_ref_f-10_mu+10"   observations="true" groundTruth="true"/>
    </Node>
    <Node name="ref_f-10_mu+20">
        <MechanicalObject template="Vec3" name="MO"   position="0 0 0     0.01 0 0      0.02 0 0      0.03 0 0     0.04 0 0  0.05 0 0     0.06 0 0      0.07 0 0      0.08 0 0     0.09 0 0 " />
        <BoxROI name="boxA" box="-0.1-0.05 -0.1 0.1 0.1 0.1 " drawBoxes="1" drawSize="1"/>
        <ReadState filename="/home/raffa/work/data/journalValid/modelSens/sens/ref_f-10_mu+20" />
        <ShowSpheres  radius="0.000001"  color="1 0.5 0 1" position="@MO.position" />
        <StochasticPositionHandler filename="/home/raffa/work/data/journalValid/modelSens/matlabGT/gt_ref_f-10_mu+20"   observations="true" groundTruth="true"/>
    </Node>
    <Node name="ref_f-10_mu+50">
        <MechanicalObject template="Vec3" name="MO"   position="0 0 0     0.01 0 0      0.02 0 0      0.03 0 0     0.04 0 0  0.05 0 0     0.06 0 0      0.07 0 0      0.08 0 0     0.09 0 0 " />
        <BoxROI name="boxA" box="-0.1-0.05 -0.1 0.1 0.1 0.1 " drawBoxes="1" drawSize="1"/>
        <ReadState filename="/home/raffa/work/data/journalValid/modelSens/sens/ref_f-10_mu+50" />
        <ShowSpheres  radius="0.000001"  color="1 0.5 0 1" position="@MO.position" />
        <StochasticPositionHandler filename="/home/raffa/work/data/journalValid/modelSens/matlabGT/gt_ref_f-10_mu+50"   observations="true" groundTruth="true"/>
    </Node>
    <Node name="ref_f-10_mu+100">
        <MechanicalObject template="Vec3" name="MO"   position="0 0 0     0.01 0 0      0.02 0 0      0.03 0 0     0.04 0 0  0.05 0 0     0.06 0 0      0.07 0 0      0.08 0 0     0.09 0 0 " />
        <BoxROI name="boxA" box="-0.1-0.05 -0.1 0.1 0.1 0.1 " drawBoxes="1" drawSize="1"/>
        <ReadState filename="/home/raffa/work/data/journalValid/modelSens/sens/ref_f-10_mu+100" />
        <ShowSpheres  radius="0.000001"  color="1 0.5 0 1" position="@MO.position" />
        <StochasticPositionHandler filename="/home/raffa/work/data/journalValid/modelSens/matlabGT/gt_ref_f-10_mu+100"   observations="true" groundTruth="true"/>
    </Node>


     <Node name="ref_f_mu-100">
        <MechanicalObject template="Vec3" name="MO"   position="0 0 0     0.01 0 0      0.02 0 0      0.03 0 0     0.04 0 0  0.05 0 0     0.06 0 0      0.07 0 0      0.08 0 0     0.09 0 0 " />
        <BoxROI name="boxA" box="-0.1-0.05 -0.1 0.1 0.1 0.1 " drawBoxes="1" drawSize="1"/>
        <ReadState filename="/home/raffa/work/data/journalValid/modelSens/sens/ref_f_mu-100" />
        <ShowSpheres  radius="0.000001"  color="1 0 0 1" position="@MO.position" />
        <StochasticPositionHandler filename="/home/raffa/work/data/journalValid/modelSens/matlabGT/gt_ref_f_mu-100"   observations="true" groundTruth="true"/>
    </Node>
    <Node name="ref_f_mu-50">
        <MechanicalObject template="Vec3" name="MO"   position="0 0 0     0.01 0 0      0.02 0 0      0.03 0 0     0.04 0 0  0.05 0 0     0.06 0 0      0.07 0 0      0.08 0 0     0.09 0 0 " />
        <BoxROI name="boxA" box="-0.1-0.05 -0.1 0.1 0.1 0.1 " drawBoxes="1" drawSize="1"/>
        <ReadState filename="/home/raffa/work/data/journalValid/modelSens/sens/ref_f_mu-50" />
        <ShowSpheres  radius="0.000001"  color="0 1 0 1" position="@MO.position" />
        <StochasticPositionHandler filename="/home/raffa/work/data/journalValid/modelSens/matlabGT/gt_ref_f_mu-50"   observations="true" groundTruth="true"/>
    </Node>
    <Node name="ref_f_mu-20">
        <MechanicalObject template="Vec3" name="MO"   position="0 0 0     0.01 0 0      0.02 0 0      0.03 0 0     0.04 0 0  0.05 0 0     0.06 0 0      0.07 0 0      0.08 0 0     0.09 0 0 " />
        <BoxROI name="boxA" box="-0.1-0.05 -0.1 0.1 0.1 0.1 " drawBoxes="1" drawSize="1"/>
        <ReadState filename="/home/raffa/work/data/journalValid/modelSens/sens/ref_f_mu-20" />
        <ShowSpheres  radius="0.000001"  color="0.5 0 0 1" position="@MO.position" />
        <StochasticPositionHandler filename="/home/raffa/work/data/journalValid/modelSens/matlabGT/gt_ref_f_mu-20"   observations="true" groundTruth="true"/>
    </Node>
    <Node name="ref_f_mu-10">
        <MechanicalObject template="Vec3" name="MO"   position="0 0 0     0.01 0 0      0.02 0 0      0.03 0 0     0.04 0 0  0.05 0 0     0.06 0 0      0.07 0 0      0.08 0 0     0.09 0 0 " />
        <BoxROI name="boxA" box="-0.1-0.05 -0.1 0.1 0.1 0.1 " drawBoxes="1" drawSize="1"/>
        <ReadState filename="/home/raffa/work/data/journalValid/modelSens/sens/ref_f_mu-10" />
        <ShowSpheres  radius="0.000001"  color="0 0 1 1" position="@MO.position" />
        <StochasticPositionHandler filename="/home/raffa/work/data/journalValid/modelSens/matlabGT/gt_ref_f_mu-10"   observations="true" groundTruth="true"/>
    </Node>
    <Node name="gt_ref_f_mu">
        <MechanicalObject template="Vec3" name="MO"   position="0 0 0     0.01 0 0      0.02 0 0      0.03 0 0     0.04 0 0  0.05 0 0     0.06 0 0      0.07 0 0      0.08 0 0     0.09 0 0 " />
        <BoxROI name="boxA" box="-0.1-0.05 -0.1 0.1 0.1 0.1 " drawBoxes="1" drawSize="1"/>
        <ReadState filename="/home/raffa/work/data/journalValid/modelSens/sens/ref_f_mu" />
        <ShowSpheres  radius="0.000001"  color="0.5 1 0 1" position="@MO.position" />
        <StochasticPositionHandler filename="/home/raffa/work/data/journalValid/modelSens/matlabGT/gt_ref_f_mu"   observations="true" groundTruth="true"/>
    </Node>
    <Node name="ref_f_mu+10">
        <MechanicalObject template="Vec3" name="MO"   position="0 0 0     0.01 0 0      0.02 0 0      0.03 0 0     0.04 0 0  0.05 0 0     0.06 0 0      0.07 0 0      0.08 0 0     0.09 0 0 " />
        <BoxROI name="boxA" box="-0.1-0.05 -0.1 0.1 0.1 0.1 " drawBoxes="1" drawSize="1"/>
        <ReadState filename="/home/raffa/work/data/journalValid/modelSens/sens/ref_f_mu+10" />
        <ShowSpheres  radius="0.000001"  color="0.5 0 1 1" position="@MO.position" />
        <StochasticPositionHandler filename="/home/raffa/work/data/journalValid/modelSens/matlabGT/gt_ref_f_mu+10"   observations="true" groundTruth="true"/>
    </Node>
    <Node name="ref_f_mu+20">
        <MechanicalObject template="Vec3" name="MO"   position="0 0 0     0.01 0 0      0.02 0 0      0.03 0 0     0.04 0 0  0.05 0 0     0.06 0 0      0.07 0 0      0.08 0 0     0.09 0 0 " />
        <BoxROI name="boxA" box="-0.1-0.05 -0.1 0.1 0.1 0.1 " drawBoxes="1" drawSize="1"/>
        <ReadState filename="/home/raffa/work/data/journalValid/modelSens/sens/ref_f_mu+20" />
        <ShowSpheres  radius="0.000001"  color="1 0.5 0 1" position="@MO.position" />
        <StochasticPositionHandler filename="/home/raffa/work/data/journalValid/modelSens/matlabGT/gt_ref_f_mu+20"   observations="true" groundTruth="true"/>
    </Node>
    <Node name="ref_f_mu+50">
        <MechanicalObject template="Vec3" name="MO"   position="0 0 0     0.01 0 0      0.02 0 0      0.03 0 0     0.04 0 0  0.05 0 0     0.06 0 0      0.07 0 0      0.08 0 0     0.09 0 0 " />
        <BoxROI name="boxA" box="-0.1-0.05 -0.1 0.1 0.1 0.1 " drawBoxes="1" drawSize="1"/>
        <ReadState filename="/home/raffa/work/data/journalValid/modelSens/sens/ref_f_mu+50" />
        <ShowSpheres  radius="0.000001"  color="1 0.5 0 1" position="@MO.position" />
        <StochasticPositionHandler filename="/home/raffa/work/data/journalValid/modelSens/matlabGT/gt_ref_f_mu+50"   observations="true" groundTruth="true"/>
    </Node>
    <Node name="ref_f_mu+100">
        <MechanicalObject template="Vec3" name="MO"   position="0 0 0     0.01 0 0      0.02 0 0      0.03 0 0     0.04 0 0  0.05 0 0     0.06 0 0      0.07 0 0      0.08 0 0     0.09 0 0 " />
        <BoxROI name="boxA" box="-0.1-0.05 -0.1 0.1 0.1 0.1 " drawBoxes="1" drawSize="1"/>
        <ReadState filename="/home/raffa/work/data/journalValid/modelSens/sens/ref_f_mu+100" />
        <ShowSpheres  radius="0.000001"  color="1 0.5 0 1" position="@MO.position" />
        <StochasticPositionHandler filename="/home/raffa/work/data/journalValid/modelSens/matlabGT/gt_ref_f_mu+100"   observations="true" groundTruth="true"/>
    </Node>


     <Node name="ref_f+10_mu-100">
        <MechanicalObject template="Vec3" name="MO"   position="0 0 0     0.01 0 0      0.02 0 0      0.03 0 0     0.04 0 0  0.05 0 0     0.06 0 0      0.07 0 0      0.08 0 0     0.09 0 0 " />
        <BoxROI name="boxA" box="-0.1-0.05 -0.1 0.1 0.1 0.1 " drawBoxes="1" drawSize="1"/>
        <ReadState filename="/home/raffa/work/data/journalValid/modelSens/sens/ref_f+10_mu-100" />
        <ShowSpheres  radius="0.000001"  color="1 0 0 1" position="@MO.position" />
        <StochasticPositionHandler filename="/home/raffa/work/data/journalValid/modelSens/matlabGT/gt_ref_f+10_mu-100"   observations="true" groundTruth="true"/>
    </Node>
    <Node name="ref_f+10_mu-50">
        <MechanicalObject template="Vec3" name="MO"   position="0 0 0     0.01 0 0      0.02 0 0      0.03 0 0     0.04 0 0  0.05 0 0     0.06 0 0      0.07 0 0      0.08 0 0     0.09 0 0 " />
        <BoxROI name="boxA" box="-0.1-0.05 -0.1 0.1 0.1 0.1 " drawBoxes="1" drawSize="1"/>
        <ReadState filename="/home/raffa/work/data/journalValid/modelSens/sens/ref_f+10_mu-50" />
        <ShowSpheres  radius="0.000001"  color="0 1 0 1" position="@MO.position" />
        <StochasticPositionHandler filename="/home/raffa/work/data/journalValid/modelSens/matlabGT/gt_ref_f+10_mu-50"   observations="true" groundTruth="true"/>
    </Node>
    <Node name="ref_f+10_mu-20">
        <MechanicalObject template="Vec3" name="MO"   position="0 0 0     0.01 0 0      0.02 0 0      0.03 0 0     0.04 0 0  0.05 0 0     0.06 0 0      0.07 0 0      0.08 0 0     0.09 0 0 " />
        <BoxROI name="boxA" box="-0.1-0.05 -0.1 0.1 0.1 0.1 " drawBoxes="1" drawSize="1"/>
        <ReadState filename="/home/raffa/work/data/journalValid/modelSens/sens/ref_f+10_mu-20" />
        <ShowSpheres  radius="0.000001"  color="0.5 0 0 1" position="@MO.position" />
        <StochasticPositionHandler filename="/home/raffa/work/data/journalValid/modelSens/matlabGT/gt_ref_f+10_mu-20"   observations="true" groundTruth="true"/>
    </Node>
    <Node name="ref_f+10_mu-10">
        <MechanicalObject template="Vec3" name="MO"   position="0 0 0     0.01 0 0      0.02 0 0      0.03 0 0     0.04 0 0  0.05 0 0     0.06 0 0      0.07 0 0      0.08 0 0     0.09 0 0 " />
        <BoxROI name="boxA" box="-0.1-0.05 -0.1 0.1 0.1 0.1 " drawBoxes="1" drawSize="1"/>
        <ReadState filename="/home/raffa/work/data/journalValid/modelSens/sens/ref_f+10_mu-10" />
        <ShowSpheres  radius="0.000001"  color="0 0 1 1" position="@MO.position" />
        <StochasticPositionHandler filename="/home/raffa/work/data/journalValid/modelSens/matlabGT/gt_ref_f+10_mu-10"   observations="true" groundTruth="true"/>
    </Node>
    <Node name="gt_ref_f+10_mu">
        <MechanicalObject template="Vec3" name="MO"   position="0 0 0     0.01 0 0      0.02 0 0      0.03 0 0     0.04 0 0  0.05 0 0     0.06 0 0      0.07 0 0      0.08 0 0     0.09 0 0 " />
        <BoxROI name="boxA" box="-0.1-0.05 -0.1 0.1 0.1 0.1 " drawBoxes="1" drawSize="1"/>
        <ReadState filename="/home/raffa/work/data/journalValid/modelSens/sens/ref_f+10_mu" />
        <ShowSpheres  radius="0.000001"  color="0.5 1 0 1" position="@MO.position" />
        <StochasticPositionHandler filename="/home/raffa/work/data/journalValid/modelSens/matlabGT/gt_ref_f+10_mu"   observations="true" groundTruth="true"/>
    </Node>
    <Node name="ref_f+10_mu+10">
        <MechanicalObject template="Vec3" name="MO"   position="0 0 0     0.01 0 0      0.02 0 0      0.03 0 0     0.04 0 0  0.05 0 0     0.06 0 0      0.07 0 0      0.08 0 0     0.09 0 0 " />
        <BoxROI name="boxA" box="-0.1-0.05 -0.1 0.1 0.1 0.1 " drawBoxes="1" drawSize="1"/>
        <ReadState filename="/home/raffa/work/data/journalValid/modelSens/sens/ref_f+10_mu+10" />
        <ShowSpheres  radius="0.000001"  color="0.5 0 1 1" position="@MO.position" />
        <StochasticPositionHandler filename="/home/raffa/work/data/journalValid/modelSens/matlabGT/gt_ref_f+10_mu+10"   observations="true" groundTruth="true"/>
    </Node>
    <Node name="ref_f+10_mu+20">
        <MechanicalObject template="Vec3" name="MO"   position="0 0 0     0.01 0 0      0.02 0 0      0.03 0 0     0.04 0 0  0.05 0 0     0.06 0 0      0.07 0 0      0.08 0 0     0.09 0 0 " />
        <BoxROI name="boxA" box="-0.1-0.05 -0.1 0.1 0.1 0.1 " drawBoxes="1" drawSize="1"/>
        <ReadState filename="/home/raffa/work/data/journalValid/modelSens/sens/ref_f+10_mu+20" />
        <ShowSpheres  radius="0.000001"  color="1 0.5 0 1" position="@MO.position" />
        <StochasticPositionHandler filename="/home/raffa/work/data/journalValid/modelSens/matlabGT/gt_ref_f+10_mu+20"   observations="true" groundTruth="true"/>
    </Node>
    <Node name="ref_f+10_mu+50">
        <MechanicalObject template="Vec3" name="MO"   position="0 0 0     0.01 0 0      0.02 0 0      0.03 0 0     0.04 0 0  0.05 0 0     0.06 0 0      0.07 0 0      0.08 0 0     0.09 0 0 " />
        <BoxROI name="boxA" box="-0.1-0.05 -0.1 0.1 0.1 0.1 " drawBoxes="1" drawSize="1"/>
        <ReadState filename="/home/raffa/work/data/journalValid/modelSens/sens/ref_f+10_mu+50" />
        <ShowSpheres  radius="0.000001"  color="1 0.5 0 1" position="@MO.position" />
        <StochasticPositionHandler filename="/home/raffa/work/data/journalValid/modelSens/matlabGT/gt_ref_f+10_mu+50"   observations="true" groundTruth="true"/>
    </Node>
    <Node name="ref_f+10_mu+100">
        <MechanicalObject template="Vec3" name="MO"   position="0 0 0     0.01 0 0      0.02 0 0      0.03 0 0     0.04 0 0  0.05 0 0     0.06 0 0      0.07 0 0      0.08 0 0     0.09 0 0 " />
        <BoxROI name="boxA" box="-0.1-0.05 -0.1 0.1 0.1 0.1 " drawBoxes="1" drawSize="1"/>
        <ReadState filename="/home/raffa/work/data/journalValid/modelSens/sens/ref_f+10_mu+100" />
        <ShowSpheres  radius="0.000001"  color="1 0.5 0 1" position="@MO.position" />
        <StochasticPositionHandler filename="/home/raffa/work/data/journalValid/modelSens/matlabGT/gt_ref_f+10_mu+100"   observations="true" groundTruth="true"/>
    </Node>


     <Node name="ref_f+20_mu-100">
        <MechanicalObject template="Vec3" name="MO"   position="0 0 0     0.01 0 0      0.02 0 0      0.03 0 0     0.04 0 0  0.05 0 0     0.06 0 0      0.07 0 0      0.08 0 0     0.09 0 0 " />
        <BoxROI name="boxA" box="-0.1-0.05 -0.1 0.1 0.1 0.1 " drawBoxes="1" drawSize="1"/>
        <ReadState filename="/home/raffa/work/data/journalValid/modelSens/sens/ref_f+20_mu-100" />
        <ShowSpheres  radius="0.000001"  color="1 0 0 1" position="@MO.position" />
        <StochasticPositionHandler filename="/home/raffa/work/data/journalValid/modelSens/matlabGT/gt_ref_f+20_mu-100"   observations="true" groundTruth="true"/>
    </Node>
    <Node name="ref_f+20_mu-50">
        <MechanicalObject template="Vec3" name="MO"   position="0 0 0     0.01 0 0      0.02 0 0      0.03 0 0     0.04 0 0  0.05 0 0     0.06 0 0      0.07 0 0      0.08 0 0     0.09 0 0 " />
        <BoxROI name="boxA" box="-0.1-0.05 -0.1 0.1 0.1 0.1 " drawBoxes="1" drawSize="1"/>
        <ReadState filename="/home/raffa/work/data/journalValid/modelSens/sens/ref_f+20_mu-50" />
        <ShowSpheres  radius="0.000001"  color="0 1 0 1" position="@MO.position" />
        <StochasticPositionHandler filename="/home/raffa/work/data/journalValid/modelSens/matlabGT/gt_ref_f+20_mu-50"   observations="true" groundTruth="true"/>
    </Node>
    <Node name="ref_f+20_mu-20">
        <MechanicalObject template="Vec3" name="MO"   position="0 0 0     0.01 0 0      0.02 0 0      0.03 0 0     0.04 0 0  0.05 0 0     0.06 0 0      0.07 0 0      0.08 0 0     0.09 0 0 " />
        <BoxROI name="boxA" box="-0.1-0.05 -0.1 0.1 0.1 0.1 " drawBoxes="1" drawSize="1"/>
        <ReadState filename="/home/raffa/work/data/journalValid/modelSens/sens/ref_f+20_mu-20" />
        <ShowSpheres  radius="0.000001"  color="0.5 0 0 1" position="@MO.position" />
        <StochasticPositionHandler filename="/home/raffa/work/data/journalValid/modelSens/matlabGT/gt_ref_f+20_mu-20"   observations="true" groundTruth="true"/>
    </Node>
    <Node name="ref_f+20_mu-10">
        <MechanicalObject template="Vec3" name="MO"   position="0 0 0     0.01 0 0      0.02 0 0      0.03 0 0     0.04 0 0  0.05 0 0     0.06 0 0      0.07 0 0      0.08 0 0     0.09 0 0 " />
        <BoxROI name="boxA" box="-0.1-0.05 -0.1 0.1 0.1 0.1 " drawBoxes="1" drawSize="1"/>
        <ReadState filename="/home/raffa/work/data/journalValid/modelSens/sens/ref_f+20_mu-10" />
        <ShowSpheres  radius="0.000001"  color="0 0 1 1" position="@MO.position" />
        <StochasticPositionHandler filename="/home/raffa/work/data/journalValid/modelSens/matlabGT/gt_ref_f+20_mu-10"   observations="true" groundTruth="true"/>
    </Node>
    <Node name="gt_ref_f+20_mu">
        <MechanicalObject template="Vec3" name="MO"   position="0 0 0     0.01 0 0      0.02 0 0      0.03 0 0     0.04 0 0  0.05 0 0     0.06 0 0      0.07 0 0      0.08 0 0     0.09 0 0 " />
        <BoxROI name="boxA" box="-0.1-0.05 -0.1 0.1 0.1 0.1 " drawBoxes="1" drawSize="1"/>
        <ReadState filename="/home/raffa/work/data/journalValid/modelSens/sens/ref_f+20_mu" />
        <ShowSpheres  radius="0.000001"  color="0.5 1 0 1" position="@MO.position" />
        <StochasticPositionHandler filename="/home/raffa/work/data/journalValid/modelSens/matlabGT/gt_ref_f+20_mu"   observations="true" groundTruth="true"/>
    </Node>
    <Node name="ref_f+20_mu+10">
        <MechanicalObject template="Vec3" name="MO"   position="0 0 0     0.01 0 0      0.02 0 0      0.03 0 0     0.04 0 0  0.05 0 0     0.06 0 0      0.07 0 0      0.08 0 0     0.09 0 0 " />
        <BoxROI name="boxA" box="-0.1-0.05 -0.1 0.1 0.1 0.1 " drawBoxes="1" drawSize="1"/>
        <ReadState filename="/home/raffa/work/data/journalValid/modelSens/sens/ref_f+20_mu+10" />
        <ShowSpheres  radius="0.000001"  color="0.5 0 1 1" position="@MO.position" />
        <StochasticPositionHandler filename="/home/raffa/work/data/journalValid/modelSens/matlabGT/gt_ref_f+20_mu+10"   observations="true" groundTruth="true"/>
    </Node>
    <Node name="ref_f+20_mu+20">
        <MechanicalObject template="Vec3" name="MO"   position="0 0 0     0.01 0 0      0.02 0 0      0.03 0 0     0.04 0 0  0.05 0 0     0.06 0 0      0.07 0 0      0.08 0 0     0.09 0 0 " />
        <BoxROI name="boxA" box="-0.1-0.05 -0.1 0.1 0.1 0.1 " drawBoxes="1" drawSize="1"/>
        <ReadState filename="/home/raffa/work/data/journalValid/modelSens/sens/ref_f+20_mu+20" />
        <ShowSpheres  radius="0.000001"  color="1 0.5 0 1" position="@MO.position" />
        <StochasticPositionHandler filename="/home/raffa/work/data/journalValid/modelSens/matlabGT/gt_ref_f+20_mu+20"   observations="true" groundTruth="true"/>
    </Node>
    <Node name="ref_f+20_mu+50">
        <MechanicalObject template="Vec3" name="MO"   position="0 0 0     0.01 0 0      0.02 0 0      0.03 0 0     0.04 0 0  0.05 0 0     0.06 0 0      0.07 0 0      0.08 0 0     0.09 0 0 " />
        <BoxROI name="boxA" box="-0.1-0.05 -0.1 0.1 0.1 0.1 " drawBoxes="1" drawSize="1"/>
        <ReadState filename="/home/raffa/work/data/journalValid/modelSens/sens/ref_f+20_mu+50" />
        <ShowSpheres  radius="0.000001"  color="1 0.5 0 1" position="@MO.position" />
        <StochasticPositionHandler filename="/home/raffa/work/data/journalValid/modelSens/matlabGT/gt_ref_f+20_mu+50"   observations="true" groundTruth="true"/>
    </Node>
    <Node name="ref_f+20_mu+100">
        <MechanicalObject template="Vec3" name="MO"   position="0 0 0     0.01 0 0      0.02 0 0      0.03 0 0     0.04 0 0  0.05 0 0     0.06 0 0      0.07 0 0      0.08 0 0     0.09 0 0 " />
        <BoxROI name="boxA" box="-0.1-0.05 -0.1 0.1 0.1 0.1 " drawBoxes="1" drawSize="1"/>
        <ReadState filename="/home/raffa/work/data/journalValid/modelSens/sens/ref_f+20_mu+100" />
        <ShowSpheres  radius="0.000001"  color="1 0.5 0 1" position="@MO.position" />
        <StochasticPositionHandler filename="/home/raffa/work/data/journalValid/modelSens/matlabGT/gt_ref_f+20_mu+100"   observations="true" groundTruth="true"/>
    </Node>


     <Node name="ref_f+50_mu-100">
        <MechanicalObject template="Vec3" name="MO"   position="0 0 0     0.01 0 0      0.02 0 0      0.03 0 0     0.04 0 0  0.05 0 0     0.06 0 0      0.07 0 0      0.08 0 0     0.09 0 0 " />
        <BoxROI name="boxA" box="-0.1-0.05 -0.1 0.1 0.1 0.1 " drawBoxes="1" drawSize="1"/>
        <ReadState filename="/home/raffa/work/data/journalValid/modelSens/sens/ref_f+50_mu-100" />
        <ShowSpheres  radius="0.000001"  color="1 0 0 1" position="@MO.position" />
        <StochasticPositionHandler filename="/home/raffa/work/data/journalValid/modelSens/matlabGT/gt_ref_f+50_mu-100"   observations="true" groundTruth="true"/>
    </Node>
    <Node name="ref_f+50_mu-50">
        <MechanicalObject template="Vec3" name="MO"   position="0 0 0     0.01 0 0      0.02 0 0      0.03 0 0     0.04 0 0  0.05 0 0     0.06 0 0      0.07 0 0      0.08 0 0     0.09 0 0 " />
        <BoxROI name="boxA" box="-0.1-0.05 -0.1 0.1 0.1 0.1 " drawBoxes="1" drawSize="1"/>
        <ReadState filename="/home/raffa/work/data/journalValid/modelSens/sens/ref_f+50_mu-50" />
        <ShowSpheres  radius="0.000001"  color="0 1 0 1" position="@MO.position" />
        <StochasticPositionHandler filename="/home/raffa/work/data/journalValid/modelSens/matlabGT/gt_ref_f+50_mu-50"   observations="true" groundTruth="true"/>
    </Node>
    <Node name="ref_f+50_mu-20">
        <MechanicalObject template="Vec3" name="MO"   position="0 0 0     0.01 0 0      0.02 0 0      0.03 0 0     0.04 0 0  0.05 0 0     0.06 0 0      0.07 0 0      0.08 0 0     0.09 0 0 " />
        <BoxROI name="boxA" box="-0.1-0.05 -0.1 0.1 0.1 0.1 " drawBoxes="1" drawSize="1"/>
        <ReadState filename="/home/raffa/work/data/journalValid/modelSens/sens/ref_f+50_mu-20" />
        <ShowSpheres  radius="0.000001"  color="0.5 0 0 1" position="@MO.position" />
        <StochasticPositionHandler filename="/home/raffa/work/data/journalValid/modelSens/matlabGT/gt_ref_f+50_mu-20"   observations="true" groundTruth="true"/>
    </Node>
    <Node name="ref_f+50_mu-10">
        <MechanicalObject template="Vec3" name="MO"   position="0 0 0     0.01 0 0      0.02 0 0      0.03 0 0     0.04 0 0  0.05 0 0     0.06 0 0      0.07 0 0      0.08 0 0     0.09 0 0 " />
        <BoxROI name="boxA" box="-0.1-0.05 -0.1 0.1 0.1 0.1 " drawBoxes="1" drawSize="1"/>
        <ReadState filename="/home/raffa/work/data/journalValid/modelSens/sens/ref_f+50_mu-10" />
        <ShowSpheres  radius="0.000001"  color="0 0 1 1" position="@MO.position" />
        <StochasticPositionHandler filename="/home/raffa/work/data/journalValid/modelSens/matlabGT/gt_ref_f+50_mu-10"   observations="true" groundTruth="true"/>
    </Node>
    <Node name="gt_ref_f+50_mu">
        <MechanicalObject template="Vec3" name="MO"   position="0 0 0     0.01 0 0      0.02 0 0      0.03 0 0     0.04 0 0  0.05 0 0     0.06 0 0      0.07 0 0      0.08 0 0     0.09 0 0 " />
        <BoxROI name="boxA" box="-0.1-0.05 -0.1 0.1 0.1 0.1 " drawBoxes="1" drawSize="1"/>
        <ReadState filename="/home/raffa/work/data/journalValid/modelSens/sens/ref_f+50_mu" />
        <ShowSpheres  radius="0.000001"  color="0.5 1 0 1" position="@MO.position" />
        <StochasticPositionHandler filename="/home/raffa/work/data/journalValid/modelSens/matlabGT/gt_ref_f+50_mu"   observations="true" groundTruth="true"/>
    </Node>
    <Node name="ref_f+50_mu+10">
        <MechanicalObject template="Vec3" name="MO"   position="0 0 0     0.01 0 0      0.02 0 0      0.03 0 0     0.04 0 0  0.05 0 0     0.06 0 0      0.07 0 0      0.08 0 0     0.09 0 0 " />
        <BoxROI name="boxA" box="-0.1-0.05 -0.1 0.1 0.1 0.1 " drawBoxes="1" drawSize="1"/>
        <ReadState filename="/home/raffa/work/data/journalValid/modelSens/sens/ref_f+50_mu+10" />
        <ShowSpheres  radius="0.000001"  color="0.5 0 1 1" position="@MO.position" />
        <StochasticPositionHandler filename="/home/raffa/work/data/journalValid/modelSens/matlabGT/gt_ref_f+50_mu+10"   observations="true" groundTruth="true"/>
    </Node>
    <Node name="ref_f+50_mu+20">
        <MechanicalObject template="Vec3" name="MO"   position="0 0 0     0.01 0 0      0.02 0 0      0.03 0 0     0.04 0 0  0.05 0 0     0.06 0 0      0.07 0 0      0.08 0 0     0.09 0 0 " />
        <BoxROI name="boxA" box="-0.1-0.05 -0.1 0.1 0.1 0.1 " drawBoxes="1" drawSize="1"/>
        <ReadState filename="/home/raffa/work/data/journalValid/modelSens/sens/ref_f+50_mu+20" />
        <ShowSpheres  radius="0.000001"  color="1 0.5 0 1" position="@MO.position" />
        <StochasticPositionHandler filename="/home/raffa/work/data/journalValid/modelSens/matlabGT/gt_ref_f+50_mu+20"   observations="true" groundTruth="true"/>
    </Node>
    <Node name="ref_f+50_mu+50">
        <MechanicalObject template="Vec3" name="MO"   position="0 0 0     0.01 0 0      0.02 0 0      0.03 0 0     0.04 0 0  0.05 0 0     0.06 0 0      0.07 0 0      0.08 0 0     0.09 0 0 " />
        <BoxROI name="boxA" box="-0.1-0.05 -0.1 0.1 0.1 0.1 " drawBoxes="1" drawSize="1"/>
        <ReadState filename="/home/raffa/work/data/journalValid/modelSens/sens/ref_f+50_mu+50" />
        <ShowSpheres  radius="0.000001"  color="1 0.5 0 1" position="@MO.position" />
        <StochasticPositionHandler filename="/home/raffa/work/data/journalValid/modelSens/matlabGT/gt_ref_f+50_mu+50"   observations="true" groundTruth="true"/>
    </Node>
    <Node name="ref_f+50_mu+100">
        <MechanicalObject template="Vec3" name="MO"   position="0 0 0     0.01 0 0      0.02 0 0      0.03 0 0     0.04 0 0  0.05 0 0     0.06 0 0      0.07 0 0      0.08 0 0     0.09 0 0 " />
        <BoxROI name="boxA" box="-0.1-0.05 -0.1 0.1 0.1 0.1 " drawBoxes="1" drawSize="1"/>
        <ReadState filename="/home/raffa/work/data/journalValid/modelSens/sens/ref_f+50_mu+100" />
        <ShowSpheres  radius="0.000001"  color="1 0.5 0 1" position="@MO.position" />
        <StochasticPositionHandler filename="/home/raffa/work/data/journalValid/modelSens/matlabGT/gt_ref_f+50_mu+100"   observations="true" groundTruth="true"/>
    </Node>

     <Node name="ref_f+100_mu-100">
        <MechanicalObject template="Vec3" name="MO"   position="0 0 0     0.01 0 0      0.02 0 0      0.03 0 0     0.04 0 0  0.05 0 0     0.06 0 0      0.07 0 0      0.08 0 0     0.09 0 0 " />
        <BoxROI name="boxA" box="-0.1-0.05 -0.1 0.1 0.1 0.1 " drawBoxes="1" drawSize="1"/>
        <ReadState filename="/home/raffa/work/data/journalValid/modelSens/sens/ref_f+100_mu-100" />
        <ShowSpheres  radius="0.000001"  color="1 0 0 1" position="@MO.position" />
        <StochasticPositionHandler filename="/home/raffa/work/data/journalValid/modelSens/matlabGT/gt_ref_f+100_mu-100"   observations="true" groundTruth="true"/>
    </Node>
    <Node name="ref_f+100_mu-50">
        <MechanicalObject template="Vec3" name="MO"   position="0 0 0     0.01 0 0      0.02 0 0      0.03 0 0     0.04 0 0  0.05 0 0     0.06 0 0      0.07 0 0      0.08 0 0     0.09 0 0 " />
        <BoxROI name="boxA" box="-0.1-0.05 -0.1 0.1 0.1 0.1 " drawBoxes="1" drawSize="1"/>
        <ReadState filename="/home/raffa/work/data/journalValid/modelSens/sens/ref_f+100_mu-50" />
        <ShowSpheres  radius="0.000001"  color="0 1 0 1" position="@MO.position" />
        <StochasticPositionHandler filename="/home/raffa/work/data/journalValid/modelSens/matlabGT/gt_ref_f+100_mu-50"   observations="true" groundTruth="true"/>
    </Node>
    <Node name="ref_f+100_mu-20">
        <MechanicalObject template="Vec3" name="MO"   position="0 0 0     0.01 0 0      0.02 0 0      0.03 0 0     0.04 0 0  0.05 0 0     0.06 0 0      0.07 0 0      0.08 0 0     0.09 0 0 " />
        <BoxROI name="boxA" box="-0.1-0.05 -0.1 0.1 0.1 0.1 " drawBoxes="1" drawSize="1"/>
        <ReadState filename="/home/raffa/work/data/journalValid/modelSens/sens/ref_f+100_mu-20" />
        <ShowSpheres  radius="0.000001"  color="0.5 0 0 1" position="@MO.position" />
        <StochasticPositionHandler filename="/home/raffa/work/data/journalValid/modelSens/matlabGT/gt_ref_f+100_mu-20"   observations="true" groundTruth="true"/>
    </Node>
    <Node name="ref_f+100_mu-10">
        <MechanicalObject template="Vec3" name="MO"   position="0 0 0     0.01 0 0      0.02 0 0      0.03 0 0     0.04 0 0  0.05 0 0     0.06 0 0      0.07 0 0      0.08 0 0     0.09 0 0 " />
        <BoxROI name="boxA" box="-0.1-0.05 -0.1 0.1 0.1 0.1 " drawBoxes="1" drawSize="1"/>
        <ReadState filename="/home/raffa/work/data/journalValid/modelSens/sens/ref_f+100_mu-10" />
        <ShowSpheres  radius="0.000001"  color="0 0 1 1" position="@MO.position" />
        <StochasticPositionHandler filename="/home/raffa/work/data/journalValid/modelSens/matlabGT/gt_ref_f+100_mu-10"   observations="true" groundTruth="true"/>
    </Node>
    <Node name="gt_ref_f+100_mu">
        <MechanicalObject template="Vec3" name="MO"   position="0 0 0     0.01 0 0      0.02 0 0      0.03 0 0     0.04 0 0  0.05 0 0     0.06 0 0      0.07 0 0      0.08 0 0     0.09 0 0 " />
        <BoxROI name="boxA" box="-0.1-0.05 -0.1 0.1 0.1 0.1 " drawBoxes="1" drawSize="1"/>
        <ReadState filename="/home/raffa/work/data/journalValid/modelSens/sens/ref_f+100_mu" />
        <ShowSpheres  radius="0.000001"  color="0.5 1 0 1" position="@MO.position" />
        <StochasticPositionHandler filename="/home/raffa/work/data/journalValid/modelSens/matlabGT/gt_ref_f+100_mu"   observations="true" groundTruth="true"/>
    </Node>
    <Node name="ref_f+100_mu+10">
        <MechanicalObject template="Vec3" name="MO"   position="0 0 0     0.01 0 0      0.02 0 0      0.03 0 0     0.04 0 0  0.05 0 0     0.06 0 0      0.07 0 0      0.08 0 0     0.09 0 0 " />
        <BoxROI name="boxA" box="-0.1-0.05 -0.1 0.1 0.1 0.1 " drawBoxes="1" drawSize="1"/>
        <ReadState filename="/home/raffa/work/data/journalValid/modelSens/sens/ref_f+100_mu+10" />
        <ShowSpheres  radius="0.000001"  color="0.5 0 1 1" position="@MO.position" />
        <StochasticPositionHandler filename="/home/raffa/work/data/journalValid/modelSens/matlabGT/gt_ref_f+100_mu+10"   observations="true" groundTruth="true"/>
    </Node>
    <Node name="ref_f+100_mu+20">
        <MechanicalObject template="Vec3" name="MO"   position="0 0 0     0.01 0 0      0.02 0 0      0.03 0 0     0.04 0 0  0.05 0 0     0.06 0 0      0.07 0 0      0.08 0 0     0.09 0 0 " />
        <BoxROI name="boxA" box="-0.1-0.05 -0.1 0.1 0.1 0.1 " drawBoxes="1" drawSize="1"/>
        <ReadState filename="/home/raffa/work/data/journalValid/modelSens/sens/ref_f+100_mu+20" />
        <ShowSpheres  radius="0.000001"  color="1 0.5 0 1" position="@MO.position" />
        <StochasticPositionHandler filename="/home/raffa/work/data/journalValid/modelSens/matlabGT/gt_ref_f+100_mu+20"   observations="true" groundTruth="true"/>
    </Node>
    <Node name="ref_f+100_mu+50">
        <MechanicalObject template="Vec3" name="MO"   position="0 0 0     0.01 0 0      0.02 0 0      0.03 0 0     0.04 0 0  0.05 0 0     0.06 0 0      0.07 0 0      0.08 0 0     0.09 0 0 " />
        <BoxROI name="boxA" box="-0.1-0.05 -0.1 0.1 0.1 0.1 " drawBoxes="1" drawSize="1"/>
        <ReadState filename="/home/raffa/work/data/journalValid/modelSens/sens/ref_f+100_mu+50" />
        <ShowSpheres  radius="0.000001"  color="1 0.5 0 1" position="@MO.position" />
        <StochasticPositionHandler filename="/home/raffa/work/data/journalValid/modelSens/matlabGT/gt_ref_f+100_mu+50"   observations="true" groundTruth="true"/>
    </Node>
    <Node name="ref_f+100_mu+100">
        <MechanicalObject template="Vec3" name="MO"   position="0 0 0     0.01 0 0      0.02 0 0      0.03 0 0     0.04 0 0  0.05 0 0     0.06 0 0      0.07 0 0      0.08 0 0     0.09 0 0 " />
        <BoxROI name="boxA" box="-0.1-0.05 -0.1 0.1 0.1 0.1 " drawBoxes="1" drawSize="1"/>
        <ReadState filename="/home/raffa/work/data/journalValid/modelSens/sens/ref_f+100_mu+100" />
        <ShowSpheres  radius="0.000001"  color="1 0.5 0 1" position="@MO.position" />
        <StochasticPositionHandler filename="/home/raffa/work/data/journalValid/modelSens/matlabGT/gt_ref_f+100_mu+100"   observations="true" groundTruth="true"/>
    </Node>

</Node>
