import Sofa
import math
import os
import sys
import csv
import yaml
sys.path.append(os.getcwd() + '/../../python_src/utils')
from FileSystemUtils import FolderHandler

__file = __file__.replace('\\', '/') # windows

def createScene(rootNode):
    rootNode.createObject('RequiredPlugin', pluginName='Optimus')
    rootNode.createObject('RequiredPlugin', pluginName='SofaPardisoSolver')
    rootNode.createObject('RequiredPlugin', pluginName='ImageMeshAux')
    #rootNode.createObject('RequiredPlugin', pluginName='SofaMJEDFEM')

    try :
        sys.argv[0]
    except :
        commandLineArguments = []
    else :
        commandLineArguments = sys.argv

    if len(commandLineArguments) > 1:
        configFileName = commandLineArguments[1]
    else:
        print 'ERROR: Must supply a yaml config file as an argument!'
        return
    print "Command line arguments for python : " + str(commandLineArguments)

    with open(configFileName, 'r') as stream:
        try:
            options = yaml.load(stream)

        except yaml.YAMLError as exc:
            print(exc)
            return

    cylConstForce_SDA(rootNode, options, configFileName)
    return 0


# Class definition
class cylConstForce_SDA(Sofa.PythonScriptController):

    def __init__(self, rootNode, options, configFileName):
        self.options = options
    	self.cameraReactivated = False
        self.generalFolderName = self.options['filtering_parameters']['common_directory_prefix'] + self.options['general_parameters']['solver_kind']
        if not os.path.isdir(self.generalFolderName):
            os.mkdir(self.generalFolderName)

        observationInfix = self.options['system_parameters']['observation_points_file_name']
        observationInfix = observationInfix[observationInfix.rfind('/') + 1 : observationInfix.rfind('.')]
        self.folderName = options['filtering_parameters']['filter_kind'] + "_" + observationInfix + options['filtering_parameters']['output_directory_suffix']
        self.fullFolderName = self.generalFolderName + '/' + self.folderName
        folderCreator = FolderHandler()
        folderCreator.createFolder(self.generalFolderName, self.folderName, archiveResults=1)

        # create file with parameters and additional information
        self.options['visual_parameters'] = {}
        self.stateFileName = 'state_' + self.options['filtering_parameters']['output_files_suffix'] + '.txt'
        self.options['visual_parameters']['state_file_name'] = self.stateFileName
        self.varianceFileName = 'variance_' + self.options['filtering_parameters']['output_files_suffix'] + '.txt'
        self.options['visual_parameters']['variance_file_name'] = self.varianceFileName
        self.covarianceFileName = 'covariance_' + self.options['filtering_parameters']['output_files_suffix'] + '.txt'
        self.options['visual_parameters']['covariance_file_name'] = self.covarianceFileName
        self.innovationFileName = 'innovation_' + self.options['filtering_parameters']['output_files_suffix'] + '.txt'
        self.options['visual_parameters']['innovation_file_name'] = self.innovationFileName

        self.informationFileName = self.fullFolderName + '/daconfig.yml'

        with open(self.informationFileName, 'w') as stream:
            try:
                yaml.dump(self.options, stream, default_flow_style=None)

            except yaml.YAMLError as exc:
                print(exc)
                return

        self.createGraph(rootNode)
        if self.options['time_parameters']['time_profiling']:
            self.createTimeProfiler()
        return None


    def createGraph(self, rootNode):
        self.rootNode=rootNode
        self.period = self.options['impact_parameters']['force_period']
        self.amplitude = self.options['impact_parameters']['force_amplitude']
        self.iterations = 0
        print "Create graph called (Python side)\n"

        if self.options['filtering_parameters']['filter_kind'] == 'ROUKF':
            self.estimPosition='1'
            self.estimVelocity='0'

        if self.options['filtering_parameters']['filter_kind'] == 'UKFSimCorr':
            self.estimPosition='0'
            self.estimVelocity='0'

        if self.options['filtering_parameters']['filter_kind'] == 'UKFClassic':
            self.estimPosition='1'
            self.estimVelocity='0'

        if self.options['additional_parameters']['compute_bound_box']:
            self.globalMin = [10e8, 10e8, 10e8]
            self.globalMax = [-10e8, -10e8, -10e8]

        self.createScene(rootNode)

        return 0


    def createGlobalComponents(self, rootNode):
        # scene global stuff
        rootNode.findData('gravity').value = self.options['general_parameters']['gravity']
        rootNode.findData('dt').value = self.options['general_parameters']['delta_time']

        rootNode.createObject('ViewerSetting', cameraMode='Perspective', resolution='1000 700', objectPickingMethod='Ray casting')
        rootNode.createObject('VisualStyle', name='VisualStyle', displayFlags='showBehaviorModels showForceFields showCollisionModels')

        rootNode.createObject('FilteringAnimationLoop', name="StochAnimLoop", verbose="1")
        #rootNode.createObject('FilteringAnimationLoop', name="StochAnimLoop", verbose="1", computationTimeFile=self.fullFolderName + '/' + self.options['time_parameters']['computation_time_file_name'])

        if (self.options['filtering_parameters']['filter_kind'] == 'ROUKF'):
            self.filter = rootNode.createObject('ROUKFilter', name="ROUKF", verbose="1", useUnbiasedVariance=self.options['filtering_parameters']['use_unbiased_variance'], sigmaTopology=self.options['filtering_parameters']['sigma_points_topology'], lambdaScale=self.options['filtering_parameters']['sigma_points_scale'])
        elif (self.options['filtering_parameters']['filter_kind'] == 'UKFSimCorr'):
            self.filter = rootNode.createObject('UKFilterSimCorr', name="UKF", verbose="1", useUnbiasedVariance=self.options['filtering_parameters']['use_unbiased_variance'], sigmaTopology=self.options['filtering_parameters']['sigma_points_topology'], lambdaScale=self.options['filtering_parameters']['sigma_points_scale'])
        elif (self.options['filtering_parameters']['filter_kind'] == 'UKFClassic'):
            self.filter = rootNode.createObject('UKFilterClassic', name="UKFClas", verbose="1", exportPrefix=self.fullFolderName, useUnbiasedVariance=self.options['filtering_parameters']['use_unbiased_variance'], sigmaTopology=self.options['filtering_parameters']['sigma_points_topology'], lambdaScale=self.options['filtering_parameters']['sigma_points_scale'])
        else:
            print 'Unknown filter type!'

        rootNode.createObject('MeshVTKLoader', name='loader', filename=self.options['system_parameters']['volume_file_name'])
        #rootNode.createObject('MeshSTLLoader', name='objectSLoader', filename=self.surfaceSTL)

        return 0


    #components common for both master and slave: the simulation itself (without observations and visualizations)
    def createCommonComponents(self, node):
        #node.createObject('StaticSolver', applyIncrementFactor="0")
        if self.options['general_parameters']['solver_kind'] == 'Euler':
            node.createObject('EulerImplicitSolver', rayleighStiffness=self.options['general_parameters']['rayleigh_stiffness'], rayleighMass=self.options['general_parameters']['rayleigh_mass'])
        elif self.options['general_parameters']['solver_kind'] == 'Symplectic':
            node.createObject('VariationalSymplecticSolver', rayleighStiffness=self.options['general_parameters']['rayleigh_stiffness'], rayleighMass=self.options['general_parameters']['rayleigh_mass'], newtonError='1e-12', steps='1', verbose='0')
        elif self.options['general_parameters']['solver_kind'] == 'Newton':
            node.createObject('NewtonStaticSolver', name="NewtonStatic", printLog="0", correctionTolerance="1e-8", residualTolerance="1e-8", convergeOnResidual="1", maxIt="2")
        else:
            print 'Unknown solver type!'
        if self.options['precondition_parameters']['usePCG']:
            node.createObject('StepPCGLinearSolver', name='lsolverit', precondOnTimeStep='1', use_precond='1', tolerance='1e-10', iterations='500',
                verbose='1', listening='1', update_step=self.options['precondition_parameters']['PCGUpdateSteps'], preconditioners='precond')
        # node.createObject('StepPCGLinearSolver', name="StepPCG", iterations="10000", tolerance="1e-12", preconditioners="precond", verbose="1", precondOnTimeStep="1")
        node.createObject('SparsePARDISOSolver', name="precond", symmetric="1", exportDataToFolder="", iterativeSolverNumbering="0")

        self.model = node.createObject('MechanicalObject', src="@/loader", name="Volume")
        node.createObject('TetrahedronSetTopologyContainer', name="Container", src="@/loader", tags=" ")
        node.createObject('TetrahedronSetTopologyModifier', name="Modifier")
        node.createObject('TetrahedronSetTopologyAlgorithms', name="TopoAlgo")
        node.createObject('TetrahedronSetGeometryAlgorithms', name="GeomAlgo")
        if 'total_mass' in self.options['general_parameters'].keys():
            node.createObject('UniformMass', totalMass=self.options['general_parameters']['total_mass'])
        if 'density' in self.options['general_parameters'].keys():
            node.createObject('MeshMatrixMass', printMass='0', lumping='1', massDensity=self.options['general_parameters']['density'], name='mass')

        if 'boundary_conditions_list' in self.options['general_parameters'].keys():
            for index in range(0, len(self.options['general_parameters']['boundary_conditions_list'])):
                bcElement = self.options['general_parameters']['boundary_conditions_list'][index]
                print bcElement
                node.createObject('BoxROI', box=bcElement['boxes_coordinates'], name='boundBoxes'+str(index), drawBoxes='0', doUpdate='0')
                if bcElement['condition_type'] == 'fixed':
                    node.createObject('FixedConstraint', indices='@boundBoxes'+str(index)+'.indices')
                elif bcElement['condition_type'] == 'elastic':
                    node.createObject('RestShapeSpringsForceField', stiffness=bcElement['spring_stiffness_values'], angularStiffness="1", points='@boundBoxes'+str(index)+'.indices')
                else:
                    print 'Unknown type of boundary conditions'

        node.createObject('OptimParams', name="paramE", optimize="1", numParams=self.options['filtering_parameters']['optim_params_size'], template="Vector", initValue=self.options['filtering_parameters']['initial_stiffness'], minValue=self.options['filtering_parameters']['minimal_stiffness'], maxValue=self.options['filtering_parameters']['maximal_stiffness'], stdev=self.options['filtering_parameters']['initial_standart_deviation'], transformParams=self.options['filtering_parameters']['transform_parameters'])
        node.createObject('Indices2ValuesMapper', name='youngMapper', indices='1 2 3 4 5 6 7 8 9 10', values='@paramE.value', inputValues='@/loader.dataset')
        node.createObject('TetrahedronFEMForceField', name='FEM', updateStiffness='1', listening='true', drawHeterogeneousTetra='1', method='large', poissonRatio='0.45', youngModulus='@youngMapper.outputValues')

        # rootNode/simuNode/oglNode
        oglNode = node.createChild('oglNode')
        self.oglNode = oglNode
        oglNode.createObject('OglModel', color='0 0 0 0')
        # node.createObject('TetrahedronFEMForceField', name="FEM", listening="true", updateStiffness="1", youngModulus="1e5", poissonRatio="0.45", method="large")

        # add constant force field
        self.forceIndex = 1
        node.createObject('BoxROI', name='forceBounds', box=self.options['impact_parameters']['external_force_bound'], doUpdate='0')
        self.constantForce = node.createObject('ConstantForceField', name='appliedForce', indices='@forceBounds.indices', totalForce='0.0 0.0 0.0')
        node.createObject('BoxROI', name='oppForceBounds', box=self.options['impact_parameters']['reverse_force_bound'], doUpdate='0')
        self.oppositeConstantForce = node.createObject('ConstantForceField', name='oppAppliedForce', indices='@oppForceBounds.indices', totalForce='0.0 0.0 0.0')

        return 0


    def createMasterScene(self, node):
        node.createObject('StochasticStateWrapper',name="StateWrapper",verbose="1", estimatePosition=self.estimPosition, positionStdev=self.options['filtering_parameters']['positions_standart_deviation'], estimateVelocity=self.estimVelocity)

        self.createCommonComponents(node)

        obsNode = node.createChild('obsNode')
        obsNode.createObject('MeshVTKLoader', name='obsLoader', filename=self.options['system_parameters']['observation_points_file_name'])
        obsNode.createObject('MechanicalObject', name='SourceMO', src="@obsLoader")
        obsNode.createObject('BarycentricMapping')
        obsNode.createObject('MappedStateObservationManager', name="MOBS", observationStdev = self.options['filtering_parameters']['observation_noise_standart_deviation'], noiseStdev="0.0", listening="1", stateWrapper="@../StateWrapper", verbose="1")
        obsNode.createObject('SimulatedStateObservationSource', name="ObsSource", monitorPrefix = self.generalFolderName + '/' + self.options['system_parameters']['observation_file_name'])
        obsNode.createObject('ShowSpheres', radius="0.002", color="1 0 0 1", position='@SourceMO.position')
        obsNode.createObject('ShowSpheres', radius="0.0015", color="1 1 0 1", position='@MOBS.mappedObservations')

        return 0


    def createScene(self,node):
        # r_slaves = [] # list of created auxiliary nodes
        self.createGlobalComponents(node)

        masterNode=node.createChild('MasterScene')
        self.createMasterScene(masterNode)

        return 0


    def createTimeProfiler(self):
        print 'Time statistics file: ' + self.fullFolderName + '/' + self.options['time_parameters']['computation_time_file_name']
        Sofa.timerSetInterval(self.options['time_parameters']['timer_name'], self.options['time_parameters']['iterations_interval'])    # Set the number of steps neded to compute the timer
        Sofa.timerSetOutputType(self.options['time_parameters']['timer_name'], 'json')    # Set output file format
        with open(self.fullFolderName + '/' + self.options['time_parameters']['computation_time_file_name'], "a") as outputFile:
            outputFile.write('{')
            outputFile.close()

        return 0


    def initGraph(self,node):
        print 'Init graph called (python side)'
        self.step = 0
        self.total_time = 0

        # self.process.initializationObjects(node)
        return 0


    def onBeginAnimationStep(self, deltaTime):
        self.step += 1
        if self.options['time_parameters']['time_profiling']:
            Sofa.timerSetEnabled(self.options['time_parameters']['timer_name'], True)
            Sofa.timerBegin(self.options['time_parameters']['timer_name'])

        return 0


    def onEndAnimationStep(self, deltaTime):
        self.iterations = self.iterations + 1
        self.exportStochasticState()
        self.saveTimeStatistics()
        self.saveBoundBox()
        return 0


    def saveTimeStatistics(self):
        if self.options['time_parameters']['time_profiling']:
            if self.iterations <= self.options['time_parameters']['iteration_amount']:
                result = Sofa.timerEnd(self.options['time_parameters']['timer_name'], self.rootNode)
                if result != None :
                    with open(self.fullFolderName + '/' + self.options['time_parameters']['computation_time_file_name'], "a") as outputFile:
                        outputFile.write(result + ",")
                        outputFile.close()
            # replace last symbol
            if self.iterations == self.options['time_parameters']['iteration_amount']:
                with open(self.fullFolderName + '/' + self.options['time_parameters']['computation_time_file_name'], "a") as outputFile:
                    outputFile.seek(-1, os.SEEK_END)
                    outputFile.truncate()
                    outputFile.write("\n}")
                    outputFile.close()

        return 0


    def saveBoundBox(self):
        if self.options['additional_parameters']['compute_bound_box']:
            ### compute local bound box
            localMin = [10e8, 10e8, 10e8]
            localMax = [-10e8, -10e8, -10e8]
            positions = self.model.findData('position').value
            for index in range(0, len(positions)):
                localMin[0] = min(localMin[0], positions[index][0])
                localMin[1] = min(localMin[1], positions[index][1])
                localMin[2] = min(localMin[2], positions[index][2])
                localMax[0] = max(localMax[0], positions[index][0])
                localMax[1] = max(localMax[1], positions[index][1])
                localMax[2] = max(localMax[2], positions[index][2])
            ### save data
            if self.iterations <= self.options['time_parameters']['iteration_amount']:
                with open(self.fullFolderName + '/' + self.options['additional_parameters']['bound_box_file'], "a") as outputFile:
                    outputFile.write("Min: " + ','.join(str(e) for e in localMin) + "; Max: " + ','.join(str(e) for e in localMax) + "\n")
                    outputFile.close()
                self.globalMin[0] = min(self.globalMin[0], localMin[0])
                self.globalMin[1] = min(self.globalMin[1], localMin[1])
                self.globalMin[2] = min(self.globalMin[2], localMin[2])
                self.globalMax[0] = max(self.globalMax[0], localMax[0])
                self.globalMax[1] = max(self.globalMax[1], localMax[1])
                self.globalMax[2] = max(self.globalMax[2], localMax[2])
            # replace last symbol
            if self.iterations == self.options['time_parameters']['iteration_amount']:
                with open(self.fullFolderName + '/' + self.options['additional_parameters']['bound_box_file'], "a") as outputFile:
                    outputFile.write("Global min: " + ','.join(str(e) for e in self.globalMin) + "; Global max: " + ','.join(str(e) for e in self.globalMax) + "\n")
                    outputFile.close()

        return 0


    def exportStochasticState(self):
        # if self.iterations == 0:
        #     self.constantForce.findData('isCompliance').value = 1 - self.constantForce.findData('isCompliance').value
        #     self.oppositeConstantForce.findData('isCompliance').value = 1 - self.oppositeConstantForce.findData('isCompliance').value
        #     self.iterations = 80

        if self.iterations % self.period == 0:
            self.forceIndex = (self.forceIndex + 1) % 2

        if self.forceIndex == 0:
            self.constantForce.findData('totalForce').value = [0.0, self.amplitude * math.sin(math.pi * self.iterations / self.period), 0.0]
            self.oppositeConstantForce.findData('totalForce').value = [0.0, 0.0, 0.0]
        elif self.forceIndex == 1:
            self.constantForce.findData('totalForce').value = [0.0, 0.0, 0.0]
            self.oppositeConstantForce.findData('totalForce').value = [0.0, self.amplitude * math.sin(math.pi * self.iterations / self.period), 0.0]


        if self.options['filtering_parameters']['save_state']:
            if (self.options['filtering_parameters']['filter_kind'] == 'ROUKF'):
                st=self.filter.findData('reducedState').value
            elif (self.options['filtering_parameters']['filter_kind'] == 'UKFSimCorr' or self.options['filtering_parameters']['filter_kind'] == 'UKFClassic'):
                st=self.filter.findData('state').value

            state = [val for sublist in st for val in sublist]
            #print 'Reduced state:'
            #print reducedState

            self.stateExpValFile = self.fullFolderName + '/' + self.stateFileName
            #print 'Storing to', self.stateExpValFile
            f1 = open(self.stateExpValFile, "a")
            f1.write(" ".join(map(lambda x: str(x), state)))
            f1.write('\n')
            f1.close()

            if (self.options['filtering_parameters']['filter_kind'] == 'ROUKF'):
                var=self.filter.findData('reducedVariance').value
            elif (self.options['filtering_parameters']['filter_kind'] == 'UKFSimCorr' or self.options['filtering_parameters']['filter_kind'] == 'UKFClassic'):
                var=self.filter.findData('variance').value

            variance = [val for sublist in var for val in sublist]
            #print 'Reduced variance:'
            #print reducedVariance

            self.stateVarFile = self.fullFolderName + '/' + self.varianceFileName
            f2 = open(self.stateVarFile, "a")
            f2.write(" ".join(map(lambda x: str(x), variance)))
            f2.write('\n')
            f2.close()

            if (self.options['filtering_parameters']['filter_kind'] == 'ROUKF'):
                covar=self.filter.findData('reducedCovariance').value
            elif (self.options['filtering_parameters']['filter_kind'] == 'UKFSimCorr' or self.options['filtering_parameters']['filter_kind'] == 'UKFClassic'):
                covar=self.filter.findData('covariance').value

            covariance = [val for sublist in covar for val in sublist]
            #print 'Reduced Covariance:'
            #print reducedCovariance

            self.stateCovarFile = self.fullFolderName + '/' + self.covarianceFileName
            f3 = open(self.stateCovarFile, "a")
            f3.write(" ".join(map(lambda x: str(x), covariance)))
            f3.write('\n')
            f3.close()

        if self.options['filtering_parameters']['save_internal_data']:
            if (self.options['filtering_parameters']['filter_kind'] == 'ROUKF'):
                innov=self.filter.findData('reducedInnovation').value
            elif (self.options['filtering_parameters']['filter_kind'] == 'UKFSimCorr' or self.options['filtering_parameters']['filter_kind'] == 'UKFClassic'):
                innov=self.filter.findData('innovation').value

            innovation = [val for sublist in innov for val in sublist]
            #print 'Reduced state:'
            #print reducedState

            self.innovationFile = self.fullFolderName + '/' + self.innovationFileName
            f4 = open(self.innovationFile, "a")
            f4.write(" ".join(map(lambda x: str(x), innovation)))
            f4.write('\n')
            f4.close()

        # print self.basePoints.findData('indices_position').value

        return 0


    def onScriptEvent(self, senderNode, eventName,data):
        return 0
