<?xml version="1.0" ?>
<Node animate="0" dt="0.001" gravity="0 0 0" name="Root">
	<RequiredPlugin name="SofaPython" pluginName="SofaPython" />
	<PythonScriptController classname="pythonDA" filename="pythonDA.py" listening="1" name="pythonDA" />
</Node>
