<?xml version="1.0" ?>
<Node animate="0" dt="0.01" gravity="0 0 0" name="Root">
	<RequiredPlugin name="SofaPython" pluginName="SofaPython" />
        <RequiredPlugin name="BoundaryConditions" pluginName="BoundaryConditionsPlugin" />
	<PythonScriptController classname="liverScene_BCDA" filename="liverScene_BCDA.py" listening="1" name="pythonDA" />
</Node>
