<?xml version="1.0" ?>
<Node name="root" dt="0.01" showBoundingTree="0" gravity="0 -9.81 0">
	<RequiredPlugin pluginName="Optimus"/>
	<RequiredPlugin pluginName="SofaPardisoWrapper"/>
	<RequiredPlugin pluginName="BilikimoAux"/>
<!-- 	<VisualStyle displayFlags="showBehaviorModels showForceFields showCollisionModels" /> -->

<!-- 	<VerdandiAnimationLoop name="verdAnimLoop"  verbose="0"/> -->
<!-- 	<SofaReducedOrderUKFParallel name="sofaROUKF" sigmaPointType="simplex" paramFileName="daHeteroCylinderConstant/pHardSmoothIm3_estim.out" paramVarFileName="daHeteroCylinderConstant/pHardSmoothIm3_var.out"/> -->

<!-- 	<OptimParams name="paramE" template="Vector" initValue="6000 6000 6000" stdev="2000 2000 2000" transformParams="1"/> -->
<!-- 	<OptimParams name="paramE" template="Vector" initValue="10000 5000 7000"/>  -->

<!--         <EulerImplicit name="odeSolver" printLog="false"/> -->
<!-- 	<StaticSolver applyIncrementFactor="1"/> -->
<!-- 	<EulerImplicit name="odeSolver" printLog="false" rayleighStiffness="0.1"/> -->

<!-- 	<SparsePARDISOSolver/>	 -->

<!-- 	<MeshVTKLoader filename="cylinder363.vtk" name="loader" /> -->
<!-- 	<MeshVTKLoader filename="data/cylinder3_770.vtk" name="loader" /> -->
<!-- 	<MechanicalObject src="@loader" name="Volume" /> -->

<!-- 	<include href="Objects/TetrahedronSetTopology.xml" src="@loader" /> -->
<!-- 	<UniformMass totalMass="0.2513" /> -->
<!-- 	<UniformMass totalMass="0.2513"/> -->

<!-- 	<BoxROI name="fixedBox1" box="-0.05 -0.05 -0.002   0.05 0.05 0.002"/> -->
<!-- 	<BoxROI name="fixedBox2" box="-0.05 -0.05  0.238   0.05 0.05 0.242"/> -->

<!-- 	<MergeSets name="mergeIndices" in1="@fixedBox1.indices" in2="@fixedBox2.indices"/> -->

<!-- 	<FixedConstraint indices="@mergeIndices.out" /> -->

<!-- 	<BoxROI name="fixedBox2" box="-0.05 -0.05 0.176   0.05 0.05 0.180"/> -->
<!-- 	<FixedConstraint indices="@fixedBox2.indices" /> -->
<!-- 	<Indices2ValuesMapper name="youngMapper" inputValues="@loader.dataset" indices="1 2 3" values="@paramE.value"/> -->
<!-- 	<TetrahedronFEMForceField name="FEM" listening="true" updateStiffness="1"  youngModulus="@youngMapper.outputValues" poissonRatio="0.45" method="large"  computeVonMisesStress="0" drawHeterogeneousTetra="1"/> -->
<!-- 	<TetrahedronFEMForceField name="FEM" listening="true" updateStiffness="1"  youngModulus="@paramE.value" poissonRatio="0.45" method="large"  computeVonMisesStress="0" drawHeterogeneousTetra="1"/> -->

<!-- 	<Node name="obsNode" activated="1"> -->
<!-- 		<MechanicalObject position="@../Volume.position"/> -->
<!-- 		<MechanicalObject position="0.0 0.0 0.02  0.0 0.0 0.04   0.0 0.0 0.08   0.0 0.0 0.09   0.0 0.0 0.12   0.0 0.0 0.13   0.0 0.0 0.14  0.0 0.0 0.17  0.0 0.0 0.19  0.0 0.0 0.22"/>  -->
 			<!--0.0 0.01 0.02  0.0 0.01 0.04   0.0 0.01 0.08   0.0 0.01 0.09   0.0 0.01 0.12  0.0 0.01 0.13   0.0 0.01 0.14  0.0 0.01 0.17  0.0 0.01 0.19  0.0 0.01 0.22
 			0.0 -0.01 0.02  0.0 -0.01 0.04   0.0 -0.01 0.08   0.0 -0.01 0.09   0.0 -0.01 0.12  0.0 -0.01 0.13   0.0 -0.01 0.14  0.0 -0.01 0.17  0.0 -0.01 0.19  0.0 -0.01 0.22
  			0.01 0.01 0.02  0.01 0.01 0.04   0.01 0.01 0.08   0.01 0.01 0.09   0.01 0.01 0.12  0.01 0.01 0.13   0.01 0.01 0.14  0.01 0.01 0.17  0.01 0.01 0.19  0.01 0.01 0.22
			-0.01 -0.01 0.02  -0.01 -0.01 0.04   -0.01 -0.01 0.08   -0.01 -0.01 0.09   -0.01 -0.01 0.12  -0.01 -0.01 0.13   -0.01 -0.01 0.14  -0.01 -0.01 0.17  -0.01 -0.01 0.19  -0.01 -0.01 0.22"/>-->
<!-- 		<Sphere radius="0.002" color="1 0 0"/> -->
<!-- 		<BarycentricMapping/> -->
<!-- 		<IdentityMapping/> -->
<!-- 		<MappedPointsObservationManagerParallel name="MOBS" observationStdev="2e-3" noiseStdev="2e-3" listening="1"/> -->
<!-- 		<SofaLinearObservationManager name="LinObs"/> -->
<!-- 		<SimulatedStateObservationSource name="ObsSource" monitorPrefix="cylinderModulusMonitorStatEvolve1Smooth"/> -->
<!-- 	</Node> -->

<!-- 	<Node> -->
<!-- 		<MechanicalObject name="SourceMO" position="@../obsNode/MOBS.mappedObservations"/> -->
<!-- 		<Sphere radius="0.002" color="0 0 0.3"/> -->
<!-- 	</Node> -->
<!-- 	<VTKExporter filename="cylinder.vtk" XMLformat="true" listening="true" edges="0" triangles="0" quads="0" tetras="1" exportAtEnd="true"/> -->
</Node>
