<?xml version="1.0" ?>
<Node name="root" dt="0.005" showBoundingTree="0" gravity="0 0 0">
	<RequiredPlugin pluginName="Optimus"/>
	<RequiredPlugin pluginName="SofaPardisoWrapper"/>
	<RequiredPlugin pluginName="BilikimoAux"/>
	<RequiredPlugin pluginName="haystackPlugin"/>
	<RequiredPlugin pluginName="SofaMiscForcefieldDev"/>
	<VisualStyle displayFlags="showBehaviorModels showForceFields showCollisionModels" />

	<VerdandiAnimationLoop name="verdAnimLoop"  verbose="0"/>
	<SofaReducedOrderUKF name="sofaROUKF" outputDirectory="result3_770"/>

<!-- 	<OptimParams name="paramE" template="Vector" initValue="6000 6000 6000" stdev="2000"/> -->

	<Node name="target">
		<MechanicalObject name="TargetMO" position="0.0 -0.0029944 0.24062 0.012122 0.0049707 0.24 -0.0054268 0.010285 0.24 0.0047787 -0.01346 0.24"/>
		<Sphere radius="0.002" color="1 0 0"/>
<!-- 		<BarycentricMapping/> -->
		<LinearMotionController keyDisplacements="0 0 0   0.0 0.12 0.05  0.0 0.0 0.0"  applyOnRestPosition="1" applyOnPosition="1" applyOnFreePosition="1" keyTimeSteps="0 50 50" listening="1" loop="0"/>
	</Node>

	<Node>
<!-- 		<OptimParams name="paramE" template="Vector" initValue="10000 5000 7000"/>  -->
		<OptimParams name="paramK" template="Vector" initValue="10 10 10 10"/>

		<EulerImplicit name="odeSolver" printLog="false"/>

		<SparsePARDISOSolver/>

	<!-- 	<MeshVTKLoader filename="cylinder363.vtk" name="loader" /> -->
		<MeshVTKLoader filename="data/cylinder3_770.vtk" name="loader" />
		<MechanicalObject src="@loader" name="Volume" />

		<include href="Objects/TetrahedronSetTopology.xml" src="@loader" />
	<!-- 	<UniformMass totalMass="0.2513" /> -->
		<UniformMass totalMass="0.2513"/>

		<BoxROI name="fixedBox1" box="-0.05 -0.05 -0.002   0.05 0.05 0.002"/>
	<!-- 	<BoxROI name="fixedBox2" box="-0.05 -0.05  0.238   0.05 0.05 0.242"/> -->

	<!-- 	<MergeSets name="mergeIndices" in1="@fixedBox1.indices" in2="@fixedBox2.indices"/> -->

	<!-- 	<FixedConstraint indices="@mergeIndices.out" /> -->
		<FixedConstraint indices="@fixedBox1.indices"/>

		<BoxROI name="allDOFs" box="-1 -1 -1 1 1 1"/>
		<Monitor name="monSprings" indices="@allDOFs.indices" ExportPositions="1" ExportVelocities="1" ExportForces="1"/>

	<!-- 		<BoxROI name="fixedBox2" box="-0.05 -0.05 0.176   0.05 0.05 0.180"/> -->
	<!-- 		<FixedConstraint indices="@fixedBox2.indices" /> -->
		<!--<Indices2ValuesMapper name="youngMapper" inputValues="@loader.dataset" indices="1 2 3" values="@paramE.value"/>-->
		<Indices2ValuesMapper name="youngMapper" inputValues="@loader.dataset" indices="1 2 3" values="10000 5000 7000"/>
		<TetrahedronFEMForceField name="FEM" listening="true" updateStiffness="1"  youngModulus="@youngMapper.outputValues" poissonRatio="0.45" method="large"  computeVonMisesStress="0" drawHeterogeneousTetra="1"/>
	<!-- 	<TetrahedronFEMForceField name="FEM" listening="true" updateStiffness="1"  youngModulus="@paramE.value" poissonRatio="0.45" method="large"  computeVonMisesStress="0" drawHeterogeneousTetra="1"/> -->

		<Mapped3DoFForceField mappedFEM="sourcePoints/SourceFF" mappedMechObject="sourcePoints/SourceMO" mapping="sourcePoints/SourceMapping" printLog="1"/>
		<Node activated="1" name="sourcePoints">
			<MechanicalObject name="SourceMO" position="0.0 -0.0029944 0.24062 0.012122 0.0049707 0.24 -0.0054268 0.010285 0.24 0.0047787 -0.01346 0.24"/>
			<Sphere radius="0.002" color="1 0 0"/>
			<RestShapeSpringsForceField name="SourceFF" angularStiffness="0" stiffness="@../paramK.value" external_rest_shape="../../target/TargetMO" drawSpring="1" forceDir="forces" numDTAppl="0" startDTAppl="0" listening="1"/>
			<BarycentricMapping name="SourceMapping"/>
<!-- 			<LinearMotionController keyDisplacements="0 0 0   0.0 0.0 0.01  0.0 0.0 0.0"  applyOnRestPosition="1" applyOnPosition="1" applyOnFreePosition="1" keyTimeSteps="0 50 100" listening="1" loop="1"/> -->
		</Node>

		<Node activated="1">
<!-- 		<MechanicalObject position="@../Volume.position"/> -->
			<MechanicalObject position="
				0.0 0.0 0.02  0.0 0.0 0.04   0.0 0.0 0.08   0.0 0.0 0.09   0.0 0.0 0.12  0.0 0.0 0.13   0.0 0.0 0.14  0.0 0.0 0.17  0.0 0.0 0.19  0.0 0.0 0.22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"/> -->


			<Sphere radius="0.002" color="1 0 0"/>
			<BarycentricMapping/>
	<!-- 		<IdentityMapping/> -->
			<MappedPointsObservationManager name="MOBS" errorVariance="0.01"/>
	<!-- 		<SofaLinearObservationManager name="LinObs"/> -->
			<SimulatedStateObservationSource name="ObsSource" monitorPrefix="monSprings"/>
		</Node>

	</Node>
</Node>


	<Node activated="0">
<!-- 		<MechanicalObject position="@../Volume.position"/> -->
		<MechanicalObject position="
			0.0 0.0 0.02  0.0 0.0 0.04   0.0 0.0 0.08   0.0 0.0 0.09   0.0 0.0 0.12  0.0 0.0 0.13   0.0 0.0 0.14  0.0 0.0 0.17  0.0 0.0 0.19  0.0 0.0 0.22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"/> -->


		<Sphere radius="0.002" color="1 0 0"/>
		<BarycentricMapping/>
<!-- 		<IdentityMapping/> -->
		<MappedPointsObservationManager name="MOBS" errorVariance="0.01"/>
<!-- 		<SofaLinearObservationManager name="LinObs"/> -->
		<SimulatedStateObservationSource name="ObsSource" monitorPrefix="MON"/>
	</Node>

<!-- 	<VTKExporter filename="cylinder.vtk" XMLformat="true" listening="true" edges="0" triangles="0" quads="0" tetras="1" exportAtEnd="true"/> -->

</Node>
